Model block:
  angle_units: radians
  defaults: LinearSetPoint default: max_force=10000 min_force=-10000 body_A=0 point_A=(0 0 0) direction_A=(0 1 0)
      body_B=0 point_B=(0 0 0) normal_A=(0 1 0) normal_B=(0 -1 0) tangential_stiffness=100 tangential_viscosity=0
      coefficient_of_friction=0 normal_stiffness=10000 normal_viscosity=0
  ContactForceSet:
    LinearSetPoint origin: body_A=ground body_B=block point_A=(0 0 0) point_B=(0.1 -0.1 0.1) normal_A=(0.1 1 0)
        normal_B=(0 -1 0) coefficient_of_friction=0.4 tangential_stiffness=10000 tangential_viscosity=200
        normal_stiffness=1000000 normal_viscosity=2000
    LinearSetPoint origin: body_A=ground body_B=block point_A=(0 0 0) point_B=(-0.1 -0.1 0.1) normal_A=(0.1 1 0)
        normal_B=(0 -1 0) coefficient_of_friction=0.4 tangential_stiffness=10000 tangential_viscosity=200
        normal_stiffness=1000000 normal_viscosity=2000
    LinearSetPoint origin: body_A=ground body_B=block point_A=(0 0 0) point_B=(0.1 -0.1 -0.1) normal_A=(0.1 1 0)
        normal_B=(0 -1 0) coefficient_of_friction=0.4 tangential_stiffness=10000 tangential_viscosity=200
        normal_stiffness=1000000 normal_viscosity=2000
    LinearSetPoint origin: body_A=ground body_B=block point_A=(0 0 0) point_B=(-0.1 -0.1 -0.1) normal_A=(0.1 1 0)
        normal_B=(0 -1 0) coefficient_of_friction=0.4 tangential_stiffness=10000 tangential_viscosity=200
        normal_stiffness=1000000 normal_viscosity=2000
  DynamicsEngine:
    SimbodyEngine: gravity=(0 -9.80665 0)
      BodySet:
        SimbodyBody ground: mass=0 mass_center=(0 0 0) inertia=(0 0 0 0 0 0 0 0 0) meshes=floor.vtp
        SimbodyBody block: mass=20 mass_center=(0 0 0) inertia=(0.1 0 0 0 0.1 0 0 0 0.1) meshes=block.vtp
      SimbodyCoordinate [values shared by the 6 below unless stated]: default_value=0 tolerance=0.00000001 stiffness=0
          clamped=true restraint_active=false keys=q_key
      SimbodyCoordinate block_tx: range=(-5 5) keys=p_key
      SimbodyCoordinate block_ty: range=(-1 2) default_value=1
      SimbodyCoordinate block_tz: range=(-3 3)
      SimbodyCoordinate block_rz: range=(-1.570796 1.570796)
      SimbodyCoordinate block_rx: range=(-1.570796 1.570796)
      SimbodyCoordinate block_ry: range=(-1.570796 1.570796)
      SpeedSet:
        SimbodySpeed block_tx_u: default_value=0 coordinate=block_tx
        SimbodySpeed block_ty_u: default_value=0 coordinate=block_ty
        SimbodySpeed block_tz_u: default_value=0 coordinate=block_tz
        SimbodySpeed block_rz_u: default_value=0 coordinate=block_rz
        SimbodySpeed block_rx_u: default_value=0 coordinate=block_rx
        SimbodySpeed block_ry_u: default_value=0 coordinate=block_ry
      JointSet:
        SimbodyJoint ground_block: bodies=(ground block)
          DofSet:
            SimbodyTranslationDof tx: coordinate=block_tx
              Value:
                natCubicSpline: x=(-360 360) y=(-360 360)
            SimbodyTranslationDof ty: coordinate=block_ty
              Value:
                natCubicSpline: x=(-360 360) y=(-360 360)
            SimbodyTranslationDof tz: coordinate=block_tz
              Value:
                natCubicSpline: x=(-360 360) y=(-360 360)
            SimbodyRotationDof r1: axis=(0 0 1) coordinate=block_rz
              Value:
                natCubicSpline: x=(-6.283185 6.283185) y=(-6.283185 6.283185)
            SimbodyRotationDof r2: axis=(1 0 0) coordinate=block_rx
              Value:
                natCubicSpline: x=(-6.283185 6.283185) y=(-6.283185 6.283185)
            SimbodyRotationDof r3: axis=(0 1 0) coordinate=block_ry
              Value:
                natCubicSpline: x=(-6.283185 6.283185) y=(-6.283185 6.283185)
