# OpenSim document version 20200
Model DoublePendulum3D:
  credits: Matt DeMers
  publications: List of publications related to model...
  length_units: meters
  force_units: N
  gravity: 0 -9.80665 0
  BodySet:
    Body ground: mass=0 mass_center=(0 0 0) inertia_xx=0 inertia_yy=0 inertia_zz=0 meshes=cuboid.vtp
    Body rod1: mass=0.75 mass_center=(0 0 0) inertia_xx=0.025 inertia_yy=0.025 inertia_zz=0.025 meshes=ConePendulum.vtp
      CustomJoint pin1: parent_body=ground location_in_parent=(0 0 0) location=(0 0.5 0)
        Coordinate r1_z: motion_type=rotational default_value=-0.529411 initial_value=-0.529411 range=(-9 9)
            clamped=true
        SpatialTransform: axes_held_at_zero=(rotation2 rotation3 translation1 translation2 translation3)
          TransformAxis rotation1: coordinates=r1_z axis=(0 0 1) LinearFunction(coefficients=1 0)
    Body rod2: mass=1.25 mass_center=(0 0 0) inertia_xx=0.025 inertia_yy=0.025 inertia_zz=0.025 meshes=ConePendulum.vtp
      CustomJoint pin2: parent_body=rod1 location_in_parent=(0 0 0) location=(0 0.5 0)
        Coordinate r2_x: motion_type=rotational default_value=1.058821 initial_value=1.058821 range=(-9 9) clamped=true
        SpatialTransform: axes_held_at_zero=(rotation2 rotation3 translation1 translation2 translation3)
          TransformAxis rotation1: coordinates=r2_x axis=(1 0 0) LinearFunction(coefficients=1 0)
