# OpenSim document version 20300
ForwardTool DoublePendulum3D:
  replace_force_set: false
  results_directory: .
  output_precision: 20
  initial_time: 0
  final_time: 3
  solve_for_equilibrium_for_auxiliary_states: false
  maximum_number_of_integrator_steps: 20000
  maximum_integrator_step_size: 0.01
  minimum_integrator_step_size: 0.00000001
  integrator_error_tolerance: 0.001
  states_file: DoublePendulum3D_InitialStates.sto
  use_specified_dt: false
  body1_linear_corrective_spring_active: false
  body1_torsional_corrective_spring_active: false
  body1_torsional_corrective_spring_time_on: 0
  body1_torsional_corrective_spring_time_off: 0
  body2_linear_corrective_spring_active: false
  body2_torsional_corrective_spring_active: false
  body2_torsional_corrective_spring_time_on: 0
  body2_torsional_corrective_spring_time_off: 0
  linear_spring_transition_start_force: 0
  linear_spring_transition_end_force: 0
  torsional_spring_scaling_rise_time: 0
  body1_scaling_rise_time_on: 0
  body1_scaling_rise_time_off: 0
  body2_scaling_rise_time_on: 0
  body2_scaling_rise_time_off: 0
  spring_force_threshold: 0
  spring_torque_threshold: 0
  corrective_spring_linear_stiffness: 0 0 0
  corrective_spring_linear_damping: 0 0 0
  corrective_spring_torsional_stiffness: 0 0 0
  corrective_spring_torsional_damping: 0 0 0
  output_detailed_results: false
  ControllerSet Controllers:
    ControlSetController: enable_controller=false controls_file=DoublePendulum_controls.xml
