# OpenSim document version 20303
AnalyzeTool BothLegs:
  model_file: BothLegs.osim
  replace_force_set: false
  results_directory: testPlotterTool
  output_precision: 8
  initial_time: 0
  final_time: 100
  solve_for_equilibrium_for_auxiliary_states: true
  maximum_number_of_integrator_steps: 20000
  maximum_integrator_step_size: 1
  minimum_integrator_step_size: 1e-8
  integrator_error_tolerance: 1e-5
  states_file: plotterGeneratedStates.sto
  lowpass_cutoff_frequency_for_coordinates: -1
  AnalysisSet Analyses:
    MuscleAnalysis: start_time=0 end_time=100 step_interval=1 in_degrees=true muscle_list=(RF VASINT)
        moment_arm_coordinate_list=r_knee_angle compute_moments=false
    Actuation: start_time=-Inf end_time=Inf step_interval=1 in_degrees=true
