# OpenSim document version 20300
AnalyzeTool SinglePin:
  model_file: SinglePin.osim
  replace_force_set: false
  output_precision: 20
  initial_time: 0
  final_time: 3
  solve_for_equilibrium_for_auxiliary_states: false
  maximum_number_of_integrator_steps: 20000
  maximum_integrator_step_size: 1
  minimum_integrator_step_size: 0.00000001
  integrator_error_tolerance: 0.001
  states_file: SinglePin_states.sto
  lowpass_cutoff_frequency_for_coordinates: -1
  AnalysisSet Analyses:
    JointReaction: start_time=0 end_time=3 step_interval=1 in_degrees=true joint_names=(pin1 pin1 pin1)
        apply_on_bodies=(child child child) express_in_frame=(rod1 pin1/rod1_offset ground)
