# OpenSim document version 30516
AnalyzeTool Tug_of_War_Millard_Iso:
  model_file: Tug_of_War_Millard_Iso.osim
  replace_force_set: false
  results_directory: Analyze_Tug_of_War
  output_precision: 8
  initial_time: 0
  final_time: 1
  solve_for_equilibrium_for_auxiliary_states: true
  maximum_number_of_integrator_steps: 20000
  maximum_integrator_step_size: 1
  minimum_integrator_step_size: 1e-8
  integrator_error_tolerance: 1e-5
  coordinates_file: Tug_of_War_ConstantVelocity.sto
  lowpass_cutoff_frequency_for_coordinates: -1
  AnalysisSet Analyses:
    ForceReporter: start_time=0 end_time=1 step_interval=1 in_degrees=true include_constraint_forces=false
    OutputReporter: output_paths=(forceset/LeftMuscle|fiber_length forceset/LeftMuscle|tendon_force |com_position forceset/LeftMuscle|active_force_length_multiplier jointset/ground_block|reaction_on_child)
        start_time=-Inf end_time=Inf step_interval=1 in_degrees=true
