# OpenSim document version 20302
AnalyzeTool arm26:
  model_file: arm26_disabledMuscles.osim
  replace_force_set: false
  results_directory: ResultsDisabledMuscles
  output_precision: 20
  initial_time: 0.25
  final_time: 0.35
  solve_for_equilibrium_for_auxiliary_states: false
  maximum_number_of_integrator_steps: 20000
  maximum_integrator_step_size: 1
  minimum_integrator_step_size: 0.00000001
  integrator_error_tolerance: 0.00001
  coordinates_file: arm26_InverseKinematics.mot
  lowpass_cutoff_frequency_for_coordinates: 6
  AnalysisSet Analyses:
    StaticOptimization: start_time=0 end_time=1 step_interval=1 in_degrees=true use_model_force_set=true
        activation_exponent=2 use_muscle_physiology=true
