# OpenSim document version 20302
AnalyzeTool double_pendulum:
  model_file: double_pendulum.osim
  replace_force_set: false
  results_directory: ResultsInducedAccelerations
  output_precision: 8
  initial_time: 0
  final_time: 2
  states_file: double_pendulum_states.sto
  lowpass_cutoff_frequency_for_coordinates: -1
  AnalysisSet Analyses:
    InducedAccelerations: start_time=-infinity end_time=infinity step_interval=1 in_degrees=false
        coordinate_names=(q1 q2) force_threshold=0 [N] compute_potentials_only=false report_constraint_reactions=false
  ControllerSet Controllers:
    ControlSetController: enable_controller=true controls_file=pendulum_controls.xml
