# OpenSim document version 30000
AnalyzeTool walk_subject01_ankle_spring:
  model_file: subject01_adjusted_spring.osim
  replace_force_set: false
  force_set_files: gait10dof_Actuators_weak.xml
  results_directory: ResultsSO_spring
  output_precision: 8
  initial_time: 0.5
  final_time: 1.3
  solve_for_equilibrium_for_auxiliary_states: false
  maximum_number_of_integrator_steps: 20000
  maximum_integrator_step_size: 1
  minimum_integrator_step_size: 1e-8
  integrator_error_tolerance: 1e-5
  external_loads_file: subject01_walk_grf.xml
  coordinates_file: walk_subject01_Kinematics_q.sto
  lowpass_cutoff_frequency_for_coordinates: -1
  AnalysisSet Analyses:
    StaticOptimization: start_time=0.5 end_time=1.3 step_interval=10 in_degrees=true use_model_force_set=true
        activation_exponent=2 use_muscle_physiology=true optimizer_convergence_criterion=0.0001
        optimizer_max_iterations=100
