# OpenSim document version 30516
Model walk_subject01_ankle_spring:
  gravity: 0 -9.80665 0
  length_units: meters
  force_units: N
  credits:
    Delp S.L., Loan J.P., Hoy M.G., Zajac F.E., Topp E.L., Rosen J.M., Thelen D.G., Anderson F.C., Seth A. Notes: 3D, 23 DOF gait model created by D.G. Thelen, Univ. of Wisconsin-Madison, and Ajay Seth, Frank C. Anderson, and Scott L. Delp, Stanford University. Lower extremity joint defintions based on Delp et al. (1990). Low back joint and anthropometry based on Anderson and Pandy (1999, 2001). Planar knee model of Yamaguchi and Zajac (1989). Seth replaced tibia translation constraints with a CustomJoint for the knee and removed the patella to eliminate all kinematic constraints; insertions of the quadrucepts are handled with moving points in the tibia frame as defined by Delp 1990. Number of muscles was reduced by Anderson to improve simulation speed for demonstrations and is not intended to be used in research. License: Creative Commons (CCBY 3.0). You are free to distribute, remix, tweak, and build upon this work, even commercially, as long as you credit us for the original creation. http://creativecommons.org/licenses/by/3.0/ More Information: http://simtk-confluence.stanford.edu:8080/display/OpenSim/Gait+2392+and+2354+Models
  publications:
    Delp, S.L., Loan, J.P., Hoy, M.G., Zajac, F.E., Topp E.L., Rosen, J.M.: An interactive graphics-based model of the lower extremity to study orthopaedic surgical procedures, IEEE Transactions on Biomedical Engineering, vol. 37, pp. 757-767, 1990. Yamaguchi G.T., Zajac F.E.: A planar model of the knee joint to characterize the knee extensor mechanism." J . Biomech. vol. 22. pp. 1-10. 1989. Anderson F.C., Pandy M.G.: A dynamic optimization solution for vertical jumping in three dimensions. Computer Methods in Biomechanics and Biomedical Engineering 2:201-231, 1999. Anderson F.C., Pandy M.G.: Dynamic optimization of human walking. Journal of Biomechanical Engineering 123:381-390, 2001.
  Ground
  BodySet:
    Body pelvis: mass=11.37517 [kg] mass_center=(0.0206846 0 0) inertia=(0.104234 0.0883147 0.0587075 0 0 0)
        meshes=(sacrum.vtp pelvis.vtp l_pelvis.vtp)
    Body femur_r: mass=8.984038 mass_center=(0 -0.195031 0) inertia=(0.170221 0.044621 0.179501 0 0 0) meshes=femur.vtp
    Body tibia_r: mass=3.581001 mass_center=(0 -0.184557 0) inertia=(0.0475694 0.00481357 0.0482301 0 0 0)
        meshes=(tibia.vtp fibula.vtp)
    Body talus_r: mass=0.09658802 mass_center=(0 0 0) inertia=(0.00119861 0.00119861 0.00119861 0 0 0) meshes=talus.vtp
    Body calcn_r: mass=1.20735 mass_center=(0.102708 0.0308124 0) inertia=(0.00142646 0.00397371 0.00417749 0 0 0)
        meshes=foot.vtp
    Body toes_r: mass=0.2092097 mass_center=(0.035537 0.00616248 -0.0179739)
        inertia=(0.00010189 0.00020378 0.00010189 0 0 0) meshes=bofoot.vtp
    Body femur_l: mass=8.984038 mass_center=(0 -0.195031 0) inertia=(0.170221 0.044621 0.179501 0 0 0)
        meshes=l_femur.vtp
    Body tibia_l: mass=3.581001 mass_center=(0 -0.184557 0) inertia=(0.0475694 0.00481357 0.0482301 0 0 0)
        meshes=(l_tibia.vtp l_fibula.vtp)
    Body talus_l: mass=0.09658802 mass_center=(0 0 0) inertia=(0.00119861 0.00119861 0.00119861 0 0 0)
        meshes=l_talus.vtp
    Body calcn_l: mass=1.20735 mass_center=(0.102708 0.0308124 0) inertia=(0.00142646 0.00397371 0.00417749 0 0 0)
        meshes=l_foot.vtp
    Body toes_l: mass=0.2092097 mass_center=(0.035537 0.00616248 0.0179739)
        inertia=(0.00010189 0.00020378 0.00010189 0 0 0) meshes=l_bofoot.vtp
    Body torso: mass=33.06845 mass_center=(-0.0323916 0.34551 0) inertia=(1.66031 0.850707 1.61178 0 0 0)
        meshes=(hat_spine.vtp hat_jaw.vtp hat_skull.vtp hat_ribs.vtp)
  JointSet:
    CustomJoint ground_pelvis: socket_parent_frame_connectee_name=../ground socket_child_frame_connectee_name=../pelvis
      Coordinate pelvis_tilt: default_value=0 range=(-1.570796 1.570796) clamped=false
      Coordinate pelvis_tx: default_value=0 range=(-5 5) clamped=false
      Coordinate pelvis_ty: default_value=0 range=(-1 2) clamped=false
      SpatialTransform: axes_held_at_zero=(rotation2 rotation3)
        TransformAxis rotation1: coordinates=pelvis_tilt axis=(0 0 1) LinearFunction(coefficients=1 0)
        TransformAxis translation1: coordinates=pelvis_tx axis=(1 0 0) LinearFunction(coefficients=1 0)
        TransformAxis translation2: coordinates=pelvis_ty axis=(0 1 0) LinearFunction(coefficients=1 0)
        TransformAxis translation3: axis=(0 0 1) MultiplierFunction(scale=1, Constant(value=0.02))
    PinJoint hip_r: socket_parent_frame_connectee_name=pelvis_offset socket_child_frame_connectee_name=../femur_r
      Coordinate hip_flexion_r: default_value=0 range=(-2.094395 2.094395) clamped=false
      PhysicalOffsetFrame pelvis_offset: socket_parent_connectee_name=../../pelvis
          translation=(-0.0724378 -0.0677247 0.0855524)
    CustomJoint knee_r: socket_parent_frame_connectee_name=../femur_r socket_child_frame_connectee_name=../tibia_r
      Coordinate knee_angle_r: default_value=0 range=(-2.094395 0.1745329) clamped=false
      SpatialTransform: axes_held_at_zero=(rotation2 rotation3 translation3)
        TransformAxis rotation1: coordinates=knee_angle_r axis=(0 0 1) LinearFunction(coefficients=1 0)
        TransformAxis translation1: coordinates=knee_angle_r axis=(1 0 0)
          MultiplierFunction: scale=1.14724
            SimmSpline: x=(-2.0944 -1.74533 -1.39626 -1.0472 -0.698132 -0.349066 -0.174533 0.197344 0.337395 0.490178 1.52146 2.0944)
                y=(-0.0032 0.00179 0.00411 0.0041 0.00212 -0.001 -0.0031 -0.005227 -0.005435 -0.005574 -0.005435 -0.00525)
        TransformAxis translation2: coordinates=knee_angle_r axis=(0 1 0)
          MultiplierFunction: scale=1.14724
            SimmSpline: x=(-2.0944 -1.22173 -0.523599 -0.349066 -0.174533 0.159149 2.0944)
                y=(-0.4226 -0.4082 -0.399 -0.3976 -0.3966 -0.395264 -0.396)
    PinJoint ankle_r: socket_parent_frame_connectee_name=tibia_r_offset socket_child_frame_connectee_name=../talus_r
      Coordinate ankle_angle_r: default_value=0 range=(-1.570796 1.570796) clamped=false
      PhysicalOffsetFrame tibia_r_offset: socket_parent_connectee_name=../../tibia_r translation=(0 -0.425065 0)
    WeldJoint subtalar_r: socket_parent_frame_connectee_name=talus_r_offset
        socket_child_frame_connectee_name=../calcn_r
      PhysicalOffsetFrame talus_r_offset: socket_parent_connectee_name=../../talus_r
          translation=(-0.0543288 -0.0467315 0.00882272)
    WeldJoint mtp_r: socket_parent_frame_connectee_name=calcn_r_offset socket_child_frame_connectee_name=../toes_r
      PhysicalOffsetFrame calcn_r_offset: socket_parent_connectee_name=../../calcn_r
          translation=(0.183642 -0.00205416 0.00110925)
    PinJoint hip_l: socket_parent_frame_connectee_name=pelvis_offset socket_child_frame_connectee_name=../femur_l
      Coordinate hip_flexion_l: default_value=0 range=(-2.094395 2.094395) clamped=false
      PhysicalOffsetFrame pelvis_offset: socket_parent_connectee_name=../../pelvis
          translation=(-0.0724378 -0.0677247 -0.0855524)
    CustomJoint knee_l: socket_parent_frame_connectee_name=../femur_l socket_child_frame_connectee_name=../tibia_l
      Coordinate knee_angle_l: default_value=0 range=(-2.094395 0.1745329) clamped=false
      SpatialTransform: axes_held_at_zero=(rotation2 rotation3 translation3)
        TransformAxis rotation1: coordinates=knee_angle_l axis=(0 0 1) LinearFunction(coefficients=1 0)
        TransformAxis translation1: coordinates=knee_angle_l axis=(1 0 0)
          MultiplierFunction: scale=1.14724
            SimmSpline: x=(-2.0944 -1.74533 -1.39626 -1.0472 -0.698132 -0.349066 -0.174533 0.197344 0.337395 0.490178 1.52146 2.0944)
                y=(-0.0032 0.00179 0.00411 0.0041 0.00212 -0.001 -0.0031 -0.005227 -0.005435 -0.005574 -0.005435 -0.00525)
        TransformAxis translation2: coordinates=knee_angle_l axis=(0 1 0)
          MultiplierFunction: scale=1.14724
            SimmSpline: x=(-2.0944 -1.22173 -0.523599 -0.349066 -0.174533 0.159149 2.0944)
                y=(-0.4226 -0.4082 -0.399 -0.3976 -0.3966 -0.395264 -0.396)
    PinJoint ankle_l: socket_parent_frame_connectee_name=tibia_l_offset socket_child_frame_connectee_name=../talus_l
      Coordinate ankle_angle_l: default_value=0 range=(-1.047198 1.047198) clamped=false
      PhysicalOffsetFrame tibia_l_offset: socket_parent_connectee_name=../../tibia_l translation=(0 -0.425065 0)
    WeldJoint subtalar_l: socket_parent_frame_connectee_name=talus_l_offset
        socket_child_frame_connectee_name=../calcn_l
      PhysicalOffsetFrame talus_l_offset: socket_parent_connectee_name=../../talus_l
          translation=(-0.0543288 -0.0467315 -0.00882272)
    WeldJoint mtp_l: socket_parent_frame_connectee_name=calcn_l_offset socket_child_frame_connectee_name=../toes_l
      PhysicalOffsetFrame calcn_l_offset: socket_parent_connectee_name=../../calcn_l
          translation=(0.183642 -0.00205416 -0.00110925)
    PinJoint back: socket_parent_frame_connectee_name=pelvis_offset socket_child_frame_connectee_name=../torso
      Coordinate lumbar_extension: default_value=0 range=(-1.570796 1.570796) clamped=false
      PhysicalOffsetFrame pelvis_offset: socket_parent_connectee_name=../../pelvis translation=(-0.103175 0.0835033 0)
  ForceSet:
    Millard2012EquilibriumMuscle [values shared by the 18 below unless stated]: min_control=0 optimal_force=1
        max_contraction_velocity=10 activation_time_constant=0.01 [seconds] deactivation_time_constant=0.04 [seconds]
        minimum_activation=0
      ActiveForceLengthCurve: minimum_value=0
      ForceVelocityCurve: concentric_slope_at_vmax=0 concentric_slope_near_vmax=0.25 isometric_slope=5
          eccentric_slope_at_vmax=0 eccentric_slope_near_vmax=0.15 max_eccentric_velocity_force_multiplier=1.4
      FiberForceLengthCurve
      TendonForceLengthCurve
    Millard2012EquilibriumMuscle hamstrings_r: max_isometric_force=2700 optimal_fiber_length=0.1236311
        tendon_slack_length=0.3697589 pennation_angle_at_optimal=0 [radians]
      PathPoint bifemlh_r-P1: socket_parent_frame_connectee_name=../../../pelvis (-0.129056 -0.105091 0.0711468)
      PathPoint bifemlh_r-P2: socket_parent_frame_connectee_name=../../../tibia_r (-0.0297545 -0.0355868 0.0290922)
      PathPoint bifemlh_r-P3: socket_parent_frame_connectee_name=../../../tibia_r (-0.0231314 -0.0556538 0.0339063)
    Millard2012EquilibriumMuscle bifemsh_r: max_isometric_force=804 optimal_fiber_length=0.1914449
        tendon_slack_length=0.09848899 pennation_angle_at_optimal=0.4014257
      PathPoint P1: socket_parent_frame_connectee_name=../../../femur_r (0.0057362 -0.242182 0.0268454)
      PathPoint P2: socket_parent_frame_connectee_name=../../../tibia_r (-0.0297545 -0.0355868 0.0290922)
      PathPoint P3: socket_parent_frame_connectee_name=../../../tibia_r (-0.0231314 -0.0556538 0.0339063)
    Millard2012EquilibriumMuscle glut_max_r: max_isometric_force=1944 optimal_fiber_length=0.1708506
        tendon_slack_length=0.07981739 pennation_angle_at_optimal=0
      PathPoint P1: socket_parent_frame_connectee_name=../../../pelvis (-0.134937 0.00891385 0.0473356)
      PathPoint P2: socket_parent_frame_connectee_name=../../../pelvis (-0.137704 -0.0623969 0.0832984)
      PathPoint P3: socket_parent_frame_connectee_name=../../../femur_r (-0.0516258 -0.0669988 0.0289104)
      PathPoint P4: socket_parent_frame_connectee_name=../../../femur_r (-0.0178969 -0.11656 0.0480694)
    Millard2012EquilibriumMuscle iliopsoas_r: max_isometric_force=2342 optimal_fiber_length=0.1051725
        tendon_slack_length=0.168276 pennation_angle_at_optimal=0.1396263
      PathPoint psoas_r-P1: socket_parent_frame_connectee_name=../../../pelvis (-0.0662903 0.0908802 0.0296104)
      PathPoint psoas_r-P2: socket_parent_frame_connectee_name=../../../pelvis (-0.024385 -0.0584011 0.0777656)
      ConditionalPathPoint psoas_r-P3: socket_parent_frame_connectee_name=../../../pelvis
          (-0.0295079 -0.0824787 0.0836057) socket_coordinate_connectee_name=../../../hip_r/hip_flexion_r
          range=(-1.5708 0.785398) [radians]
      PathPoint psoas_r-P4: socket_parent_frame_connectee_name=../../../femur_r (0.00183558 -0.0581651 0.00435951)
      PathPoint psoas_r-P5: socket_parent_frame_connectee_name=../../../femur_r (-0.0215681 -0.0684902 0.0119313)
    Millard2012EquilibriumMuscle rect_fem_r: max_isometric_force=1169 optimal_fiber_length=0.1304624
        tendon_slack_length=0.3547661 pennation_angle_at_optimal=0.08726646
      PathPoint P1: socket_parent_frame_connectee_name=../../../pelvis (-0.0302251 -0.0318644 0.0991793)
      ConditionalPathPoint P2: socket_parent_frame_connectee_name=../../../femur_r (0.0383178 -0.462338 0.00217976)
          socket_coordinate_connectee_name=../../../knee_r/knee_angle_r range=(-2.61799 -1.45997)
      MovingPathPoint P3: socket_parent_frame_connectee_name=../../../tibia_r
          socket_x_coordinate_connectee_name=../../../knee_r/knee_angle_r
          socket_y_coordinate_connectee_name=../../../knee_r/knee_angle_r
          socket_z_coordinate_connectee_name=../../../knee_r/knee_angle_r
        x_location: MultiplierFunction: scale=0.988523
          SimmSpline: x=(-2.0944 -1.99997 -1.5708 -1.45752 -1.39626 -1.0472 -0.698132 -0.526391 -0.349066 -0.174533 0 0.00017453 0.00034907 0.0279253 0.0872665 0.174533 2.0944)
              y=(0.0155805 0.0179938 0.0275081 0.0296564 0.0307615 0.0365695 0.0422074 0.0450902 0.048391 0.0534299 0.0617576 0.0617669 0.0617762 0.0633083 0.066994 0.0733035 0.0573481)
        y_location: MultiplierFunction: scale=0.988523
          SimmSpline: x=(-2.0944 -1.99997 -1.5708 -1.45752 -1.39626 -1.0472 -0.698132 -0.526391 -0.349066 -0.174533 0 0.00017453 0.00034907 0.0279253 0.0872665 0.174533 2.0944)
              y=(0.0234116 0.0237613 0.0251141 0.0252795 0.0253146 0.0249184 0.0242373 0.0238447 0.0234197 0.0227644 0.020984 0.0209814 0.0209788 0.0205225 0.0191754 0.0159554 -0.0673774)
        z_location: MultiplierFunction: scale=0.988523
          SimmSpline: x=(-2.0944 0.1745) y=(0.0014 0.0014)
    Millard2012EquilibriumMuscle vasti_r: max_isometric_force=5000 optimal_fiber_length=0.1246787
        tendon_slack_length=0.1351657 pennation_angle_at_optimal=0.05235988
      PathPoint vas_int_r-P1: socket_parent_frame_connectee_name=../../../femur_r (0.03327 -0.220729 0.0355644)
      PathPoint vas_int_r-P2: socket_parent_frame_connectee_name=../../../femur_r (0.0384325 -0.239085 0.0326963)
      ConditionalPathPoint vas_int_r-P3: socket_parent_frame_connectee_name=../../../femur_r
          (0.0393503 -0.462338 0.00630982) socket_coordinate_connectee_name=../../../knee_r/knee_angle_r
          range=(-2.61799 -1.42)
      MovingPathPoint vas_int_r-P4: socket_parent_frame_connectee_name=../../../tibia_r
          socket_x_coordinate_connectee_name=../../../knee_r/knee_angle_r
          socket_y_coordinate_connectee_name=../../../knee_r/knee_angle_r
          socket_z_coordinate_connectee_name=../../../knee_r/knee_angle_r
        x_location: MultiplierFunction: scale=0.988523
          SimmSpline: x=(-2.0944 -1.99997 -1.5708 -1.45752 -1.39626 -1.0472 -0.698132 -0.526391 -0.349066 -0.174533 0 0.00017453 0.00034907 0.0279253 0.0872665 0.174533 2.0944)
              y=(0.0082733 0.0106866 0.0202042 0.022353 0.0234583 0.0292715 0.0349465 0.037871 0.0412569 0.0465287 0.0554632 0.0554735 0.0554837 0.0571717 0.061272 0.0684368 0.0648818)
        y_location: MultiplierFunction: scale=0.988523
          SimmSpline: x=(-2.0944 -1.99997 -1.5708 -1.45752 -1.39626 -1.0472 -0.698132 -0.526391 -0.349066 -0.174533 0 0.00017453 0.00034907 0.0279253 0.0872665 0.174533 2.0944)
              y=(0.025599 0.0259487 0.0273124 0.0274796 0.0275151 0.0271363 0.0265737 0.0263073 0.0261187 0.0260129 0.0252923 0.0252911 0.0252898 0.0250526 0.0242191 0.0218288 -0.0685706)
        z_location: MultiplierFunction: scale=0.988523
          SimmSpline: x=(-2.0944 2.0944) y=(0.0018 0.0018)
    Millard2012EquilibriumMuscle gastroc_r: max_isometric_force=2500 optimal_fiber_length=0.09012875
        tendon_slack_length=0.360515 pennation_angle_at_optimal=0.296706
      PathPoint med_gas_r-P1: socket_parent_frame_connectee_name=../../../femur_r (-0.0217976 -0.450751 -0.0269601)
      ConditionalPathPoint med_gas_r-P2: socket_parent_frame_connectee_name=../../../femur_r
          (-0.0344172 -0.46142 -0.0295988) socket_coordinate_connectee_name=../../../knee_r/knee_angle_r
          range=(-0.785398 0.174533)
      PathPoint med_gas_r-P3: socket_parent_frame_connectee_name=../../../calcn_r (0 0.0318395 -0.00544352)
    Millard2012EquilibriumMuscle soleus_r: max_isometric_force=5137 optimal_fiber_length=0.05028884
        tendon_slack_length=0.2514442 pennation_angle_at_optimal=0.4363323
      PathPoint P1: socket_parent_frame_connectee_name=../../../tibia_r (-0.00237246 -0.151541 0.00701851)
      PathPoint P2: socket_parent_frame_connectee_name=../../../calcn_r (0 0.0318395 -0.00544352)
    Millard2012EquilibriumMuscle tib_ant_r: max_isometric_force=3000 optimal_fiber_length=0.09791257
        tendon_slack_length=0.2228011 pennation_angle_at_optimal=0.08726646
      PathPoint P1: socket_parent_frame_connectee_name=../../../tibia_r (0.0176946 -0.160536 0.011368)
      PathPoint P2: socket_parent_frame_connectee_name=../../../tibia_r (0.0325224 -0.390565 -0.0174969)
      PathPoint P3: socket_parent_frame_connectee_name=../../../calcn_r (0.119758 0.018282 -0.0313259)
    Millard2012EquilibriumMuscle hamstrings_l: max_isometric_force=2700 optimal_fiber_length=0.1236311
        tendon_slack_length=0.3697589 pennation_angle_at_optimal=0
      PathPoint bifemlh_l-P1: socket_parent_frame_connectee_name=../../../pelvis (-0.129056 -0.105091 -0.0711468)
      PathPoint bifemlh_l-P2: socket_parent_frame_connectee_name=../../../tibia_l (-0.0297545 -0.0355868 -0.0290922)
      PathPoint bifemlh_l-P3: socket_parent_frame_connectee_name=../../../tibia_l (-0.0231314 -0.0556538 -0.0339063)
    Millard2012EquilibriumMuscle bifemsh_l: max_isometric_force=804 optimal_fiber_length=0.1914449
        tendon_slack_length=0.09848899 pennation_angle_at_optimal=0.4014257
      PathPoint P1: socket_parent_frame_connectee_name=../../../femur_l (0.0057362 -0.242182 -0.0268454)
      PathPoint P2: socket_parent_frame_connectee_name=../../../tibia_l (-0.0297545 -0.0355868 -0.0290922)
      PathPoint P3: socket_parent_frame_connectee_name=../../../tibia_l (-0.0231314 -0.0556538 -0.0339063)
    Millard2012EquilibriumMuscle glut_max_l: max_isometric_force=1944 optimal_fiber_length=0.1708506
        tendon_slack_length=0.07981739 pennation_angle_at_optimal=0
      PathPoint P1: socket_parent_frame_connectee_name=../../../pelvis (-0.134937 0.00891385 -0.0473356)
      PathPoint P2: socket_parent_frame_connectee_name=../../../pelvis (-0.137704 -0.0623969 -0.0832984)
      PathPoint P3: socket_parent_frame_connectee_name=../../../femur_l (-0.0516258 -0.0669988 -0.0289104)
      PathPoint P4: socket_parent_frame_connectee_name=../../../femur_l (-0.0178969 -0.11656 -0.0480694)
    Millard2012EquilibriumMuscle iliopsoas_l: max_isometric_force=2342 optimal_fiber_length=0.1051725
        tendon_slack_length=0.168276 pennation_angle_at_optimal=0.1396263
      PathPoint psoas_l-P1: socket_parent_frame_connectee_name=../../../pelvis (-0.0662903 0.0908802 -0.0296104)
      PathPoint psoas_l-P2: socket_parent_frame_connectee_name=../../../pelvis (-0.024385 -0.0584011 -0.0777656)
      ConditionalPathPoint psoas_l-P3: socket_parent_frame_connectee_name=../../../pelvis
          (-0.0295079 -0.0824787 -0.0836057) socket_coordinate_connectee_name=../../../hip_l/hip_flexion_l
          range=(-1.5708 0.785398)
      PathPoint psoas_l-P4: socket_parent_frame_connectee_name=../../../femur_l (0.00183558 -0.0581651 -0.00435951)
      PathPoint psoas_l-P5: socket_parent_frame_connectee_name=../../../femur_l (-0.0215681 -0.0684902 -0.0119313)
    Millard2012EquilibriumMuscle rect_fem_l: max_isometric_force=1169 optimal_fiber_length=0.1304624
        tendon_slack_length=0.3547661 pennation_angle_at_optimal=0.08726646
      PathPoint P1: socket_parent_frame_connectee_name=../../../pelvis (-0.0302251 -0.0318644 -0.0991793)
      ConditionalPathPoint P2: socket_parent_frame_connectee_name=../../../femur_l (0.0383178 -0.462338 -0.00217976)
          socket_coordinate_connectee_name=../../../knee_l/knee_angle_l range=(-2.61799 -1.45997)
      MovingPathPoint P3: socket_parent_frame_connectee_name=../../../tibia_l
          socket_x_coordinate_connectee_name=../../../knee_l/knee_angle_l
          socket_y_coordinate_connectee_name=../../../knee_l/knee_angle_l
          socket_z_coordinate_connectee_name=../../../knee_l/knee_angle_l
        x_location: MultiplierFunction: scale=0.988523
          SimmSpline: x=(-2.0944 -1.99997 -1.5708 -1.45752 -1.39626 -1.0472 -0.698132 -0.526391 -0.349066 -0.174533 0 0.00017453 0.00034907 0.0279253 0.0872665 0.174533 2.0944)
              y=(0.0155805 0.0179938 0.0275081 0.0296564 0.0307615 0.0365695 0.0422074 0.0450902 0.048391 0.0534299 0.0617576 0.0617669 0.0617762 0.0633083 0.066994 0.0733035 0.0573481)
        y_location: MultiplierFunction: scale=0.988523
          SimmSpline: x=(-2.0944 -1.99997 -1.5708 -1.45752 -1.39626 -1.0472 -0.698132 -0.526391 -0.349066 -0.174533 0 0.00017453 0.00034907 0.0279253 0.0872665 0.174533 2.0944)
              y=(0.0234116 0.0237613 0.0251141 0.0252795 0.0253146 0.0249184 0.0242373 0.0238447 0.0234197 0.0227644 0.020984 0.0209814 0.0209788 0.0205225 0.0191754 0.0159554 -0.0673774)
        z_location: MultiplierFunction: scale=0.988523
          SimmSpline: x=(-2.0944 0.1745) y=(-0.0014 -0.0014)
    Millard2012EquilibriumMuscle vasti_l: max_isometric_force=5000 optimal_fiber_length=0.1246787
        tendon_slack_length=0.1351657 pennation_angle_at_optimal=0.05235988
      PathPoint vas_int_l-P1: socket_parent_frame_connectee_name=../../../femur_l (0.03327 -0.220729 -0.0355644)
      PathPoint vas_int_l-P2: socket_parent_frame_connectee_name=../../../femur_l (0.0384325 -0.239085 -0.0326963)
      ConditionalPathPoint vas_int_l-P3: socket_parent_frame_connectee_name=../../../femur_l
          (0.0393503 -0.462338 -0.00630982) socket_coordinate_connectee_name=../../../knee_l/knee_angle_l
          range=(-2.61799 -1.42)
      MovingPathPoint vas_int_l-P4: socket_parent_frame_connectee_name=../../../tibia_l
          socket_x_coordinate_connectee_name=../../../knee_l/knee_angle_l
          socket_y_coordinate_connectee_name=../../../knee_l/knee_angle_l
          socket_z_coordinate_connectee_name=../../../knee_l/knee_angle_l
        x_location: MultiplierFunction: scale=0.988523
          SimmSpline: x=(-2.0944 -1.99997 -1.5708 -1.45752 -1.39626 -1.0472 -0.698132 -0.526391 -0.349066 -0.174533 0 0.00017453 0.00034907 0.0279253 0.0872665 0.174533 2.0944)
              y=(0.0082733 0.0106866 0.0202042 0.022353 0.0234583 0.0292715 0.0349465 0.037871 0.0412569 0.0465287 0.0554632 0.0554735 0.0554837 0.0571717 0.061272 0.0684368 0.0648818)
        y_location: MultiplierFunction: scale=0.988523
          SimmSpline: x=(-2.0944 -1.99997 -1.5708 -1.45752 -1.39626 -1.0472 -0.698132 -0.526391 -0.349066 -0.174533 0 0.00017453 0.00034907 0.0279253 0.0872665 0.174533 2.0944)
              y=(0.025599 0.0259487 0.0273124 0.0274796 0.0275151 0.0271363 0.0265737 0.0263073 0.0261187 0.0260129 0.0252923 0.0252911 0.0252898 0.0250526 0.0242191 0.0218288 -0.0685706)
        z_location: MultiplierFunction: scale=0.988523
          SimmSpline: x=(-2.0944 2.0944) y=(-0.0018 -0.0018)
    Millard2012EquilibriumMuscle gastroc_l: max_isometric_force=2500 optimal_fiber_length=0.09012875
        tendon_slack_length=0.360515 pennation_angle_at_optimal=0.296706
      PathPoint med_gas_l-P1: socket_parent_frame_connectee_name=../../../femur_l (-0.0217976 -0.450751 0.0269601)
      ConditionalPathPoint med_gas_l-P2: socket_parent_frame_connectee_name=../../../femur_l
          (-0.0344172 -0.46142 0.0295988) socket_coordinate_connectee_name=../../../knee_l/knee_angle_l
          range=(-0.785398 0.174533)
      PathPoint med_gas_l-P3: socket_parent_frame_connectee_name=../../../calcn_l (0 0.0318395 0.00544352)
    Millard2012EquilibriumMuscle soleus_l: max_isometric_force=5137 optimal_fiber_length=0.05028884
        tendon_slack_length=0.2514442 pennation_angle_at_optimal=0.4363323
      PathPoint P1: socket_parent_frame_connectee_name=../../../tibia_l (-0.00237246 -0.151541 -0.00701851)
      PathPoint P2: socket_parent_frame_connectee_name=../../../calcn_l (0 0.0318395 0.00544352)
    Millard2012EquilibriumMuscle tib_ant_l: max_isometric_force=3000 optimal_fiber_length=0.09791257
        tendon_slack_length=0.2228011 pennation_angle_at_optimal=0.08726646
      PathPoint P1: socket_parent_frame_connectee_name=../../../tibia_l (0.0176946 -0.160536 -0.011368)
      PathPoint P2: socket_parent_frame_connectee_name=../../../tibia_l (0.0325224 -0.390565 0.0174969)
      PathPoint P3: socket_parent_frame_connectee_name=../../../calcn_l (0.119758 0.018282 0.0313259)
    CoordinateLimitForce AnkleLimitSpringDamper: coordinate=ankle_angle_r upper_stiffness=30 [N*m/degree]
        upper_limit=5 [degrees] lower_stiffness=1 [N*m/degree] lower_limit=-90 [degrees] damping=0.01
        transition=2 [degrees]
    PointActuator FX: body=pelvis point=(-0.034 0 0) point_is_global=false direction=(1 0 0) force_is_global=true
        optimal_force=1
    PointActuator FY: body=pelvis point=(-0.034 0 0) point_is_global=false direction=(0 1 0) force_is_global=true
        optimal_force=1
    TorqueActuator MZ: bodyA=pelvis bodyB=ground torque_is_global=true axis=(0 0 1) optimal_force=1
    CoordinateActuator hip_flexion_r_reserve: coordinate=hip_flexion_r optimal_force=1
    CoordinateActuator knee_angle_r_reserve: coordinate=knee_angle_r optimal_force=1
    CoordinateActuator ankle_angle_r_reserve: coordinate=ankle_angle_r optimal_force=1
    CoordinateActuator hip_flexion_l_reserve: coordinate=hip_flexion_l optimal_force=1
    CoordinateActuator knee_angle_l_reserve: coordinate=knee_angle_l optimal_force=1
    CoordinateActuator ankle_angle_l_reserve: coordinate=ankle_angle_l optimal_force=1
    CoordinateActuator lumbar_extension_reserve: coordinate=lumbar_extension optimal_force=1
  MarkerSet:
    Marker Sternum: socket_parent_frame_connectee_name=../torso (0.103606 0.312439 1.04318e-6)
    Marker R.Acromium: socket_parent_frame_connectee_name=../torso (-0.0248718 0.426445 0.168585)
    Marker L.Acromium: socket_parent_frame_connectee_name=../torso (-0.0220089 0.440789 -0.171971)
    Marker Top.Head: socket_parent_frame_connectee_name=../torso (0.0595133 0.699598 0.0105017)
    Marker R.ASIS: socket_parent_frame_connectee_name=../pelvis (0.0228989 0.0358624 0.130116)
    Marker L.ASIS: socket_parent_frame_connectee_name=../pelvis (0.0291329 0.0276591 -0.131894)
    Marker V.Sacral: socket_parent_frame_connectee_name=../pelvis (-0.172091 0.0400029 0.00619843)
    Marker R.Thigh.Upper: socket_parent_frame_connectee_name=../femur_r (0.0507116 -0.220081 0.0883855)
    Marker R.Thigh.Front: socket_parent_frame_connectee_name=../femur_r (0.107902 -0.281747 -0.00690114)
    Marker R.Thigh.Rear: socket_parent_frame_connectee_name=../femur_r (0.0395109 -0.340915 0.0789543)
    Marker R.Knee.Lat: socket_parent_frame_connectee_name=../femur_r (-0.000586415 -0.426232 0.0605411)
    Marker R.Knee.Med: socket_parent_frame_connectee_name=../femur_r (-0.00243031 -0.442908 -0.0607482)
    Marker R.Shank.Upper: socket_parent_frame_connectee_name=../tibia_r (-0.0233139 -0.0603613 0.070733)
    Marker R.Shank.Front: socket_parent_frame_connectee_name=../tibia_r (0.0516752 -0.0954298 0.0163046)
    Marker R.Shank.Rear: socket_parent_frame_connectee_name=../tibia_r (-0.00738164 -0.145526 0.0800029)
    Marker R.Ankle.Lat: socket_parent_frame_connectee_name=../tibia_r (-0.00490543 -0.430843 0.0549207)
    Marker R.Ankle.Med: socket_parent_frame_connectee_name=../tibia_r (0.00286259 -0.416327 -0.034325)
    Marker R.Heel: socket_parent_frame_connectee_name=../calcn_r (-0.0204819 0.0172884 -0.00503735)
    Marker R.Midfoot.Sup: socket_parent_frame_connectee_name=../calcn_r (0.122708 0.0309658 -0.0403332)
    Marker R.Midfoot.Lat: socket_parent_frame_connectee_name=../calcn_r (0.117766 0.011129 0.0669726)
    Marker R.Toe.Lat: socket_parent_frame_connectee_name=../calcn_r (0.207693 -0.0114107 0.0760669)
    Marker R.Toe.Med: socket_parent_frame_connectee_name=../calcn_r (0.209814 0.00169807 -0.0323684)
    Marker R.Toe.Tip: socket_parent_frame_connectee_name=../calcn_r (0.270734 0.00315005 -0.000612297)
    Marker L.Thigh.Upper: socket_parent_frame_connectee_name=../femur_l (0.0358442 -0.20749 -0.0932573)
    Marker L.Thigh.Front: socket_parent_frame_connectee_name=../femur_l (0.114084 -0.249177 -0.0175704)
    Marker L.Thigh.Rear: socket_parent_frame_connectee_name=../femur_l (0.025891 -0.316213 -0.0778532)
    Marker L.Knee.Lat: socket_parent_frame_connectee_name=../femur_l (-0.000753513 -0.446142 -0.062296)
    Marker L.Knee.Med: socket_parent_frame_connectee_name=../femur_l (0.000472512 -0.445432 0.0539506)
    Marker L.Shank.Upper: socket_parent_frame_connectee_name=../tibia_l (0.00398588 -0.071611 -0.0777086)
    Marker L.Shank.Front: socket_parent_frame_connectee_name=../tibia_l (0.0481427 -0.121536 -0.0223037)
    Marker L.Shank.Rear: socket_parent_frame_connectee_name=../tibia_l (-0.0132436 -0.114739 -0.0885072)
    Marker L.Ankle.Lat: socket_parent_frame_connectee_name=../tibia_l (0.00383431 -0.428451 -0.0544338)
    Marker L.Ankle.Med: socket_parent_frame_connectee_name=../tibia_l (0.0078901 -0.405161 0.0369253)
    Marker L.Heel: socket_parent_frame_connectee_name=../calcn_l (-0.0226192 0.0268643 0.00786188)
    Marker L.Midfoot.Sup: socket_parent_frame_connectee_name=../calcn_l (0.149706 0.0307045 0.0342606)
    Marker L.Midfoot.Lat: socket_parent_frame_connectee_name=../calcn_l (0.131321 0.0305726 -0.064363)
    Marker L.Toe.Lat: socket_parent_frame_connectee_name=../calcn_l (0.194745 0.00778416 -0.0748386)
    Marker L.Toe.Med: socket_parent_frame_connectee_name=../calcn_l (0.211787 0.00788619 0.0273165)
    Marker L.Toe.Tip: socket_parent_frame_connectee_name=../calcn_l (0.260978 0.00906907 0.00201318)
