# OpenSim document version 30000
AnalyzeTool subject02_running_arms:
  model_file: subject02_running_RRA_cycle02_sim02_07_v232.osim
  replace_force_set: false
  force_set_files: gait2392_CMC_Actuators_232.xml
  results_directory: ResultsInducedAccelerations
  output_precision: 8
  initial_time: 0.74
  final_time: 1.02
  external_loads_file: subject02_grf_HiFreq.xml
  states_file: subject02_running_CMC_states.sto
  lowpass_cutoff_frequency_for_coordinates: -1
  AnalysisSet Analyses:
    InducedAccelerations: start_time=-Inf end_time=Inf step_interval=40 in_degrees=true body_names=center_of_mass
        force_threshold=15 [N] compute_potentials_only=false report_constraint_reactions=false
      ConstraintSet:
        RollingOnSurfaceConstraint right_foot_contact: isDisabled=true rolling_body=calcn_r surface_body=ground
            surface_normal=(0 1 0) surface_normal=(0 1 0) friction_coefficient=0.65 contact_radius=0.01
        RollingOnSurfaceConstraint left_foot_contact: isDisabled=true rolling_body=calcn_l surface_body=ground
            surface_normal=(0 1 0) surface_normal=(0 1 0) friction_coefficient=0.65 contact_radius=0.01
  ControllerSet Controllers:
    ControlSetController: controls_file=subject02_running_CMC_controls.xml
