# OpenSim document version 20302
ControlSet Control Set:
  ControlLinear Torq1: is_model_control=true extrapolate=true
    x_nodes:
      ControlLinearNode: t=0 value=0.75
      ControlLinearNode: t=2 value=0.75
  ControlLinear Torq2: is_model_control=true extrapolate=true
    x_nodes:
      ControlLinearNode: t=0 value=0.5
      ControlLinearNode: t=0.0015969 value=0.5
      ControlLinearNode: t=2 value=0.5
