# OpenSim document version 20302
CMC_TaskSet arm26:
  defaults: CMC_Joint default: on=false weight=(1 1 1) wrt_body=-1 express_body=-1 active=(false false false)
      kp=(1 1 1) kv=(1 1 1) ka=(1 1 1) r0=(0 0 0) r1=(0 0 0) r2=(0 0 0) limit=0
  CMC_Joint r_shoulder_elev: weight=(1 1 1) wrt_body=-1 express_body=-1 active=(true false false) kp=(100 1 1)
      kv=(20 1 1) ka=(1 1 1) r0=(0 0 0) r1=(0 0 0) r2=(0 0 0) coordinate=r_shoulder_elev limit=0
  CMC_Joint r_elbow_flex: weight=(1 1 1) wrt_body=-1 express_body=-1 active=(true false false) kp=(100 1 1) kv=(20 1 1)
      ka=(1 1 1) r0=(0 0 0) r1=(0 0 0) r2=(0 0 0) coordinate=r_elbow_flex limit=0
