# OpenSim document version 30000
CMC_TaskSet arm26:
  datafile: muscle_emg.sto
  CMC_Joint r_shoulder_elev: weight=1 wrt_body=-1 express_body=-1 active=(true false false) kp=100 kv=20
      coordinate=r_shoulder_elev
  CMC_Joint r_elbow_flex: weight=1 wrt_body=-1 express_body=-1 active=(true false false) kp=100 kv=20
      coordinate=r_elbow_flex
  MuscleStateTrackingTask BIClong.activation: weight=(100 0 0)
