# OpenSim document version 20302
Model block_hanging_RigidTendonMuscle:
  credits: Developed by Ajay Seth for unit testing of CMC algorithm
  publications: List of publications related to model...
  length_units: meters
  force_units: N
  gravity: 0 -9.80665 0
  ForceSet:
    RigidTendonMuscle muscle: min_control=0 max_control=1 optimal_force=1 max_isometric_force=100
        optimal_fiber_length=0.11 tendon_slack_length=0.19 pennation_angle_at_optimal=0 max_contraction_velocity=10
      PathPoint P1: ground (0 0 0)
      PathPoint P2: block (0 0.1 0)
      active_force_length_curve: NaturalCubicSpline: x=(-5.307692 -4.307692 -1.923077 -0.884615 -0.269231 0.230769 0.461538 0.52725 0.62875 0.71875 0.86125 1.045 1.2175 1.43875 1.5 1.615385 2 2.961538 3.692308 5.461538 9.901902)
          y=(0.012188 0.021899 0.036466 0.052493 0.075312 0.114158 0.157859 0.226667 0.636667 0.856667 0.95 0.993333 0.77 0.246667 0.193821 0.133252 0.072683 0.044417 0.036341 0.021899 0.007332)
      passive_force_length_curve: NaturalCubicSpline: x=(-5 0.998 0.999 1 1.1 1.2 1.3 1.4 1.5 1.6 1.601 1.602 5)
          y=(0 0 0 0 0.035 0.12 0.26 0.55 1.17 2 2 2 2)
      force_velocity_curve: NaturalCubicSpline: x=(-1.001 -1 -0.95 -0.9 -0.85 -0.8 -0.75 -0.7 -0.65 -0.6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)
          y=(0 0 0.010417 0.021739 0.034091 0.047619 0.0625 0.078947 0.097222 0.117647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)
  BodySet:
    Body ground: mass=0 mass_center=(0 0 0) inertia_xx=0 inertia_yy=0 inertia_zz=0
    Body block: mass=1 mass_center=(0 0 0) inertia_xx=0.01666667 inertia_yy=0.01666667 inertia_zz=0.01666667
        meshes=small_block.vtp
      CustomJoint ground_block: parent_body=ground location_in_parent=(0 0 0) location=(0 0 0)
        Coordinate block_ty: motion_type=translational default_value=-0.35 initial_value=-0.35 range=(-1 -0.1)
            clamped=true
        SpatialTransform: axes_held_at_zero=(rotation1 rotation2 rotation3 translation2 translation3)
          TransformAxis translation1: coordinates=block_ty axis=(0 1 0) LinearFunction(coefficients=1 0)
