# OpenSim document version 10902
Model block_hanging_from_muscle:
  credits: Developed by Ajay Seth for unit testing of CMC algorithm
  publications: List of publications related to model...
  length_units: meters
  force_units: N
  gravity: 0 -9.80665 0
  defaults: Thelen2003Muscle default: min_control=0 max_control=1 optimal_force=1 max_isometric_force=546
      optimal_fiber_length=0.0535 tendon_slack_length=0.078 pennation_angle_at_optimal=0 max_contraction_velocity=10
      activation_time_constant=0.01 deactivation_time_constant=0.04 Vmax=10 Vmax0=5 FmaxTendonStrain=0.033
      FmaxMuscleStrain=0.6 KshapeActive=0.5 KshapePassive=4 damping=0.05 Af=0.3 Flen=1.8
  ForceSet:
    Thelen2003Muscle muscle: max_isometric_force=10000 optimal_fiber_length=0.1 tendon_slack_length=0.2
        pennation_angle_at_optimal=0 activation_time_constant=0.01 deactivation_time_constant=0.04 Vmax=10 Vmax0=5
        FmaxTendonStrain=0.033 FmaxMuscleStrain=0.6 KshapeActive=0.5 KshapePassive=4 damping=0.05 Af=0.3 Flen=1.8
      PathPoint P1: ground (0 0 0)
      PathPoint P2: block (0 0.1 0)
  BodySet:
    Body ground: mass=0 mass_center=(0 0 0) inertia_xx=0 inertia_yy=0 inertia_zz=0
    Body block: mass=100 mass_center=(0 0 0) inertia_xx=0.01666667 inertia_yy=0.01666667 inertia_zz=0.01666667
        meshes=small_block.vtp
      CustomJoint ground_block: parent_body=ground location_in_parent=(0 0 0) location=(0 0 0)
        Coordinate block_ty: motion_type=translational default_value=-0.4246201 initial_value=-0.4246201
            range=(-1 -0.1) clamped=true
        SpatialTransform: axes_held_at_zero=(rotation1 rotation2 rotation3 translation2 translation3)
          TransformAxis translation1: coordinates=block_ty axis=(0 1 0) LinearFunction(coefficients=1 0)
