# OpenSim document version 30000
ForwardTool block_hanging_from_muscle:
  model_file: block_hanging_from_muscle.osim
  replace_force_set: false
  results_directory: block_hanging_from_muscle_ForwardResults
  output_precision: 10
  initial_time: 0
  final_time: 1
  solve_for_equilibrium_for_auxiliary_states: true
  maximum_number_of_integrator_steps: 30000
  maximum_integrator_step_size: 1
  minimum_integrator_step_size: 1e-12
  integrator_error_tolerance: 1e-8
  use_specified_dt: false
  AnalysisSet Analyses:
    ForceReporter: start_time=0 end_time=1 step_interval=1 in_degrees=true include_constraint_forces=false
  ControllerSet:
    ControlSetController: controls_file=block_hanging_from_muscle_controls.sto
