# OpenSim document version 30000
CMC_TaskSet gait10dof_kinematics_tracking_tasks:
  CMC_Joint [values shared by the 10 below unless stated]: active=(true false false) kp=100 kv=20
  CMC_Joint pelvis_tx: weight=500 coordinate=pelvis_tx
  CMC_Joint pelvis_ty: weight=250 coordinate=pelvis_ty
  CMC_Joint pelvis_tilt: weight=700 wrt_body=-1 express_body=-1 coordinate=pelvis_tilt
  CMC_Joint hip_flexion_r: weight=250 coordinate=hip_flexion_r
  CMC_Joint knee_angle_r: weight=200 coordinate=knee_angle_r
  CMC_Joint ankle_angle_r: weight=400 coordinate=ankle_angle_r
  CMC_Joint hip_flexion_l: weight=250 coordinate=hip_flexion_l
  CMC_Joint knee_angle_l: weight=200 coordinate=knee_angle_l
  CMC_Joint ankle_angle_l: weight=400 coordinate=ankle_angle_l
  CMC_Joint lumbar_extension: weight=500 coordinate=lumbar_extension
