# OpenSim document version 30000
ForceSet gait2354_CMC:
  defaults: CoordinateActuator default: optimal_force=1000
  PointActuator FX: body=pelvis point=(-0.0724376 0 0) point_is_global=false direction=(-1 0 0) force_is_global=true
      optimal_force=100
  PointActuator FY: body=pelvis point=(-0.0724376 0 0) point_is_global=false direction=(0 -1 0) force_is_global=true
      optimal_force=200
  PointActuator FZ: body=pelvis point=(-0.0724376 0 0) point_is_global=false direction=(0 0 -1) force_is_global=true
      optimal_force=100
  TorqueActuator MX: bodyA=pelvis bodyB=ground torque_is_global=true axis=(-1 0 0) optimal_force=80
  TorqueActuator MY: bodyA=pelvis bodyB=ground torque_is_global=true axis=(0 -1 0) optimal_force=80
  TorqueActuator MZ: bodyA=pelvis bodyB=ground torque_is_global=true axis=(0 0 -1) optimal_force=80
  CoordinateActuator ankle_angle_r_reserve: coordinate=ankle_angle_r optimal_force=1
  CoordinateActuator subtalar_angle_r_reserve: coordinate=subtalar_angle_r optimal_force=1
  CoordinateActuator mtp_angle_r_reserve: coordinate=mtp_angle_r optimal_force=100
  CoordinateActuator ankle_angle_l_reserve: coordinate=ankle_angle_l optimal_force=1
  CoordinateActuator subtalar_angle_l_reserve: coordinate=subtalar_angle_l optimal_force=1
  CoordinateActuator mtp_angle_l_reserve: coordinate=mtp_angle_l optimal_force=100
