# OpenSim document version 20302
ControlSet Control Set:
  defaults: ControlLinear default: is_model_control=true extrapolate=false default_min=0.02 default_max=1
      filter_on=false use_steps=true kp=100 kv=20
  ControlLinear [values shared by the 121 below unless stated]: is_model_control=true extrapolate=false default_max=1
      filter_on=false kp=100 kv=20 use_steps=true default_min=0.02
  ControlLinear FX.excitation: default_min=-1 use_steps=false
  ControlLinear FY.excitation: default_min=-1 use_steps=false
  ControlLinear FZ.excitation: default_min=-1 use_steps=false
  ControlLinear MX.excitation: default_min=-1 use_steps=false
  ControlLinear MY.excitation: default_min=-1 use_steps=false
  ControlLinear MZ.excitation: default_min=-1 use_steps=false
  ControlLinear hip_flexion_r_reserve.excitation: default_min=-100 default_max=100
  ControlLinear hip_adduction_r_reserve.excitation: default_min=-100 default_max=100
  ControlLinear hip_rotation_r_reserve.excitation: default_min=-100 default_max=100
  ControlLinear knee_angle_r_reserve.excitation: default_min=-100 default_max=100
  ControlLinear ankle_angle_r_reserve.excitation: default_min=-1000 default_max=1000
  ControlLinear hip_flexion_l_reserve.excitation: default_min=-100 default_max=100
  ControlLinear hip_adduction_l_reserve.excitation: default_min=-100 default_max=100
  ControlLinear hip_rotation_l_reserve.excitation: default_min=-100 default_max=100
  ControlLinear knee_angle_l_reserve.excitation: default_min=-100 default_max=100
  ControlLinear ankle_angle_l_reserve.excitation: default_min=-1000 default_max=1000
  ControlLinear lumbar_extension_reserve.excitation: default_min=-1000 default_max=1000
  ControlLinear lumbar_bending_reserve.excitation: default_min=-1000 default_max=1000
  ControlLinear lumbar_rotation_reserve.excitation: default_min=-1000 default_max=1000
  ControlLinear arm_flex_r.excitation: default_min=-1000 default_max=1000
  ControlLinear arm_add_r.excitation: default_min=-1000 default_max=1000
  ControlLinear arm_rot_r.excitation: default_min=-1000 default_max=1000
  ControlLinear elbow_flex_r.excitation: default_min=-1000 default_max=1000
  ControlLinear pro_sup_r.excitation: default_min=-1000 default_max=1000
  ControlLinear arm_flex_l.excitation: default_min=-1000 default_max=1000
  ControlLinear arm_add_l.excitation: default_min=-1000 default_max=1000
  ControlLinear arm_rot_l.excitation: default_min=-1000 default_max=1000
  ControlLinear elbow_flex_l.excitation: default_min=-1000 default_max=1000
  ControlLinear pro_sup_l.excitation: default_min=-1000 default_max=1000
  ControlLinear glut_med1_r.excitation:
    min_nodes:
      ControlLinearNode: t=0.82 value=0.01
      ControlLinearNode: t=1.3049 value=0.01
      ControlLinearNode: t=1.5098 value=0.01
    max_nodes:
      ControlLinearNode: t=0.82 value=0.02
      ControlLinearNode: t=1.3049 value=1
      ControlLinearNode: t=1.5098 value=0.02
  ControlLinear glut_med2_r.excitation:
    min_nodes:
      ControlLinearNode: t=0.82 value=0.01
      ControlLinearNode: t=1.3049 value=0.01
      ControlLinearNode: t=1.5098 value=0.01
    max_nodes:
      ControlLinearNode: t=0.82 value=0.02
      ControlLinearNode: t=1.3049 value=1
      ControlLinearNode: t=1.5098 value=0.02
  ControlLinear glut_med3_r.excitation:
    min_nodes:
      ControlLinearNode: t=0.82 value=0.01
      ControlLinearNode: t=1.3049 value=0.01
      ControlLinearNode: t=1.5098 value=0.01
    max_nodes:
      ControlLinearNode: t=0.82 value=0.02
      ControlLinearNode: t=1.3049 value=1
      ControlLinearNode: t=1.5098 value=0.02
  ControlLinear glut_min1_r.excitation
  ControlLinear glut_min2_r.excitation
  ControlLinear glut_min3_r.excitation
  ControlLinear semimem_r.excitation:
    min_nodes:
      ControlLinearNode: t=0.89 value=0.01
      ControlLinearNode: t=1.2366 value=0.01
      ControlLinearNode: t=1.5781 value=0.01
    max_nodes:
      ControlLinearNode: t=0.89 value=0.5
      ControlLinearNode: t=1.2366 value=1
      ControlLinearNode: t=1.5781 value=1
  ControlLinear semiten_r.excitation:
    min_nodes:
      ControlLinearNode: t=0.89 value=0.01
      ControlLinearNode: t=1.2366 value=0.01
      ControlLinearNode: t=1.5781 value=0.01
    max_nodes:
      ControlLinearNode: t=0.89 value=0.5
      ControlLinearNode: t=1.2366 value=1
      ControlLinearNode: t=1.5781 value=0.5
  ControlLinear bifemlh_r.excitation:
    min_nodes:
      ControlLinearNode: t=0.96 value=0.01
      ControlLinearNode: t=1.3049 value=0.01
      ControlLinearNode: t=1.589 value=0.01
    max_nodes:
      ControlLinearNode: t=0.96 value=0.02
      ControlLinearNode: t=1.3049 value=1
      ControlLinearNode: t=1.589 value=0.02
  ControlLinear bifemsh_r.excitation:
    min_nodes:
      ControlLinearNode: t=0.96 value=0.01
      ControlLinearNode: t=1.3049 value=0.01
      ControlLinearNode: t=1.589 value=0.01
    max_nodes:
      ControlLinearNode: t=0.96 value=0.02
      ControlLinearNode: t=1.3049 value=1
      ControlLinearNode: t=1.589 value=0.02
  ControlLinear sar_r.excitation:
    min_nodes:
      ControlLinearNode: t=1.03 value=0.01
      ControlLinearNode: t=1.2708 value=0.01
      ControlLinearNode: t=1.589 value=0.01
    max_nodes:
      ControlLinearNode: t=1.03 value=0.02
      ControlLinearNode: t=1.2708 value=1
      ControlLinearNode: t=1.589 value=0.02
  ControlLinear add_long_r.excitation
  ControlLinear add_brev_r.excitation
  ControlLinear add_mag1_r.excitation
  ControlLinear add_mag2_r.excitation
  ControlLinear add_mag3_r.excitation
  ControlLinear tfl_r.excitation:
    min_nodes:
      ControlLinearNode: t=1.1683 value=0.01
      ControlLinearNode: t=1.3049 value=0.01
    max_nodes:
      ControlLinearNode: t=1.1683 value=1
      ControlLinearNode: t=1.3049 value=0.02
  ControlLinear pect_r.excitation
  ControlLinear grac_r.excitation
  ControlLinear glut_max1_r.excitation
  ControlLinear glut_max2_r.excitation
  ControlLinear glut_max3_r.excitation
  ControlLinear iliacus_r.excitation
  ControlLinear psoas_r.excitation
  ControlLinear quad_fem_r.excitation
  ControlLinear gem_r.excitation
  ControlLinear peri_r.excitation
  ControlLinear rect_fem_r.excitation
  ControlLinear vas_med_r.excitation
  ControlLinear vas_int_r.excitation
  ControlLinear vas_lat_r.excitation
  ControlLinear med_gas_r.excitation:
    min_nodes:
      ControlLinearNode: t=1.08 value=0.01
      ControlLinearNode: t=1.3391 value=0.01
      ControlLinearNode: t=1.589 value=0.01
    max_nodes:
      ControlLinearNode: t=1.08 value=0.02
      ControlLinearNode: t=1.3391 value=1
      ControlLinearNode: t=1.589 value=0.02
  ControlLinear lat_gas_r.excitation:
    min_nodes:
      ControlLinearNode: t=1.08 value=0.01
      ControlLinearNode: t=1.3391 value=0.01
      ControlLinearNode: t=1.589 value=0.01
    max_nodes:
      ControlLinearNode: t=1.08 value=0.02
      ControlLinearNode: t=1.3391 value=1
      ControlLinearNode: t=1.589 value=0.02
  ControlLinear soleus_r.excitation
  ControlLinear tib_post_r.excitation
  ControlLinear flex_dig_r.excitation
  ControlLinear flex_hal_r.excitation
  ControlLinear tib_ant_r.excitation:
    min_nodes:
      ControlLinearNode: t=0.96 value=0.01
      ControlLinearNode: t=1.3049 value=0.01
      ControlLinearNode: t=1.589 value=0.01
    max_nodes:
      ControlLinearNode: t=0.96 value=0.02
      ControlLinearNode: t=1.3049 value=1
      ControlLinearNode: t=1.589 value=0.02
  ControlLinear per_brev_r.excitation
  ControlLinear per_long_r.excitation
  ControlLinear per_tert_r.excitation
  ControlLinear ext_dig_r.excitation
  ControlLinear ext_hal_r.excitation
  ControlLinear glut_med1_l.excitation:
    min_nodes:
      ControlLinearNode: t=0.9549 value=0.01
      ControlLinearNode: t=1.1598 value=0.01
    max_nodes:
      ControlLinearNode: t=0.9549 value=1
      ControlLinearNode: t=1.1598 value=0.02
  ControlLinear glut_med2_l.excitation:
    min_nodes:
      ControlLinearNode: t=0.9549 value=0.01
      ControlLinearNode: t=1.1598 value=0.01
    max_nodes:
      ControlLinearNode: t=0.9549 value=1
      ControlLinearNode: t=1.1598 value=0.02
  ControlLinear glut_med3_l.excitation:
    min_nodes:
      ControlLinearNode: t=0.9549 value=0.01
      ControlLinearNode: t=1.1598 value=0.01
    max_nodes:
      ControlLinearNode: t=0.9549 value=1
      ControlLinearNode: t=1.1598 value=0.02
  ControlLinear glut_min1_l.excitation
  ControlLinear glut_min2_l.excitation
  ControlLinear glut_min3_l.excitation
  ControlLinear semimem_l.excitation:
    min_nodes:
      ControlLinearNode: t=0.8866 value=0.01
      ControlLinearNode: t=1.2281 value=0.01
    max_nodes:
      ControlLinearNode: t=0.8866 value=1
      ControlLinearNode: t=1.2281 value=0.5
  ControlLinear semiten_l.excitation:
    min_nodes:
      ControlLinearNode: t=0.8866 value=0.01
      ControlLinearNode: t=1.2281 value=0.01
    max_nodes:
      ControlLinearNode: t=0.8866 value=1
      ControlLinearNode: t=1.2281 value=0.5
  ControlLinear bifemlh_l.excitation:
    min_nodes:
      ControlLinearNode: t=0.9549 value=0.01
      ControlLinearNode: t=1.2964 value=0.01
    max_nodes:
      ControlLinearNode: t=0.9549 value=1
      ControlLinearNode: t=1.2964 value=0.02
  ControlLinear bifemsh_l.excitation:
    min_nodes:
      ControlLinearNode: t=0.9549 value=0.01
      ControlLinearNode: t=1.2964 value=0.01
    max_nodes:
      ControlLinearNode: t=0.9549 value=1
      ControlLinearNode: t=1.2964 value=0.02
  ControlLinear sar_l.excitation:
    min_nodes:
      ControlLinearNode: t=0.9207 value=0.01
      ControlLinearNode: t=1.3647 value=0.01
    max_nodes:
      ControlLinearNode: t=0.9207 value=1
      ControlLinearNode: t=1.3647 value=0.05
  ControlLinear add_long_l.excitation
  ControlLinear add_brev_l.excitation
  ControlLinear add_mag1_l.excitation
  ControlLinear add_mag2_l.excitation
  ControlLinear add_mag3_l.excitation
  ControlLinear tfl_l.excitation:
    min_nodes:
      ControlLinearNode: t=0.9183 value=0.01
      ControlLinearNode: t=1.0549 value=0.01
    max_nodes:
      ControlLinearNode: t=0.9183 value=1
      ControlLinearNode: t=1.0549 value=0.2
  ControlLinear pect_l.excitation
  ControlLinear grac_l.excitation
  ControlLinear glut_max1_l.excitation
  ControlLinear glut_max2_l.excitation
  ControlLinear glut_max3_l.excitation
  ControlLinear iliacus_l.excitation
  ControlLinear psoas_l.excitation
  ControlLinear quad_fem_l.excitation
  ControlLinear gem_l.excitation
  ControlLinear peri_l.excitation
  ControlLinear rect_fem_l.excitation
  ControlLinear vas_med_l.excitation
  ControlLinear vas_int_l.excitation
  ControlLinear vas_lat_l.excitation
  ControlLinear med_gas_l.excitation:
    min_nodes:
      ControlLinearNode: t=0.989 value=0.01
      ControlLinearNode: t=1.44 value=0.01
    max_nodes:
      ControlLinearNode: t=0.989 value=1
      ControlLinearNode: t=1.44 value=0.02
  ControlLinear lat_gas_l.excitation:
    min_nodes:
      ControlLinearNode: t=0.989 value=0.01
      ControlLinearNode: t=1.44 value=0.01
    max_nodes:
      ControlLinearNode: t=0.989 value=1
      ControlLinearNode: t=1.44 value=0.02
  ControlLinear soleus_l.excitation
  ControlLinear tib_post_l.excitation
  ControlLinear flex_dig_l.excitation
  ControlLinear flex_hal_l.excitation
  ControlLinear tib_ant_l.excitation:
    min_nodes:
      ControlLinearNode: t=0.9549 value=0.01
      ControlLinearNode: t=1.2964 value=0.01
    max_nodes:
      ControlLinearNode: t=0.9549 value=1
      ControlLinearNode: t=1.2964 value=0.5
  ControlLinear per_brev_l.excitation
  ControlLinear per_long_l.excitation
  ControlLinear per_tert_l.excitation
  ControlLinear ext_dig_l.excitation
  ControlLinear ext_hal_l.excitation
  ControlLinear ercspn_r.excitation
  ControlLinear ercspn_l.excitation
  ControlLinear intobl_r.excitation
  ControlLinear intobl_l.excitation
  ControlLinear extobl_r.excitation
  ControlLinear extobl_l.excitation
