# OpenSim document version 20302
CMCTool runningModel_CMC_test:
  model_file: runningModel_CMC_test.osim
  replace_force_set: false
  force_set_files: runningModel_CMC_Actuators.xml
  results_directory: runningModel_CMC_Results
  output_precision: 8
  initial_time: 0.862
  final_time: 1.25
  solve_for_equilibrium_for_auxiliary_states: true
  maximum_number_of_integrator_steps: 30000
  maximum_integrator_step_size: 1
  minimum_integrator_step_size: 0.00000001
  integrator_error_tolerance: 0.00001
  external_loads_file: runningModel_GRF.xml
  desired_kinematics_file: runningModel_Kinematics_q.sto
  task_set_file: runningModel_CMC_Tasks.xml
  constraints_file: runningModel_ControlConstraints.xml
  lowpass_cutoff_frequency: -1
  cmc_time_window: 0.01
  use_fast_optimization_target: true
  optimizer_algorithm: cfsqp
  numerical_derivative_step_size: 0.0001
  optimization_convergence_tolerance: 0.0001
  optimizer_max_iterations: 2000
  optimizer_print_level: 0
  use_verbose_printing: false
  AnalysisSet Analyses:
    Kinematics: start_time=0.862 end_time=1.545 step_interval=10 in_degrees=true coordinates=all
    Actuation: start_time=0.862 end_time=1.545 step_interval=10 in_degrees=true
