# OpenSim document version 20302
CMCTool subject02_running_CMC:
  model_file: subject02_running_RRA_cycle02_07_v18.osim
  replace_force_set: false
  force_set_files: gait2392_CMC_Actuators.xml
  results_directory: CMC_Running_Results
  output_precision: 8
  initial_time: 0.7
  final_time: 1
  solve_for_equilibrium_for_auxiliary_states: true
  maximum_number_of_integrator_steps: 30000
  maximum_integrator_step_size: 1
  minimum_integrator_step_size: 1e-8
  integrator_error_tolerance: 1e-5
  external_loads_file: subject02_running_grf.xml
  desired_kinematics_file: subject02_running_RRA_Kinematics_q.sto
  task_set_file: gait2392_CMC_Tasks.xml
  constraints_file: gait2392_CMC_ControlConstraints_v1_5_5.xml
  lowpass_cutoff_frequency: -1
  cmc_time_window: 0.01
  use_curvature_filter: false
  use_fast_optimization_target: true
  optimizer_algorithm: cfsqp
  numerical_derivative_step_size: 1e-8
  optimization_convergence_tolerance: 1e-5
  optimizer_max_iterations: 1000
  optimizer_print_level: 0
  use_verbose_printing: false
  AnalysisSet Analyses:
    Kinematics: start_time=0.7 end_time=1.6 step_interval=10 in_degrees=true coordinates=all
    Actuation: start_time=0.7 end_time=1.1 step_interval=10 in_degrees=true
