Model subject02_RRA_adjusted:
  length_units: meters
  force_units: N
  credits:
    Delp S.L., Loan J.P., Hoy M.G., Zajac F.E., Topp E.L., Rosen J.M., Thelen D.G., Anderson F.C., Seth A., Hamner S.R.
  publications:
    Notes: 3D, 23 DOF gait model created by D.G. Thelen, Univ. of Wisconsin-Madison, and Ajay Seth, Frank C. Anderson, and Scott L. Delp, Stanford University. Lower extremity joint defintions based on Delp et al. (1990). Low back joint and anthropometry based on Anderson and Pandy (1999, 2001). Planar knee model of Yamaguchi and Zajac (1989). Seth removed the patella to avoid kinematic constraints; insertions of the quadrucepts are handled with moving points in the tibia frame.
    Delp, S.L., Loan, J.P., Hoy, M.G., Zajac, F.E., Topp E.L., Rosen, J.M.: An interactive graphics-based model of the lower extremity to study orthopaedic surgical procedures, IEEE Transactions on Biomedical Engineering, vol. 37, pp. 757-767, 1990.
    Yamaguchi G.T., Zajac F.E.: A planar model of the knee joint to characterize the knee extensor mechanism." J . Biomecl7. vol. 21. pp. 1-10. 1989.
    Anderson F.C., Pandy M.G.: A dynamic optimization solution for vertical jumping in three dimensions. Computer Methods in Biomechanics and Biomedical Engineering 2:201-231, 1999.
    Anderson F.C., Pandy M.G.: Dynamic optimization of human walking. Journal of Biomechanical Engineering 123:381-390, 2001.
  defaults: Thelen2003Muscle default: muscle_model=9 max_isometric_force=0 optimal_fiber_length=0 tendon_slack_length=0
      pennation_angle=0 activation_time_constant=0.01 deactivation_time_constant=0.04 Vmax=10 Vmax0=5
      FmaxTendonStrain=0.033 FmaxMuscleStrain=0.6 KshapeActive=0.5 KshapePassive=4 damping=0.05 Af=0.3 Flen=1.8
  DynamicsEngine:
    SimbodyEngine: gravity=(0 -9.80665 0)
      BodySet:
        SimbodyBody ground: mass=0 mass_center=(0 0 0) inertia=(0 0 0 0 0 0 0 0 0)
        SimbodyBody pelvis: mass=10.43488 mass_center=(-0.06998123 0 0)
            inertia=(0.08924215 0 0 0 0.07561276 0 0 0 0.05026382) meshes=(sacrum.vtp pelvis.vtp l_pelvis.vtp)
        SimbodyBody femur_r: mass=8.241399 mass_center=(0 -0.1797682 0)
            inertia=(0.1326664 0 0 0 0.03477664 0 0 0 0.1398992) meshes=femur_r.vtp
        SimbodyBody tibia_r: mass=3.284988 mass_center=(0 -0.2071696 0)
            inertia=(0.0549853 0 0 0 0.00556399 0 0 0 0.05574899) meshes=(tibia_r.vtp fibula_r.vtp)
        SimbodyBody talus_r: mass=0.08860385 mass_center=(0 0 0) inertia=(0.00109098 0 0 0 0.00109098 0 0 0 0.00109098)
            meshes=talus_rv.vtp
        SimbodyBody calcn_r: mass=1.107548 mass_center=(0.1004599 0.03013797 0)
            inertia=(0.00125189 0 0 0 0.00348741 0 0 0 0.00366625) meshes=foot.vtp
        SimbodyBody toes_r: mass=0.1919159 mass_center=(0.03475913 0.00602759 -0.01758048)
            inertia=(8.942e-5 0 0 0 0.00017884 0 0 0 0.00089421) meshes=bofoot.vtp
        SimbodyBody femur_l: mass=8.241399 mass_center=(0 -0.1797682 0)
            inertia=(0.1326664 0 0 0 0.03477664 0 0 0 0.1398992) meshes=femur_l.vtp
        SimbodyBody tibia_l: mass=3.284988 mass_center=(0 -0.2071696 0)
            inertia=(0.0549853 0 0 0 0.00556399 0 0 0 0.05574899) meshes=(tibia_l.vtp fibula_l.vtp)
        SimbodyBody talus_l: mass=0.08860385 mass_center=(0 0 0) inertia=(0.00109098 0 0 0 0.00109098 0 0 0 0.00109098)
            meshes=talus_lv.vtp
        SimbodyBody calcn_l: mass=1.107548 mass_center=(0.1004599 0.03013797 0)
            inertia=(0.00125189 0 0 0 0.00348741 0 0 0 0.00366625) meshes=l_foot.vtp
        SimbodyBody toes_l: mass=0.1919159 mass_center=(0.03475913 0.00602759 0.01758048)
            inertia=(8.942e-5 0 0 0 0.00017884 0 0 0 0.00089421) meshes=l_bofoot.vtp
        SimbodyBody torso: mass=23.7694 mass_center=(0.02892898 0.3382622 -0.0007992216)
            inertia=(1.459837 0 0 0 0.7479868 0 0 0 1.417165)
            meshes=(hat_spine.vtp hat_jaw.vtp hat_skull.vtp hat_ribs_scap.vtp)
        SimbodyBody humerus_r: mass=1.800873 mass_center=(0 -0.1562769 0)
            inertia=(0.00955261 0 0 0 0.00329536 0 0 0 0.01072251) meshes=humerus_rv.vtp
        SimbodyBody ulna_r: mass=0.5382684 mass_center=(0 -0.1298638 0)
            inertia=(0.00304691 0 0 0 0.00063572 0 0 0 0.00330511) meshes=ulna_rv.vtp
        SimbodyBody radius_r: mass=0.5382684 mass_center=(0 -0.1298638 0)
            inertia=(0.00304691 0 0 0 0.00063572 0 0 0 0.00330511) meshes=radius_rv.vtp
        SimbodyBody hand_r: mass=0.4053626 mass_center=(0 -0.068095 0)
            inertia=(0.00079034 0 0 0 0.00048467 0 0 0 0.00118729)
            meshes=(pisiform_rvs.vtp lunate_rvs.vtp scaphoid_rvs.vtp triquetrum_rvs.vtp hamate_rvs.vtp capitate_rvs.vtp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)
        SimbodyBody humerus_l: mass=1.800873 mass_center=(0 -0.1562769 0)
            inertia=(0.00955261 0 0 0 0.00329536 0 0 0 0.01072251) meshes=humerus_lv.vtp
        SimbodyBody ulna_l: mass=0.5382684 mass_center=(0 -0.1298638 0)
            inertia=(0.00304691 0 0 0 0.00063572 0 0 0 0.00330511) meshes=ulna_lv.vtp
        SimbodyBody radius_l: mass=0.5382684 mass_center=(0 -0.1298638 0)
            inertia=(0.00304691 0 0 0 0.00063572 0 0 0 0.00330511) meshes=radius_lv.vtp
        SimbodyBody hand_l: mass=0.4053626 mass_center=(0 -0.068095 0)
            inertia=(0.00079034 0 0 0 0.00048467 0 0 0 0.00118729)
            meshes=(pisiform_lvs.vtp lunate_lvs.vtp scaphoid_lvs.vtp triquetrum_lvs.vtp hamate_lvs.vtp capitate_lvs.vtp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)
      JointSet:
        SimbodyJoint [values shared by the 20 below unless stated]: location_in_parent=(0 0 0)
            location_in_child=(0 0 0)
        SimbodyJoint ground_pelvis: bodies=(ground pelvis)
          DofSet:
            SimbodyTranslationDof tx: coordinate=pelvis_tx
              Value:
                natCubicSpline: min_x=0 max_x=0 min_y=0 max_y=0 min_z=0 max_z=0 x=(-360 360) y=(-360 360)
            SimbodyTranslationDof ty: coordinate=pelvis_ty
              Value:
                natCubicSpline: min_x=0 max_x=0 min_y=0 max_y=0 min_z=0 max_z=0 x=(-360 360) y=(-360 360)
            SimbodyTranslationDof tz: coordinate=pelvis_tz
              Value:
                natCubicSpline: min_x=0 max_x=0 min_y=0 max_y=0 min_z=0 max_z=0 x=(-360 360) y=(-360 360)
            SimbodyRotationDof r1: coordinate=pelvis_tilt axis=(0 0 1)
              Value:
                natCubicSpline: min_x=0 max_x=0 min_y=0 max_y=0 min_z=0 max_z=0 x=(-6.283185 6.283185)
                    y=(-6.283185 6.283185)
            SimbodyRotationDof r2: coordinate=pelvis_list axis=(1 0 0)
              Value:
                natCubicSpline: min_x=0 max_x=0 min_y=0 max_y=0 min_z=0 max_z=0 x=(-6.283185 6.283185)
                    y=(-6.283185 6.283185)
            SimbodyRotationDof r3: coordinate=pelvis_rotation axis=(0 1 0)
              Value:
                natCubicSpline: min_x=0 max_x=0 min_y=0 max_y=0 min_z=0 max_z=0 x=(-6.283185 6.283185)
                    y=(-6.283185 6.283185)
        SimbodyJoint hip_r: bodies=(pelvis femur_r)
          DofSet:
            SimbodyTranslationDof tx:
              Value:
                Constant: min_x=0 max_x=0 min_y=0 max_y=0 min_z=0 max_z=0 value=-0.06998123
            SimbodyTranslationDof ty:
              Value:
                Constant: min_x=0 max_x=0 min_y=0 max_y=0 min_z=0 max_z=0 value=-0.065428
            SimbodyTranslationDof tz:
              Value:
                Constant: min_x=0 max_x=0 min_y=0 max_y=0 min_z=0 max_z=0 value=0.0826511
            SimbodyRotationDof r1: coordinate=hip_flexion_r axis=(0 0 1)
              Value:
                natCubicSpline: min_x=0 max_x=0 min_y=0 max_y=0 min_z=0 max_z=0 x=(-6.283185 6.283185)
                    y=(-6.283185 6.283185)
            SimbodyRotationDof r2: coordinate=hip_adduction_r axis=(1 0 0)
              Value:
                natCubicSpline: min_x=0 max_x=0 min_y=0 max_y=0 min_z=0 max_z=0 x=(-6.283185 6.283185)
                    y=(-6.283185 6.283185)
            SimbodyRotationDof r3: coordinate=hip_rotation_r axis=(0 1 0)
              Value:
                natCubicSpline: min_x=0 max_x=0 min_y=0 max_y=0 min_z=0 max_z=0 x=(-6.283185 6.283185)
                    y=(-6.283185 6.283185)
        SimbodyJoint knee_r: bodies=(femur_r tibia_r)
          DofSet:
            SimbodyTranslationDof tx: coordinate=knee_angle_r
              Value:
                natCubicSpline: min_x=0 max_x=0 min_y=0 max_y=0 min_z=0 max_z=0
                    x=(-2.094395 -1.745329 -1.396263 -1.047198 -0.6981317 -0.3490659 -0.1745329 0.1973442 0.337395 0.4901776 1.52146 2.094395)
                    y=(-0.00338387 0.00189285 0.00434616 0.00433559 0.00224182 -0.00105746 -0.00327813 -0.00552734 -0.0057473 -0.00589428 -0.0057473 -0.00555167)
            SimbodyTranslationDof ty: coordinate=knee_angle_r
              Value:
                natCubicSpline: min_x=0 max_x=0 min_y=0 max_y=0 min_z=0 max_z=0
                    x=(-2.094395 -1.22173 -0.5235988 -0.3490659 -0.1745329 0.1591486 2.094395)
                    y=(-0.4468826 -0.4316552 -0.4219266 -0.4204461 -0.4193886 -0.4179759 -0.4187542)
            SimbodyTranslationDof tz:
              Value:
                Constant: min_x=0 max_x=0 min_y=0 max_y=0 min_z=0 max_z=0 value=0
            SimbodyRotationDof r1: coordinate=knee_angle_r axis=(0 0 1)
              Value:
                natCubicSpline: min_x=0 max_x=0 min_y=0 max_y=0 min_z=0 max_z=0 x=(-6.283185 6.283185)
                    y=(-6.283185 6.283185)
            SimbodyRotationDof r2: axis=(1 0 0)
              Value:
                Constant: min_x=0 max_x=0 min_y=0 max_y=0 min_z=0 max_z=0 value=0
            SimbodyRotationDof r3: axis=(0 1 0)
              Value:
                Constant: min_x=0 max_x=0 min_y=0 max_y=0 min_z=0 max_z=0 value=0
        SimbodyJoint ankle_r: bodies=(tibia_r talus_r)
          DofSet:
            SimbodyTranslationDof tx:
              Value:
                Constant: min_x=0 max_x=0 min_y=0 max_y=0 min_z=0 max_z=0 value=0
            SimbodyTranslationDof ty:
              Value:
                Constant: min_x=0 max_x=0 min_y=0 max_y=0 min_z=0 max_z=0 value=-0.4771448
            SimbodyTranslationDof tz:
              Value:
                Constant: min_x=0 max_x=0 min_y=0 max_y=0 min_z=0 max_z=0 value=0
            SimbodyRotationDof r1: coordinate=ankle_angle_r axis=(-0.1050135 -0.1740224 0.9791263)
              Value:
                natCubicSpline: min_x=0 max_x=0 min_y=0 max_y=0 min_z=0 max_z=0 x=(-6.283185 6.283185)
                    y=(-6.283185 6.283185)
            SimbodyRotationDof r2: axis=(1 0 0)
              Value:
                Constant: min_x=0 max_x=0 min_y=0 max_y=0 min_z=0 max_z=0 value=0
            SimbodyRotationDof r3: axis=(0 1 0)
              Value:
                Constant: min_x=0 max_x=0 min_y=0 max_y=0 min_z=0 max_z=0 value=0
        SimbodyJoint subtalar_r: bodies=(talus_r calcn_r)
          DofSet:
            SimbodyTranslationDof tx:
              Value:
                Constant: min_x=0 max_x=0 min_y=0 max_y=0 min_z=0 max_z=0 value=-0.0541171
            SimbodyTranslationDof ty:
              Value:
                Constant: min_x=0 max_x=0 min_y=0 max_y=0 min_z=0 max_z=0 value=-0.04654936
            SimbodyTranslationDof tz:
              Value:
                Constant: min_x=0 max_x=0 min_y=0 max_y=0 min_z=0 max_z=0 value=0.00878834
            SimbodyRotationDof r1: coordinate=subtalar_angle_r axis=(0.7871796 0.6047475 -0.1209495)
              Value:
                natCubicSpline: min_x=0 max_x=0 min_y=0 max_y=0 min_z=0 max_z=0 x=(-6.283185 6.283185)
                    y=(-6.283185 6.283185)
            SimbodyRotationDof r2: axis=(0 1 0)
              Value:
                Constant: min_x=0 max_x=0 min_y=0 max_y=0 min_z=0 max_z=0 value=0
            SimbodyRotationDof r3: axis=(0 0 1)
              Value:
                Constant: min_x=0 max_x=0 min_y=0 max_y=0 min_z=0 max_z=0 value=0
        SimbodyJoint mtp_r: bodies=(calcn_r toes_r)
          DofSet:
            SimbodyTranslationDof tx:
              Value:
                Constant: min_x=0 max_x=0 min_y=0 max_y=0 min_z=0 max_z=0 value=0.1796223
            SimbodyTranslationDof ty:
              Value:
                Constant: min_x=0 max_x=0 min_y=0 max_y=0 min_z=0 max_z=0 value=-0.0020092
            SimbodyTranslationDof tz:
              Value:
                Constant: min_x=0 max_x=0 min_y=0 max_y=0 min_z=0 max_z=0 value=0.00108497
            SimbodyRotationDof r1: coordinate=mtp_angle_r axis=(-0.5809544 0 0.8139361)
              Value:
                natCubicSpline: min_x=0 max_x=0 min_y=0 max_y=0 min_z=0 max_z=0 x=(-6.283185 6.283185)
                    y=(-6.283185 6.283185)
            SimbodyRotationDof r2: axis=(1 0 0)
              Value:
                Constant: min_x=0 max_x=0 min_y=0 max_y=0 min_z=0 max_z=0 value=0
            SimbodyRotationDof r3: axis=(0 1 0)
              Value:
                Constant: min_x=0 max_x=0 min_y=0 max_y=0 min_z=0 max_z=0 value=0
        SimbodyJoint hip_l: bodies=(pelvis femur_l)
          DofSet:
            SimbodyTranslationDof tx:
              Value:
                Constant: min_x=0 max_x=0 min_y=0 max_y=0 min_z=0 max_z=0 value=-0.06998123
            SimbodyTranslationDof ty:
              Value:
                Constant: min_x=0 max_x=0 min_y=0 max_y=0 min_z=0 max_z=0 value=-0.065428
            SimbodyTranslationDof tz:
              Value:
                Constant: min_x=0 max_x=0 min_y=0 max_y=0 min_z=0 max_z=0 value=-0.0826511
            SimbodyRotationDof r1: coordinate=hip_flexion_l axis=(0 0 1)
              Value:
                natCubicSpline: min_x=0 max_x=0 min_y=0 max_y=0 min_z=0 max_z=0 x=(-6.283185 6.283185)
                    y=(-6.283185 6.283185)
            SimbodyRotationDof r2: coordinate=hip_adduction_l axis=(-1 0 0)
              Value:
                natCubicSpline: min_x=0 max_x=0 min_y=0 max_y=0 min_z=0 max_z=0 x=(-6.283185 6.283185)
                    y=(-6.283185 6.283185)
            SimbodyRotationDof r3: coordinate=hip_rotation_l axis=(0 -1 0)
              Value:
                natCubicSpline: min_x=0 max_x=0 min_y=0 max_y=0 min_z=0 max_z=0 x=(-6.283185 6.283185)
                    y=(-6.283185 6.283185)
        SimbodyJoint knee_l: bodies=(femur_l tibia_l)
          DofSet:
            SimbodyTranslationDof tx: coordinate=knee_angle_l
              Value:
                natCubicSpline: min_x=0 max_x=0 min_y=0 max_y=0 min_z=0 max_z=0
                    x=(-2.094395 -1.745329 -1.396263 -1.047198 -0.6981317 -0.3490659 -0.1745329 0.1973442 0.337395 0.4901776 1.52146 2.094395)
                    y=(-0.00338387 0.00189285 0.00434616 0.00433559 0.00224182 -0.00105746 -0.00327813 -0.00552734 -0.0057473 -0.00589428 -0.0057473 -0.00555167)
            SimbodyTranslationDof ty: coordinate=knee_angle_l
              Value:
                natCubicSpline: min_x=0 max_x=0 min_y=0 max_y=0 min_z=0 max_z=0
                    x=(-2.094395 -1.22173 -0.5235988 -0.3490659 -0.1745329 0.1591486 2.094395)
                    y=(-0.4468826 -0.4316552 -0.4219266 -0.4204461 -0.4193886 -0.4179759 -0.4187542)
            SimbodyTranslationDof tz:
              Value:
                Constant: min_x=0 max_x=0 min_y=0 max_y=0 min_z=0 max_z=0 value=0
            SimbodyRotationDof r1: coordinate=knee_angle_l axis=(0 0 1)
              Value:
                natCubicSpline: min_x=0 max_x=0 min_y=0 max_y=0 min_z=0 max_z=0 x=(-6.283185 6.283185)
                    y=(-6.283185 6.283185)
            SimbodyRotationDof r2: axis=(1 0 0)
              Value:
                Constant: min_x=0 max_x=0 min_y=0 max_y=0 min_z=0 max_z=0 value=0
            SimbodyRotationDof r3: axis=(0 1 0)
              Value:
                Constant: min_x=0 max_x=0 min_y=0 max_y=0 min_z=0 max_z=0 value=0
        SimbodyJoint ankle_l: bodies=(tibia_l talus_l)
          DofSet:
            SimbodyTranslationDof tx:
              Value:
                Constant: min_x=0 max_x=0 min_y=0 max_y=0 min_z=0 max_z=0 value=0
            SimbodyTranslationDof ty:
              Value:
                Constant: min_x=0 max_x=0 min_y=0 max_y=0 min_z=0 max_z=0 value=-0.4771448
            SimbodyTranslationDof tz:
              Value:
                Constant: min_x=0 max_x=0 min_y=0 max_y=0 min_z=0 max_z=0 value=0
            SimbodyRotationDof r1: coordinate=ankle_angle_l axis=(0.1050135 0.1740224 0.9791263)
              Value:
                natCubicSpline: min_x=0 max_x=0 min_y=0 max_y=0 min_z=0 max_z=0 x=(-6.283185 6.283185)
                    y=(-6.283185 6.283185)
            SimbodyRotationDof r2: axis=(1 0 0)
              Value:
                Constant: min_x=0 max_x=0 min_y=0 max_y=0 min_z=0 max_z=0 value=0
            SimbodyRotationDof r3: axis=(0 1 0)
              Value:
                Constant: min_x=0 max_x=0 min_y=0 max_y=0 min_z=0 max_z=0 value=0
        SimbodyJoint subtalar_l: bodies=(talus_l calcn_l)
          DofSet:
            SimbodyTranslationDof tx:
              Value:
                Constant: min_x=0 max_x=0 min_y=0 max_y=0 min_z=0 max_z=0 value=-0.0541171
            SimbodyTranslationDof ty:
              Value:
                Constant: min_x=0 max_x=0 min_y=0 max_y=0 min_z=0 max_z=0 value=-0.04654936
            SimbodyTranslationDof tz:
              Value:
                Constant: min_x=0 max_x=0 min_y=0 max_y=0 min_z=0 max_z=0 value=-0.00878834
            SimbodyRotationDof r1: coordinate=subtalar_angle_l axis=(-0.7871796 -0.6047475 -0.1209495)
              Value:
                natCubicSpline: min_x=0 max_x=0 min_y=0 max_y=0 min_z=0 max_z=0 x=(-6.283185 6.283185)
                    y=(-6.283185 6.283185)
            SimbodyRotationDof r2: axis=(0 1 0)
              Value:
                Constant: min_x=0 max_x=0 min_y=0 max_y=0 min_z=0 max_z=0 value=0
            SimbodyRotationDof r3: axis=(0 0 1)
              Value:
                Constant: min_x=0 max_x=0 min_y=0 max_y=0 min_z=0 max_z=0 value=0
        SimbodyJoint mtp_l: bodies=(calcn_l toes_l)
          DofSet:
            SimbodyTranslationDof tx:
              Value:
                Constant: min_x=0 max_x=0 min_y=0 max_y=0 min_z=0 max_z=0 value=0.1796223
            SimbodyTranslationDof ty:
              Value:
                Constant: min_x=0 max_x=0 min_y=0 max_y=0 min_z=0 max_z=0 value=-0.0020092
            SimbodyTranslationDof tz:
              Value:
                Constant: min_x=0 max_x=0 min_y=0 max_y=0 min_z=0 max_z=0 value=-0.00108497
            SimbodyRotationDof r1: coordinate=mtp_angle_l axis=(0.5809544 0 0.8139361)
              Value:
                natCubicSpline: min_x=0 max_x=0 min_y=0 max_y=0 min_z=0 max_z=0 x=(-6.283185 6.283185)
                    y=(-6.283185 6.283185)
            SimbodyRotationDof r2: axis=(1 0 0)
              Value:
                Constant: min_x=0 max_x=0 min_y=0 max_y=0 min_z=0 max_z=0 value=0
            SimbodyRotationDof r3: axis=(0 1 0)
              Value:
                Constant: min_x=0 max_x=0 min_y=0 max_y=0 min_z=0 max_z=0 value=0
        SimbodyJoint back: bodies=(pelvis torso)
          DofSet:
            SimbodyTranslationDof tx:
              Value:
                Constant: min_x=0 max_x=0 min_y=0 max_y=0 min_z=0 max_z=0 value=-0.09967624
            SimbodyTranslationDof ty:
              Value:
                Constant: min_x=0 max_x=0 min_y=0 max_y=0 min_z=0 max_z=0 value=0.08067143
            SimbodyTranslationDof tz:
              Value:
                Constant: min_x=0 max_x=0 min_y=0 max_y=0 min_z=0 max_z=0 value=0
            SimbodyRotationDof r1: coordinate=lumbar_extension axis=(0 0 1)
              Value:
                natCubicSpline: min_x=0 max_x=0 min_y=0 max_y=0 min_z=0 max_z=0 x=(-6.283185 6.283185)
                    y=(-6.283185 6.283185)
            SimbodyRotationDof r2: coordinate=lumbar_bending axis=(1 0 0)
              Value:
                natCubicSpline: min_x=0 max_x=0 min_y=0 max_y=0 min_z=0 max_z=0 x=(-6.283185 6.283185)
                    y=(-6.283185 6.283185)
            SimbodyRotationDof r3: coordinate=lumbar_rotation axis=(0 1 0)
              Value:
                natCubicSpline: min_x=0 max_x=0 min_y=0 max_y=0 min_z=0 max_z=0 x=(-6.283185 6.283185)
                    y=(-6.283185 6.283185)
        SimbodyJoint acromial_r: bodies=(torso humerus_r)
          DofSet:
            SimbodyTranslationDof tx:
              Value:
                Constant: min_x=0 max_x=0 min_y=0 max_y=0 min_z=0 max_z=0 value=0.00333505
            SimbodyTranslationDof ty:
              Value:
                Constant: min_x=0 max_x=0 min_y=0 max_y=0 min_z=0 max_z=0 value=0.3927012
            SimbodyTranslationDof tz:
              Value:
                Constant: min_x=0 max_x=0 min_y=0 max_y=0 min_z=0 max_z=0 value=0.1797018
            SimbodyRotationDof r1: coordinate=arm_flex_r axis=(0 0 1)
              Value:
                natCubicSpline: min_x=0 max_x=0 min_y=0 max_y=0 min_z=0 max_z=0 x=(-6.283185 6.283185)
                    y=(-6.283185 6.283185)
            SimbodyRotationDof r2: coordinate=arm_add_r axis=(1 0 0)
              Value:
                natCubicSpline: min_x=0 max_x=0 min_y=0 max_y=0 min_z=0 max_z=0 x=(-6.283185 6.283185)
                    y=(-6.283185 6.283185)
            SimbodyRotationDof r3: coordinate=arm_rot_r axis=(0 1 0)
              Value:
                natCubicSpline: min_x=0 max_x=0 min_y=0 max_y=0 min_z=0 max_z=0 x=(-6.283185 6.283185)
                    y=(-6.283185 6.283185)
        SimbodyJoint elbow_r: bodies=(humerus_r ulna_r)
          DofSet:
            SimbodyTranslationDof tx:
              Value:
                Constant: min_x=0 max_x=0 min_y=0 max_y=0 min_z=0 max_z=0 value=0.0124868
            SimbodyTranslationDof ty:
              Value:
                Constant: min_x=0 max_x=0 min_y=0 max_y=0 min_z=0 max_z=0 value=-0.2719593
            SimbodyTranslationDof tz:
              Value:
                Constant: min_x=0 max_x=0 min_y=0 max_y=0 min_z=0 max_z=0 value=-0.00911525
            SimbodyRotationDof r1: coordinate=elbow_flex_r axis=(0.226047 0.022269 0.9738618)
              Value:
                natCubicSpline: min_x=0 max_x=0 min_y=0 max_y=0 min_z=0 max_z=0 x=(-6.283185 6.283185)
                    y=(-6.283185 6.283185)
            SimbodyRotationDof r2: axis=(0 1 0)
              Value:
                Constant: min_x=0 max_x=0 min_y=0 max_y=0 min_z=0 max_z=0 value=0
            SimbodyRotationDof r3: axis=(1 0 0)
              Value:
                Constant: min_x=0 max_x=0 min_y=0 max_y=0 min_z=0 max_z=0 value=0
        SimbodyJoint radioulnar_r: bodies=(ulna_r radius_r)
          DofSet:
            SimbodyTranslationDof tx:
              Value:
                Constant: min_x=0 max_x=0 min_y=0 max_y=0 min_z=0 max_z=0 value=-0.00724823
            SimbodyTranslationDof ty:
              Value:
                Constant: min_x=0 max_x=0 min_y=0 max_y=0 min_z=0 max_z=0 value=-0.01401483
            SimbodyTranslationDof tz:
              Value:
                Constant: min_x=0 max_x=0 min_y=0 max_y=0 min_z=0 max_z=0 value=0.02810401
            SimbodyRotationDof r1: coordinate=pro_sup_r axis=(0.05639803 0.9984065 0.001952)
              Value:
                natCubicSpline: min_x=0 max_x=0 min_y=0 max_y=0 min_z=0 max_z=0 x=(-6.283185 6.283185)
                    y=(-6.283185 6.283185)
            SimbodyRotationDof r2: axis=(1 0 0)
              Value:
                Constant: min_x=0 max_x=0 min_y=0 max_y=0 min_z=0 max_z=0 value=0
            SimbodyRotationDof r3: axis=(0 0 1)
              Value:
                Constant: min_x=0 max_x=0 min_y=0 max_y=0 min_z=0 max_z=0 value=0
        SimbodyJoint radius_hand_r: bodies=(radius_r hand_r)
          DofSet:
            SimbodyTranslationDof tx:
              Value:
                Constant: min_x=0 max_x=0 min_y=0 max_y=0 min_z=0 max_z=0 value=-0.00947863
            SimbodyTranslationDof ty:
              Value:
                Constant: min_x=0 max_x=0 min_y=0 max_y=0 min_z=0 max_z=0 value=-0.2541149
            SimbodyTranslationDof tz:
              Value:
                Constant: min_x=0 max_x=0 min_y=0 max_y=0 min_z=0 max_z=0 value=0.01466456
            SimbodyRotationDof r1: coordinate=wrist_flex_r axis=(0 0 1)
              Value:
                natCubicSpline: min_x=0 max_x=0 min_y=0 max_y=0 min_z=0 max_z=0 x=(-6.283185 6.283185)
                    y=(-6.283185 6.283185)
            SimbodyRotationDof r2: coordinate=wrist_dev_r axis=(1 0 0)
              Value:
                natCubicSpline: min_x=0 max_x=0 min_y=0 max_y=0 min_z=0 max_z=0 x=(-6.283185 6.283185)
                    y=(-6.283185 6.283185)
            SimbodyRotationDof r3: axis=(0 1 0)
              Value:
                Constant: min_x=0 max_x=0 min_y=0 max_y=0 min_z=0 max_z=0 value=0
        SimbodyJoint acromial_l: bodies=(torso humerus_l)
          DofSet:
            SimbodyTranslationDof tx:
              Value:
                Constant: min_x=0 max_x=0 min_y=0 max_y=0 min_z=0 max_z=0 value=0.00333505
            SimbodyTranslationDof ty:
              Value:
                Constant: min_x=0 max_x=0 min_y=0 max_y=0 min_z=0 max_z=0 value=0.3927012
            SimbodyTranslationDof tz:
              Value:
                Constant: min_x=0 max_x=0 min_y=0 max_y=0 min_z=0 max_z=0 value=-0.1797018
            SimbodyRotationDof r1: coordinate=arm_flex_l axis=(0 0 1)
              Value:
                natCubicSpline: min_x=0 max_x=0 min_y=0 max_y=0 min_z=0 max_z=0 x=(-6.283185 6.283185)
                    y=(-6.283185 6.283185)
            SimbodyRotationDof r2: coordinate=arm_add_l axis=(-1 0 0)
              Value:
                natCubicSpline: min_x=0 max_x=0 min_y=0 max_y=0 min_z=0 max_z=0 x=(-6.283185 6.283185)
                    y=(-6.283185 6.283185)
            SimbodyRotationDof r3: coordinate=arm_rot_l axis=(0 -1 0)
              Value:
                natCubicSpline: min_x=0 max_x=0 min_y=0 max_y=0 min_z=0 max_z=0 x=(-6.283185 6.283185)
                    y=(-6.283185 6.283185)
        SimbodyJoint elbow_l: bodies=(humerus_l ulna_l)
          DofSet:
            SimbodyTranslationDof tx:
              Value:
                Constant: min_x=0 max_x=0 min_y=0 max_y=0 min_z=0 max_z=0 value=0.0124868
            SimbodyTranslationDof ty:
              Value:
                Constant: min_x=0 max_x=0 min_y=0 max_y=0 min_z=0 max_z=0 value=-0.2719593
            SimbodyTranslationDof tz:
              Value:
                Constant: min_x=0 max_x=0 min_y=0 max_y=0 min_z=0 max_z=0 value=0.00911525
            SimbodyRotationDof r1: coordinate=elbow_flex_l axis=(-0.226047 -0.022269 0.9738618)
              Value:
                natCubicSpline: min_x=0 max_x=0 min_y=0 max_y=0 min_z=0 max_z=0 x=(-6.283185 6.283185)
                    y=(-6.283185 6.283185)
            SimbodyRotationDof r2: axis=(0 -1 0)
              Value:
                Constant: min_x=0 max_x=0 min_y=0 max_y=0 min_z=0 max_z=0 value=0
            SimbodyRotationDof r3: axis=(-1 0 0)
              Value:
                Constant: min_x=0 max_x=0 min_y=0 max_y=0 min_z=0 max_z=0 value=0
        SimbodyJoint radioulnar_l: bodies=(ulna_l radius_l)
          DofSet:
            SimbodyTranslationDof tx:
              Value:
                Constant: min_x=0 max_x=0 min_y=0 max_y=0 min_z=0 max_z=0 value=-0.00724823
            SimbodyTranslationDof ty:
              Value:
                Constant: min_x=0 max_x=0 min_y=0 max_y=0 min_z=0 max_z=0 value=-0.01401483
            SimbodyTranslationDof tz:
              Value:
                Constant: min_x=0 max_x=0 min_y=0 max_y=0 min_z=0 max_z=0 value=-0.02810401
            SimbodyRotationDof r1: coordinate=pro_sup_l axis=(-0.05639803 -0.9984065 0.001952)
              Value:
                natCubicSpline: min_x=0 max_x=0 min_y=0 max_y=0 min_z=0 max_z=0 x=(-6.283185 6.283185)
                    y=(-6.283185 6.283185)
            SimbodyRotationDof r2: axis=(0 1 0)
              Value:
                Constant: min_x=0 max_x=0 min_y=0 max_y=0 min_z=0 max_z=0 value=0
            SimbodyRotationDof r3: axis=(0 0 1)
              Value:
                Constant: min_x=0 max_x=0 min_y=0 max_y=0 min_z=0 max_z=0 value=0
        SimbodyJoint radius_hand_l: bodies=(radius_l hand_l)
          DofSet:
            SimbodyTranslationDof tx:
              Value:
                Constant: min_x=0 max_x=0 min_y=0 max_y=0 min_z=0 max_z=0 value=-0.00947863
            SimbodyTranslationDof ty:
              Value:
                Constant: min_x=0 max_x=0 min_y=0 max_y=0 min_z=0 max_z=0 value=-0.2541149
            SimbodyTranslationDof tz:
              Value:
                Constant: min_x=0 max_x=0 min_y=0 max_y=0 min_z=0 max_z=0 value=-0.01466456
            SimbodyRotationDof r1: coordinate=wrist_flex_l axis=(0 0 1)
              Value:
                natCubicSpline: min_x=0 max_x=0 min_y=0 max_y=0 min_z=0 max_z=0 x=(-6.283185 6.283185)
                    y=(-6.283185 6.283185)
            SimbodyRotationDof r2: coordinate=wrist_dev_l axis=(-1 0 0)
              Value:
                natCubicSpline: min_x=0 max_x=0 min_y=0 max_y=0 min_z=0 max_z=0 x=(-6.283185 6.283185)
                    y=(-6.283185 6.283185)
            SimbodyRotationDof r3: axis=(0 -1 0)
              Value:
                Constant: min_x=0 max_x=0 min_y=0 max_y=0 min_z=0 max_z=0 value=0
      SimbodyCoordinate [values shared by the 37 below unless stated]: default_value=0 initial_value=0
          tolerance=0.00000001 stiffness=0 clamped=true restraint_active=false
      SimbodyCoordinate pelvis_tx: range=(-5 5) keys=p_key
      SimbodyCoordinate pelvis_ty: range=(-1 2) keys=q_key
      SimbodyCoordinate pelvis_tz: range=(-3 3) keys=q_key
      SimbodyCoordinate pelvis_tilt: range=(-1.570796 1.570796) keys=q_key
      SimbodyCoordinate pelvis_list: range=(-1.570796 1.570796) keys=q_key
      SimbodyCoordinate pelvis_rotation: range=(-1.570796 1.570796) keys=q_key
      SimbodyCoordinate hip_flexion_r: range=(-2.094395 2.094395) keys=(h_key leftmouse_button)
      SimbodyCoordinate hip_adduction_r: range=(-2.094395 2.094395) keys=(h_key leftmouse_button)
      SimbodyCoordinate hip_rotation_r: range=(-2.094395 2.094395) keys=(h_key leftmouse_button)
      SimbodyCoordinate knee_angle_r: range=(-2.094395 0.1745329) keys=k_key
      SimbodyCoordinate ankle_angle_r: range=(-1.570796 1.570796) keys=a_key
      SimbodyCoordinate subtalar_angle_r: range=(-1.570796 1.570796) keys=a_key locked=true
      SimbodyCoordinate mtp_angle_r: range=(-1.570796 1.570796) keys=t_key locked=true
      SimbodyCoordinate hip_flexion_l: range=(-2.094395 2.094395) keys=(h_key leftmouse_button)
      SimbodyCoordinate hip_adduction_l: range=(-2.094395 2.094395) keys=(h_key leftmouse_button)
      SimbodyCoordinate hip_rotation_l: range=(-2.094395 2.094395) keys=(h_key leftmouse_button)
      SimbodyCoordinate knee_angle_l: range=(-2.094395 0.1745329) keys=k_key
      SimbodyCoordinate ankle_angle_l: range=(-1.047198 1.047198) keys=a_key
      SimbodyCoordinate subtalar_angle_l: range=(-1.570796 1.570796) keys=a_key locked=true
      SimbodyCoordinate mtp_angle_l: range=(-1.047198 1.047198) keys=t_key locked=true
      SimbodyCoordinate lumbar_extension: range=(-1.570796 1.570796) keys=q_key
      SimbodyCoordinate lumbar_bending: range=(-1.570796 1.570796) keys=q_key
      SimbodyCoordinate lumbar_rotation: range=(-1.570796 1.570796) keys=q_key
      SimbodyCoordinate arm_flex_r: range=(-1.570796 1.570796)
      SimbodyCoordinate arm_add_r: range=(-2.094395 1.570796)
      SimbodyCoordinate arm_rot_r: range=(-1.570796 1.570796)
      SimbodyCoordinate elbow_flex_r: range=(0 2.618)
      SimbodyCoordinate pro_sup_r: range=(0 2.1)
      SimbodyCoordinate wrist_flex_r: range=(-1.22173 1.22173) locked=true
      SimbodyCoordinate wrist_dev_r: range=(-0.4363323 0.6108652) locked=true
      SimbodyCoordinate arm_flex_l: range=(-1.570796 1.570796)
      SimbodyCoordinate arm_add_l: range=(-2.094395 1.570796)
      SimbodyCoordinate arm_rot_l: range=(-1.570796 1.570796)
      SimbodyCoordinate elbow_flex_l: range=(0 2.618)
      SimbodyCoordinate pro_sup_l: range=(0 2.1)
      SimbodyCoordinate wrist_flex_l: range=(-1.22173 1.22173) locked=true
      SimbodyCoordinate wrist_dev_l: range=(-0.4363323 0.6108652) locked=true
      ObjectGroup all: members=(pelvis_tx pelvis_ty pelvis_tz pelvis_tilt pelvis_list pelvis_rotation hip_flexion_r hip_adduction_r hip_rotation_r knee_angle_r ankle_angle_r subtalar_angle_r mtp_angle_r hip_flexion_l hip_adduction_l hip_rotation_l knee_angle_l ankle_angle_l subtalar_angle_l mtp_angle_l lumbar_extension lumbar_bending lumbar_rotation arm_flex_r arm_add_r arm_rot_r elbow_flex_r pro_sup_r wrist_flex_r wrist_dev_r arm_flex_l arm_add_l arm_rot_l elbow_flex_l pro_sup_l wrist_flex_l wrist_dev_l)
      SpeedSet:
        SimbodySpeed pelvis_tx_u: default_value=0 coordinate=pelvis_tx
        SimbodySpeed pelvis_ty_u: default_value=0 coordinate=pelvis_ty
        SimbodySpeed pelvis_tz_u: default_value=0 coordinate=pelvis_tz
        SimbodySpeed pelvis_tilt_u: default_value=0 coordinate=pelvis_tilt
        SimbodySpeed pelvis_list_u: default_value=0 coordinate=pelvis_list
        SimbodySpeed pelvis_rotation_u: default_value=0 coordinate=pelvis_rotation
        SimbodySpeed hip_flexion_r_u: default_value=0 coordinate=hip_flexion_r
        SimbodySpeed hip_adduction_r_u: default_value=0 coordinate=hip_adduction_r
        SimbodySpeed hip_rotation_r_u: default_value=0 coordinate=hip_rotation_r
        SimbodySpeed knee_angle_r_u: default_value=0 coordinate=knee_angle_r
        SimbodySpeed ankle_angle_r_u: default_value=0 coordinate=ankle_angle_r
        SimbodySpeed subtalar_angle_r_u: default_value=0 coordinate=subtalar_angle_r
        SimbodySpeed mtp_angle_r_u: default_value=0 coordinate=mtp_angle_r
        SimbodySpeed hip_flexion_l_u: default_value=0 coordinate=hip_flexion_l
        SimbodySpeed hip_adduction_l_u: default_value=0 coordinate=hip_adduction_l
        SimbodySpeed hip_rotation_l_u: default_value=0 coordinate=hip_rotation_l
        SimbodySpeed knee_angle_l_u: default_value=0 coordinate=knee_angle_l
        SimbodySpeed ankle_angle_l_u: default_value=0 coordinate=ankle_angle_l
        SimbodySpeed subtalar_angle_l_u: default_value=0 coordinate=subtalar_angle_l
        SimbodySpeed mtp_angle_l_u: default_value=0 coordinate=mtp_angle_l
        SimbodySpeed lumbar_extension_u: default_value=0 coordinate=lumbar_extension
        SimbodySpeed lumbar_bending_u: default_value=0 coordinate=lumbar_bending
        SimbodySpeed lumbar_rotation_u: default_value=0 coordinate=lumbar_rotation
        SimbodySpeed arm_flex_r_u: default_value=0 coordinate=arm_flex_r
        SimbodySpeed arm_add_r_u: default_value=0 coordinate=arm_add_r
        SimbodySpeed arm_rot_r_u: default_value=0 coordinate=arm_rot_r
        SimbodySpeed elbow_flex_r_u: default_value=0 coordinate=elbow_flex_r
        SimbodySpeed pro_sup_r_u: default_value=0 coordinate=pro_sup_r
        SimbodySpeed wrist_flex_r_u: default_value=0 coordinate=wrist_flex_r
        SimbodySpeed wrist_dev_r_u: default_value=0 coordinate=wrist_dev_r
        SimbodySpeed arm_flex_l_u: default_value=0 coordinate=arm_flex_l
        SimbodySpeed arm_add_l_u: default_value=0 coordinate=arm_add_l
        SimbodySpeed arm_rot_l_u: default_value=0 coordinate=arm_rot_l
        SimbodySpeed elbow_flex_l_u: default_value=0 coordinate=elbow_flex_l
        SimbodySpeed pro_sup_l_u: default_value=0 coordinate=pro_sup_l
        SimbodySpeed wrist_flex_l_u: default_value=0 coordinate=wrist_flex_l
        SimbodySpeed wrist_dev_l_u: default_value=0 coordinate=wrist_dev_l
      MarkerSet:
        Marker Sternum: torso (0.1366484 0.3431361 -0.00732331)
        Marker R.Acromium: torso (0.00617457 0.4604497 0.1784502)
        Marker L.Acromium: torso (-0.0125411 0.4602283 -0.1627419)
        Marker R.Bicep: humerus_r (-0.03425808 -0.174387 -0.00212153)
        Marker R.Elbow: humerus_r (-0.04456983 -0.2766062 -0.01839254)
        Marker R.Wrist.Med: radius_r (-0.04244414 -0.2311602 -0.00277419)
        Marker R.Wrist.Lat: radius_r (-0.01440143 -0.2390248 0.05802727)
        Marker L.Bicep: humerus_l (-0.04604825 -0.1878798 -0.00252545)
        Marker L.Elbow: humerus_l (-0.04174799 -0.2808506 0.00485869)
        Marker L.Wrist.Med: radius_l (-0.0380602 -0.2373687 0.00721787)
        Marker L.Wrist.Lat: radius_l (-0.01254901 -0.2352585 -0.06185501)
        Marker R.ASIS: pelvis (0.02698879 0.02875568 0.1290087)
        Marker L.ASIS: pelvis (0.02091848 0.02740483 -0.1242912)
        Marker V.Sacral: pelvis (-0.1739434 0.04241375 -0.00261451)
        Marker R.Thigh.Upper: femur_r (0.03400401 -0.2076395 0.08757048)
        Marker R.Thigh.Front: femur_r (0.1026953 -0.2632505 0.02242278)
        Marker R.Thigh.Rear: femur_r (0.00910369 -0.3048636 0.08019305)
        Marker R.Knee.Lat: femur_r (-0.00027239 -0.4285933 0.06144158)
        Marker R.Knee.Med: femur_r (0.0022834 -0.4399037 -0.06653423)
        Marker R.Shank.Upper: tibia_r (0.0053077 -0.09288782 0.0694078)
        Marker R.Shank.Front: tibia_r (0.05918592 -0.1572734 0.02061482)
        Marker R.Shank.Rear: tibia_r (0.00102039 -0.176602 0.07552707)
        Marker R.Ankle.Lat: tibia_r (-0.00844284 -0.4530646 0.05143435)
        Marker R.Ankle.Med: tibia_r (0.00591318 -0.4372854 -0.03235616)
        Marker R.Heel: calcn_r (-0.01820094 0.03741857 0.00052561)
        Marker R.Toe.Tip: calcn_r (0.2622922 0.05254 -0.00731354)
        Marker R.Midfoot.Lat: calcn_r (0.09843769 0.03492662 0.06155201)
        Marker R.Midfoot.Sup: calcn_r (0.1233247 0.04876569 -0.03814161)
        Marker R.Toe.Lat: calcn_r (0.1941139 0.02755457 0.07069347)
        Marker R.Toe.Med: calcn_r (0.1954479 0.02282259 -0.0423825)
        Marker L.Thigh.Upper: femur_l (0.04419693 -0.2020939 -0.09074515)
        Marker L.Thigh.Front: femur_l (0.1036306 -0.26785 -0.01067711)
        Marker L.Thigh.Rear: femur_l (0.03034939 -0.3319562 -0.07437445)
        Marker L.Knee.Lat: femur_l (-0.00922092 -0.4209114 -0.05877709)
        Marker L.Knee.Med: femur_l (0.01113341 -0.4366831 0.06069107)
        Marker L.Shank.Upper: tibia_l (-0.01406912 -0.1024927 -0.07441641)
        Marker L.Shank.Front: tibia_l (0.05674638 -0.171042 -0.0273379)
        Marker L.Shank.Rear: tibia_l (-0.0266801 -0.1733969 -0.07870855)
        Marker L.Ankle.Lat: tibia_l (-0.00771981 -0.4508632 -0.04960195)
        Marker L.Ankle.Med: tibia_l (0.00683211 -0.4391515 0.04055088)
        Marker L.Heel: calcn_l (-0.020287 0.0329769 -0.00924843)
        Marker L.Toe.Tip: calcn_l (0.2598754 0.05948715 0.01367956)
        Marker L.Midfoot.Lat: calcn_l (0.112529 0.029316 -0.05804353)
        Marker L.Midfoot.Sup: calcn_l (0.1171792 0.04727116 0.04393998)
        Marker L.Toe.Lat: calcn_l (0.192778 0.02111982 -0.06906224)
        Marker L.Toe.Med: calcn_l (0.1944352 0.03274546 0.04302867)
  ActuatorSet:
    Thelen2003Muscle [values shared by the 92 below unless stated]: muscle_model=9 activation_time_constant=0.01
        deactivation_time_constant=0.04 Vmax=10 Vmax0=5 FmaxTendonStrain=0.033 FmaxMuscleStrain=0.6 KshapeActive=0.5
        KshapePassive=4 damping=0.05 Af=0.3 Flen=1.8
    Thelen2003Muscle glut_med1_r: max_isometric_force=819 optimal_fiber_length=0.05381592
        tendon_slack_length=0.07846059 pennation_angle=0.1396263
      MusclePoint P1: pelvis (-0.04038521 0.03009094 0.1196709)
      MusclePoint P2: femur_r (-0.02305263 -0.01237228 0.05868903)
    Thelen2003Muscle glut_med2_r: max_isometric_force=573 optimal_fiber_length=0.08502918
        tendon_slack_length=0.05333191 pennation_angle=0
      MusclePoint P1: pelvis (-0.08463077 0.04404759 0.07582125)
      MusclePoint P2: femur_r (-0.02728247 -0.00613327 0.05572814)
    Thelen2003Muscle glut_med3_r: max_isometric_force=653 optimal_fiber_length=0.06521104
        tendon_slack_length=0.05350132 pennation_angle=0.3316126
      MusclePoint P1: pelvis (-0.1210566 0.01039325 0.06414121)
      MusclePoint P2: femur_r (-0.03267552 -0.00497006 0.05477643)
    Thelen2003Muscle glut_min1_r: max_isometric_force=270 optimal_fiber_length=0.06926941
        tendon_slack_length=0.01629869 pennation_angle=0.1745329
      MusclePoint P1: pelvis (-0.04622523 -0.00791867 0.1045264)
      MusclePoint P2: femur_r (-0.00761371 -0.01099758 0.05921776)
    Thelen2003Muscle glut_min2_r: max_isometric_force=285 optimal_fiber_length=0.05721607 tendon_slack_length=0.0265646
        pennation_angle=0
      MusclePoint P1: pelvis (-0.06265646 -0.00643392 0.0980925)
      MusclePoint P2: femur_r (-0.01015162 -0.01099758 0.05921776)
    Thelen2003Muscle glut_min3_r: max_isometric_force=323 optimal_fiber_length=0.03883691
        tendon_slack_length=0.05212323 pennation_angle=0.01745329
      MusclePoint P1: pelvis (-0.08255212 -0.00623595 0.08472975)
      MusclePoint P2: femur_r (-0.01427571 -0.00877692 0.0581603)
    Thelen2003Muscle semimem_r: max_isometric_force=1288 optimal_fiber_length=0.085499 tendon_slack_length=0.3836768
        pennation_angle=0.2617994
      MusclePoint P1: pelvis (-0.1179882 -0.09647907 0.070783)
      MuscleViaPoint P2: tibia_r (-0.03861544 -0.0390482 -0.02098328) range=(-0.5585054 0.1745329)
          coordinate=knee_angle_r
      MusclePoint P3: tibia_r (-0.02996026 -0.05294088 -0.02171564)
    Thelen2003Muscle semiten_r: max_isometric_force=410 optimal_fiber_length=0.2163093 tendon_slack_length=0.2749603
        pennation_angle=0.08726646
      MusclePoint P1: pelvis (-0.1250655 -0.1087629 0.05977605)
      MuscleViaPoint P2: tibia_r (-0.04663813 -0.03172458 -0.02526648) range=(-0.3316126 0.1745329)
          coordinate=knee_angle_r
      MusclePoint P3: tibia_r (-0.03686221 -0.05861114 -0.02538854)
      MusclePoint P4: tibia_r (-0.01253892 -0.08277908 -0.02718616)
      MusclePoint P5: tibia_r (0.00299603 -0.1060815 -0.02141603)
    Thelen2003Muscle bifemlh_r: max_isometric_force=896 optimal_fiber_length=0.1166332 tendon_slack_length=0.3488294
        pennation_angle=0
      MusclePoint P1: pelvis (-0.1246794 -0.1015272 0.06873404)
      MusclePoint P2: tibia_r (-0.03340014 -0.03994701 0.03265668)
      MusclePoint P3: tibia_r (-0.02596556 -0.06247268 0.03806062)
    Thelen2003Muscle bifemsh_r: max_isometric_force=804 optimal_fiber_length=0.1852719 tendon_slack_length=0.0953133
        pennation_angle=0.4014257
      MusclePoint P1: femur_r (0.0052873 -0.2232298 0.02474456)
      MusclePoint P2: tibia_r (-0.03340014 -0.03994701 0.03265668)
      MusclePoint P3: tibia_r (-0.02596556 -0.06247268 0.03806062)
    Thelen2003Muscle sar_r: max_isometric_force=156 optimal_fiber_length=0.5496341 tendon_slack_length=0.1056989
        pennation_angle=0
      MusclePoint P1: pelvis (-0.01514445 -0.00128678 0.1229373)
      MusclePoint P2: femur_r (-0.00317238 -0.3773017 -0.04451907)
      MusclePoint P3: tibia_r (-0.00621398 -0.04649388 -0.0442746)
      MusclePoint P4: tibia_r (0.00665783 -0.06535774 -0.04249918)
      MusclePoint P5: tibia_r (0.02696423 -0.09320969 -0.02796291)
    Thelen2003Muscle add_long_r: max_isometric_force=627 optimal_fiber_length=0.1451811 tendon_slack_length=0.1157241
        pennation_angle=0.1047198
      MusclePoint P1: pelvis (-0.03127874 -0.08275008 0.01672819)
      MusclePoint P2: femur_r (0.0052873 -0.2232298 0.02474456)
    Thelen2003Muscle add_brev_r: max_isometric_force=429 optimal_fiber_length=0.1386401 tendon_slack_length=0.02084814
        pennation_angle=0
      MusclePoint P1: pelvis (-0.05810323 -0.09056977 0.01623327)
      MusclePoint P2: femur_r (0.00095171 -0.1264722 0.03108933)
    Thelen2003Muscle add_mag1_r: max_isometric_force=381 optimal_fiber_length=0.09131077 tendon_slack_length=0.06297294
        pennation_angle=0.08726646
      MusclePoint P1: pelvis (-0.07245581 -0.1162065 0.02524076)
      MusclePoint P2: femur_r (-0.00475857 -0.1280584 0.0358479)
    Thelen2003Muscle add_mag2_r: max_isometric_force=343 optimal_fiber_length=0.1291276 tendon_slack_length=0.1280604
        pennation_angle=0.05235988
      MusclePoint P1: pelvis (-0.08225517 -0.1179882 0.03048687)
      MusclePoint P2: femur_r (0.00571028 -0.2416296 0.02400434)
    Thelen2003Muscle add_mag3_r: max_isometric_force=488 optimal_fiber_length=0.1396089 tendon_slack_length=0.2653634
        pennation_angle=0.08726646
      MusclePoint P1: pelvis (-0.1099507 -0.1129697 0.04832367)
      MusclePoint P2: femur_r (0.00740222 -0.4057474 -0.02812844)
    Thelen2003Muscle tfl_r: max_isometric_force=233 optimal_fiber_length=0.09985267 tendon_slack_length=0.4467093
        pennation_angle=0.05235988
      MusclePoint P1: pelvis (-0.03078382 0.02118244 0.1228383)
      MusclePoint P2: femur_r (0.03108933 -0.1052173 0.06313036)
      MusclePoint P3: femur_r (0.00571028 -0.4281656 0.03775132)
      MusclePoint P4: tibia_r (0.00665783 -0.05403942 0.03295628)
    Thelen2003Muscle pect_r: max_isometric_force=266 optimal_fiber_length=0.1040315 tendon_slack_length=0.03433039
        pennation_angle=0
      MusclePoint P1: pelvis (-0.04266183 -0.07601922 0.04464149)
      MusclePoint P2: femur_r (-0.01290101 -0.08692322 0.02675374)
    Thelen2003Muscle grac_r: max_isometric_force=162 optimal_fiber_length=0.378963 tendon_slack_length=0.1356515
        pennation_angle=0.05235988
      MusclePoint P1: pelvis (-0.07325758 -0.1174932 0.02765595)
      MuscleViaPoint P2: tibia_r (-0.02948311 -0.03539749 -0.04187778) range=(-0.4363323 0.1745329)
          coordinate=knee_angle_r
      MusclePoint P3: tibia_r (-0.02156029 -0.0571797 -0.03972508)
      MusclePoint P4: tibia_r (0.00665783 -0.09276583 -0.02529977)
    Thelen2003Muscle glut_max1_r: max_isometric_force=573 optimal_fiber_length=0.1438791 tendon_slack_length=0.1266541
        pennation_angle=0.08726646
      MusclePoint P1: pelvis (-0.1182851 0.06057781 0.06928835)
      MusclePoint P2: pelvis (-0.1277875 0.0011878 0.08769925)
      MusclePoint P3: femur_r (-0.04832592 -0.02622501 0.04145243)
      MusclePoint P4: femur_r (-0.02929164 -0.05985224 0.04970062)
    Thelen2003Muscle glut_max2_r: max_isometric_force=819 optimal_fiber_length=0.1502928 tendon_slack_length=0.1298448
        pennation_angle=0
      MusclePoint P1: pelvis (-0.1335285 0.01742107 0.05572763)
      MusclePoint P2: pelvis (-0.1362011 -0.05147134 0.09047079)
      MusclePoint P3: femur_r (-0.0450478 -0.05604538 0.03098358)
      MusclePoint P4: femur_r (-0.01649638 -0.1074379 0.04430758)
    Thelen2003Muscle glut_max3_r: max_isometric_force=552 optimal_fiber_length=0.1472803 tendon_slack_length=0.148303
        pennation_angle=0.08726646
      MusclePoint P1: pelvis (-0.1540181 -0.03108077 0.00574103)
      MusclePoint P2: pelvis (-0.1513455 -0.1041305 0.03989029)
      MusclePoint P3: femur_r (-0.03161806 -0.1100816 0.01427571)
      MusclePoint P4: femur_r (-0.00634476 -0.1500536 0.04346161)
    Thelen2003Muscle iliacus_r: max_isometric_force=1073 optimal_fiber_length=0.1010062 tendon_slack_length=0.1010062
        pennation_angle=0.1221731
      MusclePoint P1: pelvis (-0.06671478 0.03612892 0.08453178)
      MusclePoint P2: pelvis (-0.02553771 -0.05444084 0.0802755)
      MuscleViaPoint P3: pelvis (-0.02850721 -0.0796816 0.08077042) range=(-1.570796 0.7853982)
          coordinate=hip_flexion_r
      MusclePoint P4: femur_r (0.00179768 -0.05742008 0.00602752)
      MusclePoint P5: femur_r (-0.02040898 -0.06566827 0.01364123)
    Thelen2003Muscle psoas_r: max_isometric_force=1113 optimal_fiber_length=0.1004636 tendon_slack_length=0.1607417
        pennation_angle=0.1396263
      MusclePoint P1: pelvis (-0.06404223 0.08779823 0.02860619)
      MusclePoint P2: pelvis (-0.02355804 -0.05642051 0.07512837)
      MuscleViaPoint P3: pelvis (-0.02850721 -0.0796816 0.08077042) range=(-1.570796 0.7853982)
          coordinate=hip_flexion_r
      MusclePoint P4: femur_r (0.00169194 -0.05361322 0.00401835)
      MusclePoint P5: femur_r (-0.01988025 -0.06313036 0.01099758)
    Thelen2003Muscle quad_fem_r: max_isometric_force=381 optimal_fiber_length=0.05490422 tendon_slack_length=0.02440187
        pennation_angle=0
      MusclePoint P1: pelvis (-0.113138 -0.1139298 0.05147134)
      MusclePoint P2: femur_r (-0.04028923 -0.03796282 0.03870304)
    Thelen2003Muscle gem_r: max_isometric_force=164 optimal_fiber_length=0.02457487 tendon_slack_length=0.03993416
        pennation_angle=0
      MusclePoint P1: pelvis (-0.1121481 -0.08116635 0.07067411)
      MusclePoint P2: femur_r (-0.01501593 -0.00348962 0.04684548)
    Thelen2003Muscle peri_r: max_isometric_force=444 optimal_fiber_length=0.0261112 tendon_slack_length=0.1154918
        pennation_angle=0.1745329
      MusclePoint P1: pelvis (-0.1381808 0.00029695 0.02326109)
      MusclePoint P2: pelvis (-0.1180871 -0.02731941 0.06503206)
      MusclePoint P3: femur_r (-0.01565041 -0.00380686 0.046211)
    Thelen2003Muscle rect_fem_r: max_isometric_force=1169 optimal_fiber_length=0.1196597 tendon_slack_length=0.3253904
        pennation_angle=0.08726646
      MusclePoint P1: pelvis (-0.02920009 -0.03078382 0.09581589)
      MuscleViaPoint P2: femur_r (0.03531917 -0.4261564 0.00200917) range=(-2.617994 -1.459968) coordinate=knee_angle_r
      MovingMusclePoint P3: tibia_r (0.06852859 0.02328469 0.00155349) x_coordinate=knee_angle_r
          y_coordinate=knee_angle_r z_coordinate=knee_angle_r
        XAttachment:
          natCubicSpline: min_x=0 max_x=0 min_y=0 max_y=0 min_z=0 max_z=0
              x=(-2.094395 -1.999973 -1.570796 -1.457524 -1.396263 -1.047198 -0.6981317 -0.5263913 -0.3490659 -0.1745329 0 0.00017453 0.00034907 0.02792527 0.08726646 0.1745329 2.094395)
              y=(0.01728873 0.01996665 0.03052407 0.03290785 0.03413422 0.04057898 0.04683501 0.05003382 0.05369655 0.05928794 0.06852859 0.06853894 0.06854929 0.07024938 0.07433912 0.08134039 0.06363567)
        YAttachment:
          natCubicSpline: min_x=0 max_x=0 min_y=0 max_y=0 min_z=0 max_z=0
              x=(-2.094395 -1.999973 -1.570796 -1.457524 -1.396263 -1.047198 -0.6981317 -0.5263913 -0.3490659 -0.1745329 0 0.00017453 0.00034907 0.02792527 0.08726646 0.1745329 2.094395)
              y=(0.02597845 0.02636648 0.02786762 0.0280511 0.0280901 0.02765043 0.02689467 0.02645904 0.02598744 0.02526027 0.02328469 0.02328181 0.02327893 0.02277254 0.02127779 0.01770478 -0.07476456)
        ZAttachment:
          natCubicSpline: min_x=0 max_x=0 min_y=0 max_y=0 min_z=0 max_z=0 x=(-2.0944 0.1745) y=(0.00155349 0.00155349)
    Thelen2003Muscle vas_med_r: max_isometric_force=1294 optimal_fiber_length=0.09386752 tendon_slack_length=0.1328911
        pennation_angle=0.08726646
      MusclePoint P1: femur_r (0.01480444 -0.2219609 0.01988025)
      MusclePoint P2: femur_r (0.03764558 -0.2928107 0.00095171)
      MuscleViaPoint P3: femur_r (0.03912602 -0.4280598 -0.01321825) range=(-2.617994 -1.210037)
          coordinate=knee_angle_r
      MuscleViaPoint P4: femur_r (0.02897441 -0.4499493 -0.01385273) range=(-2.617994 -1.780061)
          coordinate=knee_angle_r
      MovingMusclePoint P5: tibia_r (0.06209386 0.02418088 -0.01620073) x_coordinate=knee_angle_r
          y_coordinate=knee_angle_r z_coordinate=knee_angle_r
        XAttachment:
          natCubicSpline: min_x=0 max_x=0 min_y=0 max_y=0 min_z=0 max_z=0
              x=(-2.094395 -1.999973 -1.570796 -1.457524 -1.396263 -1.047198 -0.6981317 -0.5263913 -0.3490659 -0.1745329 0 0.00017453 0.00034907 0.02792527 0.08726646 0.1745329 2.094395)
              y=(0.01088663 0.01356455 0.02412033 0.02650383 0.02773015 0.03417232 0.04041164 0.04359446 0.04723227 0.05279265 0.06209386 0.0621044 0.06211494 0.06385071 0.0680617 0.07540032 0.06983311)
        YAttachment:
          natCubicSpline: min_x=0 max_x=0 min_y=0 max_y=0 min_z=0 max_z=0
              x=(-2.094395 -1.999973 -1.570796 -1.457524 -1.396263 -1.047198 -0.6981317 -0.5263913 -0.3490659 -0.1745329 0 0.00017453 0.00034907 0.02792527 0.08726646 0.1745329 2.094395)
              y=(0.024873 0.02526103 0.02677169 0.02695682 0.0269961 0.0265717 0.02592036 0.0255968 0.02533776 0.02511801 0.02418088 0.02417938 0.02417786 0.02389772 0.02295198 0.02033623 -0.07281504)
        ZAttachment:
          natCubicSpline: min_x=0 max_x=0 min_y=0 max_y=0 min_z=0 max_z=0 x=(-2.094395 2.094395)
              y=(-0.01620073 -0.01620073)
    Thelen2003Muscle vas_int_r: max_isometric_force=1365 optimal_fiber_length=0.09153165 tendon_slack_length=0.1430839
        pennation_angle=0.05235988
      MusclePoint P1: femur_r (0.03066634 -0.2034553 0.03278126)
      MusclePoint P2: femur_r (0.03542491 -0.2203747 0.03013761)
      MuscleViaPoint P3: femur_r (0.03627088 -0.4261564 0.00581603) range=(-2.617994 -1.42) coordinate=knee_angle_r
      MovingMusclePoint P4: tibia_r (0.06154415 0.02806535 0.00199735) x_coordinate=knee_angle_r
          y_coordinate=knee_angle_r z_coordinate=knee_angle_r
        XAttachment:
          natCubicSpline: min_x=0 max_x=0 min_y=0 max_y=0 min_z=0 max_z=0
              x=(-2.094395 -1.999973 -1.570796 -1.457524 -1.396263 -1.047198 -0.6981317 -0.5263913 -0.3490659 -0.1745329 0 0.00017453 0.00034907 0.02792527 0.08726646 0.1745329 2.094395)
              y=(0.00918037 0.01185829 0.02241932 0.02480374 0.02603021 0.03248082 0.03877798 0.04202319 0.04578026 0.05163005 0.06154415 0.06155552 0.0615669 0.06343994 0.0679898 0.07594021 0.07199533)
        YAttachment:
          natCubicSpline: min_x=0 max_x=0 min_y=0 max_y=0 min_z=0 max_z=0
              x=(-2.094395 -1.999973 -1.570796 -1.457524 -1.396263 -1.047198 -0.6981317 -0.5263913 -0.3490659 -0.1745329 0 0.00017453 0.00034907 0.02792527 0.08726646 0.1745329 2.094395)
              y=(0.02840569 0.02879372 0.03030691 0.03049249 0.03053184 0.03011148 0.02948721 0.02919156 0.02898233 0.02886495 0.02806535 0.02806396 0.02806256 0.02779933 0.02687449 0.02422207 -0.07608857)
        ZAttachment:
          natCubicSpline: min_x=0 max_x=0 min_y=0 max_y=0 min_z=0 max_z=0 x=(-2.0944 2.0944) y=(0.00199735 0.00199735)
    Thelen2003Muscle vas_lat_r: max_isometric_force=1871 optimal_fiber_length=0.0886698 tendon_slack_length=0.1657281
        pennation_angle=0.08726646
      MusclePoint P1: femur_r (0.00507581 -0.1960531 0.03690536)
      MusclePoint P2: femur_r (0.02844568 -0.2739879 0.04325012)
      MuscleViaPoint P3: femur_r (0.03817431 -0.4261564 0.02167793) range=(-2.617994 -1.210037) coordinate=knee_angle_r
      MuscleViaPoint P4: femur_r (0.02675374 -0.4486803 0.01945726) range=(-2.617994 -1.920037) coordinate=knee_angle_r
      MovingMusclePoint P5: tibia_r (0.0665292 0.02173383 0.01830905) x_coordinate=knee_angle_r
          y_coordinate=knee_angle_r z_coordinate=knee_angle_r
        XAttachment:
          natCubicSpline: min_x=0 max_x=0 min_y=0 max_y=0 min_z=0 max_z=0
              x=(-2.094395 -1.999973 -1.570796 -1.457524 -1.396263 -1.047198 -0.6981317 -0.5263913 -0.3490659 -0.1745329 0 0.00017453 0.00034907 0.02792527 0.08726646 0.1745329 2.094395)
              y=(0.01585643 0.01853434 0.02908866 0.0314719 0.03269818 0.03913799 0.04536035 0.04852356 0.05212023 0.05756168 0.0665292 0.06653921 0.06654923 0.06819593 0.07216552 0.07899155 0.06477693)
        YAttachment:
          natCubicSpline: min_x=0 max_x=0 min_y=0 max_y=0 min_z=0 max_z=0
              x=(-2.094395 -1.999973 -1.570796 -1.457524 -1.396263 -1.047198 -0.6981317 -0.5263913 -0.3490659 -0.1745329 0 0.00017453 0.00034907 0.02792527 0.08726646 0.1745329 2.094395)
              y=(0.02389249 0.02428051 0.02578379 0.02596763 0.0260067 0.02557046 0.02483843 0.02442881 0.02400805 0.02341019 0.02173383 0.02173138 0.02172892 0.02129399 0.01998232 0.01676365 -0.07250619)
        ZAttachment:
          natCubicSpline: min_x=0 max_x=0 min_y=0 max_y=0 min_z=0 max_z=0 x=(-2.094395 2.094395)
              y=(0.01830905 0.01830905)
    Thelen2003Muscle med_gas_r: max_isometric_force=1558 optimal_fiber_length=0.06695604 tendon_slack_length=0.4352143
        pennation_angle=0.296706
      MusclePoint P1: femur_r (-0.02009174 -0.415476 -0.02485031)
      MuscleViaPoint P2: femur_r (-0.0317238 -0.4253104 -0.02728247) range=(-0.7853982 0.1745329)
          coordinate=knee_angle_r
      MusclePoint P3: calcn_r (0 0.03114257 -0.00532438)
    Thelen2003Muscle lat_gas_r: max_isometric_force=683 optimal_fiber_length=0.07144066 tendon_slack_length=0.4241789
        pennation_angle=0.1396263
      MusclePoint P1: femur_r (-0.02326412 -0.4172737 0.02876291)
      MuscleViaPoint P2: femur_r (-0.0317238 -0.4248874 0.02897441) range=(-0.7853982 0.1745329)
          coordinate=knee_angle_r
      MusclePoint P3: calcn_r (0 0.03114257 -0.00532438)
    Thelen2003Muscle soleus_r: max_isometric_force=3549 optimal_fiber_length=0.0560322 tendon_slack_length=0.280161
        pennation_angle=0.4363323
      MusclePoint P1: tibia_r (-0.00266313 -0.1701077 0.00787844)
      MusclePoint P2: calcn_r (0 0.03114257 -0.00532438)
    Thelen2003Muscle tib_post_r: max_isometric_force=1588 optimal_fiber_length=0.03430258 tendon_slack_length=0.3430258
        pennation_angle=0.2094395
      MusclePoint P1: tibia_r (-0.01043061 -0.1495793 0.00210831)
      MusclePoint P2: tibia_r (-0.0159788 -0.4495148 -0.02541074)
      MusclePoint P3: calcn_r (0.04189178 0.03355361 -0.02873153)
      MusclePoint P4: calcn_r (0.07755505 0.01597313 -0.02822924)
    Thelen2003Muscle flex_dig_r: max_isometric_force=310 optimal_fiber_length=0.03630028 tendon_slack_length=0.4270621
        pennation_angle=0.1221731
      MusclePoint P1: tibia_r (-0.00921 -0.2270322 -0.00199735)
      MusclePoint P2: tibia_r (-0.01708844 -0.4495148 -0.02174893)
      MusclePoint P3: calcn_r (0.04380052 0.03164487 -0.02812878)
      MusclePoint P4: calcn_r (0.07112562 0.01768094 -0.02642096)
      MusclePoint P5: calcn_r (0.1665625 -0.00813725 0.01165335)
      MusclePoint P6: toes_r (-0.00190874 -0.00783587 0.01476761)
      MusclePoint P7: toes_r (0.02863108 -0.00713265 0.02159888)
      MusclePoint P8: toes_r (0.04430282 -0.00602759 0.0243113)
    Thelen2003Muscle flex_hal_r: max_isometric_force=322 optimal_fiber_length=0.0457814 tendon_slack_length=0.4045799
        pennation_angle=0.1745329
      MusclePoint P1: tibia_r (-0.00876615 -0.2589898 0.02707519)
      MusclePoint P2: tibia_r (-0.02063929 -0.4526218 -0.01930772)
      MusclePoint P3: calcn_r (0.03757201 0.02772694 -0.02421084)
      MusclePoint P4: calcn_r (0.1042774 0.00683127 -0.02571774)
      MusclePoint P5: calcn_r (0.1733938 -0.00532438 -0.02702372)
      MusclePoint P6: toes_r (0.01557129 -0.00642943 -0.02662188)
      MusclePoint P7: toes_r (0.05645847 -0.01024691 -0.01818324)
    Thelen2003Muscle tib_ant_r: max_isometric_force=905 optimal_fiber_length=0.1074971 tendon_slack_length=0.2446108
        pennation_angle=0.08726646
      MusclePoint P1: tibia_r (0.01986254 -0.1802054 0.01276085)
      MusclePoint P2: tibia_r (0.03650713 -0.4384184 -0.01964061)
      MusclePoint P3: calcn_r (0.1171363 0.01788186 -0.03064027)
    Thelen2003Muscle per_brev_r: max_isometric_force=435 optimal_fiber_length=0.05479754 tendon_slack_length=0.1764481
        pennation_angle=0.08726646
      MusclePoint P1: tibia_r (-0.00776747 -0.2936105 0.03606327)
      MusclePoint P2: tibia_r (-0.02197085 -0.464273 0.03140279)
      MusclePoint P3: tibia_r (-0.0159788 -0.47659 0.03206857)
      MusclePoint P4: calcn_r (0.04731662 0.02712418 0.02340716)
      MusclePoint P5: calcn_r (0.06801136 0.02200072 0.03445775)
    Thelen2003Muscle per_long_r: max_isometric_force=943 optimal_fiber_length=0.05310134 tendon_slack_length=0.3738768
        pennation_angle=0.1745329
      MusclePoint P1: tibia_r (0.00055482 -0.1739914 0.04016894)
      MusclePoint P2: tibia_r (-0.02296953 -0.4666033 0.03173568)
      MusclePoint P3: tibia_r (-0.01797615 -0.4792531 0.03206857)
      MusclePoint P4: calcn_r (0.04400144 0.02310578 0.02220164)
      MusclePoint P5: calcn_r (0.0684132 0.01064875 0.02853062)
      MusclePoint P6: calcn_r (0.08559185 0.00693173 0.01185427)
      MusclePoint P7: calcn_r (0.1208533 0.00853909 -0.01848462)
    Thelen2003Muscle per_tert_r: max_isometric_force=180 optimal_fiber_length=0.08720689 tendon_slack_length=0.1103885
        pennation_angle=0.2268928
      MusclePoint P1: tibia_r (0.00110964 -0.3111428 0.02563266)
      MusclePoint P2: tibia_r (0.02541074 -0.4515122 0.01764326)
      MusclePoint P3: calcn_r (0.08609414 0.02290486 0.03003751)
    Thelen2003Muscle ext_dig_r: max_isometric_force=512 optimal_fiber_length=0.1100157 tendon_slack_length=0.3721121
        pennation_angle=0.1396263
      MusclePoint P1: tibia_r (0.00355085 -0.1532412 0.03062604)
      MusclePoint P2: tibia_r (0.03206857 -0.4446324 0.0079894)
      MusclePoint P3: calcn_r (0.09262404 0.03897845 -0.00010046)
      MusclePoint P4: calcn_r (0.1623432 0.0055253 0.01305979)
      MusclePoint P5: toes_r (0.00030138 0.00472162 0.01537037)
      MusclePoint P6: toes_r (0.04450374 -0.00040184 0.02511498)
    Thelen2003Muscle ext_hal_r: max_isometric_force=162 optimal_fiber_length=0.1192289 tendon_slack_length=0.3276109
        pennation_angle=0.1047198
      MusclePoint P1: tibia_r (0.00133157 -0.1960732 0.02529977)
      MusclePoint P2: tibia_r (0.03617424 -0.4421912 -0.00943193)
      MusclePoint P3: calcn_r (0.09744612 0.03907891 -0.02119704)
      MusclePoint P4: calcn_r (0.1298947 0.03104211 -0.0258182)
      MusclePoint P5: calcn_r (0.1741975 0.01396393 -0.02812878)
      MusclePoint P6: toes_r (0.02993705 0.00411886 -0.02461268)
      MusclePoint P7: toes_r (0.05655893 0.00341564 -0.01868554)
    Thelen2003Muscle glut_med1_l: max_isometric_force=819 optimal_fiber_length=0.05381592
        tendon_slack_length=0.07846059 pennation_angle=0.1396263
      MusclePoint P1: pelvis (-0.04038521 0.03009094 -0.1196709)
      MusclePoint P2: femur_l (-0.02305263 -0.01237228 -0.05868903)
    Thelen2003Muscle glut_med2_l: max_isometric_force=573 optimal_fiber_length=0.08502918
        tendon_slack_length=0.05333191 pennation_angle=0
      MusclePoint P1: pelvis (-0.08463077 0.04404759 -0.07582125)
      MusclePoint P2: femur_l (-0.02728247 -0.00613327 -0.05572814)
    Thelen2003Muscle glut_med3_l: max_isometric_force=653 optimal_fiber_length=0.06521104
        tendon_slack_length=0.05350132 pennation_angle=0.3316126
      MusclePoint P1: pelvis (-0.1210566 0.01039325 -0.06414121)
      MusclePoint P2: femur_l (-0.03267552 -0.00497006 -0.05477643)
    Thelen2003Muscle glut_min1_l: max_isometric_force=270 optimal_fiber_length=0.06926941
        tendon_slack_length=0.01629869 pennation_angle=0.1745329
      MusclePoint P1: pelvis (-0.04622523 -0.00791867 -0.1045264)
      MusclePoint P2: femur_l (-0.00761371 -0.01099758 -0.05921776)
    Thelen2003Muscle glut_min2_l: max_isometric_force=285 optimal_fiber_length=0.05721607 tendon_slack_length=0.0265646
        pennation_angle=0
      MusclePoint P1: pelvis (-0.06265646 -0.00643392 -0.0980925)
      MusclePoint P2: femur_l (-0.01015162 -0.01099758 -0.05921776)
    Thelen2003Muscle glut_min3_l: max_isometric_force=323 optimal_fiber_length=0.03883691
        tendon_slack_length=0.05212323 pennation_angle=0.01745329
      MusclePoint P1: pelvis (-0.08255212 -0.00623595 -0.08472975)
      MusclePoint P2: femur_l (-0.01427571 -0.00877692 -0.0581603)
    Thelen2003Muscle semimem_l: max_isometric_force=1288 optimal_fiber_length=0.085499 tendon_slack_length=0.3836768
        pennation_angle=0.2617994
      MusclePoint P1: pelvis (-0.1179882 -0.09647907 -0.070783)
      MuscleViaPoint P2: tibia_l (-0.03861544 -0.0390482 0.02098328) range=(-0.5585054 0.1745329)
          coordinate=knee_angle_l
      MusclePoint P3: tibia_l (-0.02996026 -0.05294088 0.02171564)
    Thelen2003Muscle semiten_l: max_isometric_force=410 optimal_fiber_length=0.2163093 tendon_slack_length=0.2749603
        pennation_angle=0.08726646
      MusclePoint P1: pelvis (-0.1250655 -0.1087629 -0.05977605)
      MuscleViaPoint P2: tibia_l (-0.04663813 -0.03172458 0.02526648) range=(-0.3316126 0.1745329)
          coordinate=knee_angle_l
      MusclePoint P3: tibia_l (-0.03686221 -0.05861114 0.02538854)
      MusclePoint P4: tibia_l (-0.01253892 -0.08277908 0.02718616)
      MusclePoint P5: tibia_l (0.00299603 -0.1060815 0.02141603)
    Thelen2003Muscle bifemlh_l: max_isometric_force=896 optimal_fiber_length=0.1166332 tendon_slack_length=0.3488294
        pennation_angle=0
      MusclePoint P1: pelvis (-0.1246794 -0.1015272 -0.06873404)
      MusclePoint P2: tibia_l (-0.03340014 -0.03994701 -0.03265668)
      MusclePoint P3: tibia_l (-0.02596556 -0.06247268 -0.03806062)
    Thelen2003Muscle bifemsh_l: max_isometric_force=804 optimal_fiber_length=0.1852719 tendon_slack_length=0.0953133
        pennation_angle=0.4014257
      MusclePoint P1: femur_l (0.0052873 -0.2232298 -0.02474456)
      MusclePoint P2: tibia_l (-0.03340014 -0.03994701 -0.03265668)
      MusclePoint P3: tibia_l (-0.02596556 -0.06247268 -0.03806062)
    Thelen2003Muscle sar_l: max_isometric_force=156 optimal_fiber_length=0.5496341 tendon_slack_length=0.1056989
        pennation_angle=0
      MusclePoint P1: pelvis (-0.01514445 -0.00128678 -0.1229373)
      MusclePoint P2: femur_l (-0.00317238 -0.3773017 0.04451907)
      MusclePoint P3: tibia_l (-0.00621398 -0.04649388 0.0442746)
      MusclePoint P4: tibia_l (0.00665783 -0.06535774 0.04249918)
      MusclePoint P5: tibia_l (0.02696423 -0.09320969 0.02796291)
    Thelen2003Muscle add_long_l: max_isometric_force=627 optimal_fiber_length=0.1451811 tendon_slack_length=0.1157241
        pennation_angle=0.1047198
      MusclePoint P1: pelvis (-0.03127874 -0.08275008 -0.01672819)
      MusclePoint P2: femur_l (0.0052873 -0.2232298 -0.02474456)
    Thelen2003Muscle add_brev_l: max_isometric_force=429 optimal_fiber_length=0.1386401 tendon_slack_length=0.02084814
        pennation_angle=0
      MusclePoint P1: pelvis (-0.05810323 -0.09056977 -0.01623327)
      MusclePoint P2: femur_l (0.00095171 -0.1264722 -0.03108933)
    Thelen2003Muscle add_mag1_l: max_isometric_force=381 optimal_fiber_length=0.09131077 tendon_slack_length=0.06297294
        pennation_angle=0.08726646
      MusclePoint P1: pelvis (-0.07245581 -0.1162065 -0.02524076)
      MusclePoint P2: femur_l (-0.00475857 -0.1280584 -0.0358479)
    Thelen2003Muscle add_mag2_l: max_isometric_force=343 optimal_fiber_length=0.1291276 tendon_slack_length=0.1280604
        pennation_angle=0.05235988
      MusclePoint P1: pelvis (-0.08225517 -0.1179882 -0.03048687)
      MusclePoint P2: femur_l (0.00571028 -0.2416296 -0.02400434)
    Thelen2003Muscle add_mag3_l: max_isometric_force=488 optimal_fiber_length=0.1396089 tendon_slack_length=0.2653634
        pennation_angle=0.08726646
      MusclePoint P1: pelvis (-0.1099507 -0.1129697 -0.04832367)
      MusclePoint P2: femur_l (0.00740222 -0.4057474 0.02812844)
    Thelen2003Muscle tfl_l: max_isometric_force=233 optimal_fiber_length=0.09985267 tendon_slack_length=0.4467093
        pennation_angle=0.05235988
      MusclePoint P1: pelvis (-0.03078382 0.02118244 -0.1228383)
      MusclePoint P2: femur_l (0.03108933 -0.1052173 -0.06313036)
      MusclePoint P3: femur_l (0.00571028 -0.4281656 -0.03775132)
      MusclePoint P4: tibia_l (0.00665783 -0.05403942 -0.03295628)
    Thelen2003Muscle pect_l: max_isometric_force=266 optimal_fiber_length=0.1040315 tendon_slack_length=0.03433039
        pennation_angle=0
      MusclePoint P1: pelvis (-0.04266183 -0.07601922 -0.04464149)
      MusclePoint P2: femur_l (-0.01290101 -0.08692322 -0.02675374)
    Thelen2003Muscle grac_l: max_isometric_force=162 optimal_fiber_length=0.378963 tendon_slack_length=0.1356515
        pennation_angle=0.05235988
      MusclePoint P1: pelvis (-0.07325758 -0.1174932 -0.02765595)
      MuscleViaPoint P2: tibia_l (-0.02948311 -0.03539749 0.04187778) range=(-0.4363323 0.1745329)
          coordinate=knee_angle_l
      MusclePoint P3: tibia_l (-0.02156029 -0.0571797 0.03972508)
      MusclePoint P4: tibia_l (0.00665783 -0.09276583 0.02529977)
    Thelen2003Muscle glut_max1_l: max_isometric_force=573 optimal_fiber_length=0.1438791 tendon_slack_length=0.1266541
        pennation_angle=0.08726646
      MusclePoint P1: pelvis (-0.1182851 0.06057781 -0.06928835)
      MusclePoint P2: pelvis (-0.1277875 0.0011878 -0.08769925)
      MusclePoint P3: femur_l (-0.04832592 -0.02622501 -0.04145243)
      MusclePoint P4: femur_l (-0.02929164 -0.05985224 -0.04970062)
    Thelen2003Muscle glut_max2_l: max_isometric_force=819 optimal_fiber_length=0.1502928 tendon_slack_length=0.1298448
        pennation_angle=0
      MusclePoint P1: pelvis (-0.1335285 0.01742107 -0.05572763)
      MusclePoint P2: pelvis (-0.1362011 -0.05147134 -0.09047079)
      MusclePoint P3: femur_l (-0.0450478 -0.05604538 -0.03098358)
      MusclePoint P4: femur_l (-0.01649638 -0.1074379 -0.04430758)
    Thelen2003Muscle glut_max3_l: max_isometric_force=552 optimal_fiber_length=0.1472803 tendon_slack_length=0.148303
        pennation_angle=0.08726646
      MusclePoint P1: pelvis (-0.1540181 -0.03108077 -0.00574103)
      MusclePoint P2: pelvis (-0.1513455 -0.1041305 -0.03989029)
      MusclePoint P3: femur_l (-0.03161806 -0.1100816 -0.01427571)
      MusclePoint P4: femur_l (-0.00634476 -0.1500536 -0.04346161)
    Thelen2003Muscle iliacus_l: max_isometric_force=1073 optimal_fiber_length=0.1010062 tendon_slack_length=0.1010062
        pennation_angle=0.1221731
      MusclePoint P1: pelvis (-0.06671478 0.03612892 -0.08453178)
      MusclePoint P2: pelvis (-0.02553771 -0.05444084 -0.0802755)
      MuscleViaPoint P3: pelvis (-0.02850721 -0.0796816 -0.08077042) range=(-1.570796 0.7853982)
          coordinate=hip_flexion_l
      MusclePoint P4: femur_l (0.00179768 -0.05742008 -0.00602752)
      MusclePoint P5: femur_l (-0.02040898 -0.06566827 -0.01364123)
    Thelen2003Muscle psoas_l: max_isometric_force=1113 optimal_fiber_length=0.1004636 tendon_slack_length=0.1607417
        pennation_angle=0.1396263
      MusclePoint P1: pelvis (-0.06404223 0.08779823 -0.02860619)
      MusclePoint P2: pelvis (-0.02355804 -0.05642051 -0.07512837)
      MuscleViaPoint P3: pelvis (-0.02850721 -0.0796816 -0.08077042) range=(-1.570796 0.7853982)
          coordinate=hip_flexion_l
      MusclePoint P4: femur_l (0.00169194 -0.05361322 -0.00401835)
      MusclePoint P5: femur_l (-0.01988025 -0.06313036 -0.01099758)
    Thelen2003Muscle quad_fem_l: max_isometric_force=381 optimal_fiber_length=0.05490422 tendon_slack_length=0.02440187
        pennation_angle=0
      MusclePoint P1: pelvis (-0.113138 -0.1139298 -0.05147134)
      MusclePoint P2: femur_l (-0.04028923 -0.03796282 -0.03870304)
    Thelen2003Muscle gem_l: max_isometric_force=164 optimal_fiber_length=0.02457487 tendon_slack_length=0.03993416
        pennation_angle=0
      MusclePoint P1: pelvis (-0.1121481 -0.08116635 -0.07067411)
      MusclePoint P2: femur_l (-0.01501593 -0.00348962 -0.04684548)
    Thelen2003Muscle peri_l: max_isometric_force=444 optimal_fiber_length=0.0261112 tendon_slack_length=0.1154918
        pennation_angle=0.1745329
      MusclePoint P1: pelvis (-0.1381808 0.00029695 -0.02326109)
      MusclePoint P2: pelvis (-0.1180871 -0.02731941 -0.06503206)
      MusclePoint P3: femur_l (-0.01565041 -0.00380686 -0.046211)
    Thelen2003Muscle rect_fem_l: max_isometric_force=1169 optimal_fiber_length=0.1196597 tendon_slack_length=0.3253904
        pennation_angle=0.08726646
      MusclePoint P1: pelvis (-0.02920009 -0.03078382 -0.09581589)
      MuscleViaPoint P2: femur_l (0.03531917 -0.4261564 -0.00200917) range=(-2.617994 -1.459968)
          coordinate=knee_angle_l
      MovingMusclePoint P3: tibia_l (0.06852859 0.02328469 -0.00155349) x_coordinate=knee_angle_l
          y_coordinate=knee_angle_l z_coordinate=knee_angle_l
        XAttachment:
          natCubicSpline: min_x=0 max_x=0 min_y=0 max_y=0 min_z=0 max_z=0
              x=(-2.094395 -1.999973 -1.570796 -1.457524 -1.396263 -1.047198 -0.6981317 -0.5263913 -0.3490659 -0.1745329 0 0.00017453 0.00034907 0.02792527 0.08726646 0.1745329 2.094395)
              y=(0.01728873 0.01996665 0.03052407 0.03290785 0.03413422 0.04057898 0.04683501 0.05003382 0.05369655 0.05928794 0.06852859 0.06853894 0.06854929 0.07024938 0.07433912 0.08134039 0.06363567)
        YAttachment:
          natCubicSpline: min_x=0 max_x=0 min_y=0 max_y=0 min_z=0 max_z=0
              x=(-2.094395 -1.999973 -1.570796 -1.457524 -1.396263 -1.047198 -0.6981317 -0.5263913 -0.3490659 -0.1745329 0 0.00017453 0.00034907 0.02792527 0.08726646 0.1745329 2.094395)
              y=(0.02597845 0.02636648 0.02786762 0.0280511 0.0280901 0.02765043 0.02689467 0.02645904 0.02598744 0.02526027 0.02328469 0.02328181 0.02327893 0.02277254 0.02127779 0.01770478 -0.07476456)
        ZAttachment:
          natCubicSpline: min_x=0 max_x=0 min_y=0 max_y=0 min_z=0 max_z=0 x=(-2.0944 0.1745)
              y=(-0.00155349 -0.00155349)
    Thelen2003Muscle vas_med_l: max_isometric_force=1294 optimal_fiber_length=0.09386752 tendon_slack_length=0.1328911
        pennation_angle=0.08726646
      MusclePoint P1: femur_l (0.01480444 -0.2219609 -0.01988025)
      MusclePoint P2: femur_l (0.03764558 -0.2928107 -0.00095171)
      MuscleViaPoint P3: femur_l (0.03912602 -0.4280598 0.01321825) range=(-2.617994 -1.210037) coordinate=knee_angle_l
      MuscleViaPoint P4: femur_l (0.02897441 -0.4499493 0.01385273) range=(-2.617994 -1.780061) coordinate=knee_angle_l
      MovingMusclePoint P5: tibia_l (0.06209386 0.02418088 0.01620073) x_coordinate=knee_angle_l
          y_coordinate=knee_angle_l z_coordinate=knee_angle_l
        XAttachment:
          natCubicSpline: min_x=0 max_x=0 min_y=0 max_y=0 min_z=0 max_z=0
              x=(-2.094395 -1.999973 -1.570796 -1.457524 -1.396263 -1.047198 -0.6981317 -0.5263913 -0.3490659 -0.1745329 0 0.00017453 0.00034907 0.02792527 0.08726646 0.1745329 2.094395)
              y=(0.01088663 0.01356455 0.02412033 0.02650383 0.02773015 0.03417232 0.04041164 0.04359446 0.04723227 0.05279265 0.06209386 0.0621044 0.06211494 0.06385071 0.0680617 0.07540032 0.06983311)
        YAttachment:
          natCubicSpline: min_x=0 max_x=0 min_y=0 max_y=0 min_z=0 max_z=0
              x=(-2.094395 -1.999973 -1.570796 -1.457524 -1.396263 -1.047198 -0.6981317 -0.5263913 -0.3490659 -0.1745329 0 0.00017453 0.00034907 0.02792527 0.08726646 0.1745329 2.094395)
              y=(0.024873 0.02526103 0.02677169 0.02695682 0.0269961 0.0265717 0.02592036 0.0255968 0.02533776 0.02511801 0.02418088 0.02417938 0.02417786 0.02389772 0.02295198 0.02033623 -0.07281504)
        ZAttachment:
          natCubicSpline: min_x=0 max_x=0 min_y=0 max_y=0 min_z=0 max_z=0 x=(-2.094395 2.094395)
              y=(0.01620073 0.01620073)
    Thelen2003Muscle vas_int_l: max_isometric_force=1365 optimal_fiber_length=0.09171956 tendon_slack_length=0.1433777
        pennation_angle=0.05235988
      MusclePoint P1: femur_l (0.03066634 -0.2034553 -0.03278126)
      MusclePoint P2: femur_l (0.03542491 -0.2203747 -0.03013761)
      MuscleViaPoint P3: femur_l (0.03627088 -0.4261564 -0.00581603) range=(-2.617994 -1.42) coordinate=knee_angle_l
      MovingMusclePoint P4: tibia_l (0.06852859 0.02328469 -0.00155349) x_coordinate=knee_angle_l
          y_coordinate=knee_angle_l z_coordinate=knee_angle_l
        XAttachment:
          natCubicSpline: min_x=0 max_x=0 min_y=0 max_y=0 min_z=0 max_z=0
              x=(-2.094395 -1.999973 -1.570796 -1.457524 -1.396263 -1.047198 -0.6981317 -0.5263913 -0.3490659 -0.1745329 0 0.00017453 0.00034907 0.02792527 0.08726646 0.1745329 2.094395)
              y=(0.01728873 0.01996665 0.03052407 0.03290785 0.03413422 0.04057898 0.04683501 0.05003382 0.05369655 0.05928794 0.06852859 0.06853894 0.06854929 0.07024938 0.07433912 0.08134039 0.06363567)
        YAttachment:
          natCubicSpline: min_x=0 max_x=0 min_y=0 max_y=0 min_z=0 max_z=0
              x=(-2.094395 -1.999973 -1.570796 -1.457524 -1.396263 -1.047198 -0.6981317 -0.5263913 -0.3490659 -0.1745329 0 0.00017453 0.00034907 0.02792527 0.08726646 0.1745329 2.094395)
              y=(0.02597845 0.02636648 0.02786762 0.0280511 0.0280901 0.02765043 0.02689467 0.02645904 0.02598744 0.02526027 0.02328469 0.02328181 0.02327893 0.02277254 0.02127779 0.01770478 -0.07476456)
        ZAttachment:
          natCubicSpline: min_x=0 max_x=0 min_y=0 max_y=0 min_z=0 max_z=0 x=(-2.0944 0.1745)
              y=(-0.00155349 -0.00155349)
    Thelen2003Muscle vas_lat_l: max_isometric_force=1871 optimal_fiber_length=0.0886698 tendon_slack_length=0.1657281
        pennation_angle=0.08726646
      MusclePoint P1: femur_l (0.00507581 -0.1960531 -0.03690536)
      MusclePoint P2: femur_l (0.02844568 -0.2739879 -0.04325012)
      MuscleViaPoint P3: femur_l (0.03817431 -0.4261564 -0.02167793) range=(-2.617994 -1.210037)
          coordinate=knee_angle_l
      MuscleViaPoint P4: femur_l (0.02675374 -0.4486803 -0.01945726) range=(-2.617994 -1.920037)
          coordinate=knee_angle_l
      MovingMusclePoint P5: tibia_l (0.0665292 0.02173383 -0.01830905) x_coordinate=knee_angle_l
          y_coordinate=knee_angle_l z_coordinate=knee_angle_l
        XAttachment:
          natCubicSpline: min_x=0 max_x=0 min_y=0 max_y=0 min_z=0 max_z=0
              x=(-2.094395 -1.999973 -1.570796 -1.457524 -1.396263 -1.047198 -0.6981317 -0.5263913 -0.3490659 -0.1745329 0 0.00017453 0.00034907 0.02792527 0.08726646 0.1745329 2.094395)
              y=(0.01585643 0.01853434 0.02908866 0.0314719 0.03269818 0.03913799 0.04536035 0.04852356 0.05212023 0.05756168 0.0665292 0.06653921 0.06654923 0.06819593 0.07216552 0.07899155 0.06477693)
        YAttachment:
          natCubicSpline: min_x=0 max_x=0 min_y=0 max_y=0 min_z=0 max_z=0
              x=(-2.094395 -1.999973 -1.570796 -1.457524 -1.396263 -1.047198 -0.6981317 -0.5263913 -0.3490659 -0.1745329 0 0.00017453 0.00034907 0.02792527 0.08726646 0.1745329 2.094395)
              y=(0.02389249 0.02428051 0.02578379 0.02596763 0.0260067 0.02557046 0.02483843 0.02442881 0.02400805 0.02341019 0.02173383 0.02173138 0.02172892 0.02129399 0.01998232 0.01676365 -0.07250619)
        ZAttachment:
          natCubicSpline: min_x=0 max_x=0 min_y=0 max_y=0 min_z=0 max_z=0 x=(-2.094395 2.094395)
              y=(-0.01830905 -0.01830905)
    Thelen2003Muscle med_gas_l: max_isometric_force=1558 optimal_fiber_length=0.06695604 tendon_slack_length=0.4352143
        pennation_angle=0.296706
      MusclePoint P1: femur_l (-0.02009174 -0.415476 0.02485031)
      MuscleViaPoint P2: femur_l (-0.0317238 -0.4253104 0.02728247) range=(-0.7853982 0.1745329)
          coordinate=knee_angle_l
      MusclePoint P3: calcn_l (0 0.03114257 0.00532438)
    Thelen2003Muscle lat_gas_l: max_isometric_force=683 optimal_fiber_length=0.07144066 tendon_slack_length=0.4241789
        pennation_angle=0.1396263
      MusclePoint P1: femur_l (-0.02326412 -0.4172737 -0.02876291)
      MuscleViaPoint P2: femur_l (-0.0317238 -0.4248874 -0.02897441) range=(-0.7853982 0.1745329)
          coordinate=knee_angle_l
      MusclePoint P3: calcn_l (0 0.03114257 0.00532438)
    Thelen2003Muscle soleus_l: max_isometric_force=3549 optimal_fiber_length=0.0560322 tendon_slack_length=0.280161
        pennation_angle=0.4363323
      MusclePoint P1: tibia_l (-0.00266313 -0.1701077 -0.00787844)
      MusclePoint P2: calcn_l (0 0.03114257 0.00532438)
    Thelen2003Muscle tib_post_l: max_isometric_force=1588 optimal_fiber_length=0.03430258 tendon_slack_length=0.3430258
        pennation_angle=0.2094395
      MusclePoint P1: tibia_l (-0.01043061 -0.1495793 -0.00210831)
      MusclePoint P2: tibia_l (-0.0159788 -0.4495148 0.02541074)
      MusclePoint P3: calcn_l (0.04189178 0.03355361 0.02873153)
      MusclePoint P4: calcn_l (0.07755505 0.01597313 0.02822924)
    Thelen2003Muscle flex_dig_l: max_isometric_force=310 optimal_fiber_length=0.03630028 tendon_slack_length=0.4270621
        pennation_angle=0.1221731
      MusclePoint P1: tibia_l (-0.00921 -0.2270322 0.00199735)
      MusclePoint P2: tibia_l (-0.01708844 -0.4495148 0.02174893)
      MusclePoint P3: calcn_l (0.04380052 0.03164487 0.02812878)
      MusclePoint P4: calcn_l (0.07112562 0.01768094 0.02642096)
      MusclePoint P5: calcn_l (0.1665625 -0.00813725 -0.01165335)
      MusclePoint P6: toes_l (-0.00190874 -0.00783587 -0.01476761)
      MusclePoint P7: toes_l (0.02863108 -0.00713265 -0.02159888)
      MusclePoint P8: toes_l (0.04430282 -0.00602759 -0.0243113)
    Thelen2003Muscle flex_hal_l: max_isometric_force=322 optimal_fiber_length=0.0457814 tendon_slack_length=0.4045799
        pennation_angle=0.1745329
      MusclePoint P1: tibia_l (-0.00876615 -0.2589898 -0.02707519)
      MusclePoint P2: tibia_l (-0.02063929 -0.4526218 0.01930772)
      MusclePoint P3: calcn_l (0.03757201 0.02772694 0.02421084)
      MusclePoint P4: calcn_l (0.1042774 0.00683127 0.02571774)
      MusclePoint P5: calcn_l (0.1733938 -0.00532438 0.02702372)
      MusclePoint P6: toes_l (0.01557129 -0.00642943 0.02662188)
      MusclePoint P7: toes_l (0.05645847 -0.01024691 0.01818324)
    Thelen2003Muscle tib_ant_l: max_isometric_force=905 optimal_fiber_length=0.1074971 tendon_slack_length=0.2446108
        pennation_angle=0.08726646
      MusclePoint P1: tibia_l (0.01986254 -0.1802054 -0.01276085)
      MusclePoint P2: tibia_l (0.03650713 -0.4384184 0.01964061)
      MusclePoint P3: calcn_l (0.1171363 0.01788186 0.03064027)
    Thelen2003Muscle per_brev_l: max_isometric_force=435 optimal_fiber_length=0.05479754 tendon_slack_length=0.1764481
        pennation_angle=0.08726646
      MusclePoint P1: tibia_l (-0.00776747 -0.2936105 -0.03606327)
      MusclePoint P2: tibia_l (-0.02197085 -0.464273 -0.03140279)
      MusclePoint P3: tibia_l (-0.0159788 -0.47659 -0.03206857)
      MusclePoint P4: calcn_l (0.04731662 0.02712418 -0.02340716)
      MusclePoint P5: calcn_l (0.06801136 0.02200072 -0.03445775)
    Thelen2003Muscle per_long_l: max_isometric_force=943 optimal_fiber_length=0.05310134 tendon_slack_length=0.3738768
        pennation_angle=0.1745329
      MusclePoint P1: tibia_l (0.00055482 -0.1739914 -0.04016894)
      MusclePoint P2: tibia_l (-0.02296953 -0.4666033 -0.03173568)
      MusclePoint P3: tibia_l (-0.01797615 -0.4792531 -0.03206857)
      MusclePoint P4: calcn_l (0.04400144 0.02310578 -0.02220164)
      MusclePoint P5: calcn_l (0.0684132 0.01064875 -0.02853062)
      MusclePoint P6: calcn_l (0.08559185 0.00693173 -0.01185427)
      MusclePoint P7: calcn_l (0.1208533 0.00853909 0.01848462)
    Thelen2003Muscle per_tert_l: max_isometric_force=180 optimal_fiber_length=0.08720689 tendon_slack_length=0.1103885
        pennation_angle=0.2268928
      MusclePoint P1: tibia_l (0.00110964 -0.3111428 -0.02563266)
      MusclePoint P2: tibia_l (0.02541074 -0.4515122 -0.01764326)
      MusclePoint P3: calcn_l (0.08609414 0.02290486 -0.03003751)
    Thelen2003Muscle ext_dig_l: max_isometric_force=512 optimal_fiber_length=0.1100157 tendon_slack_length=0.3721121
        pennation_angle=0.1396263
      MusclePoint P1: tibia_l (0.00355085 -0.1532412 -0.03062604)
      MusclePoint P2: tibia_l (0.03206857 -0.4446324 -0.0079894)
      MusclePoint P3: calcn_l (0.09262404 0.03897845 0.00010046)
      MusclePoint P4: calcn_l (0.1623432 0.0055253 -0.01305979)
      MusclePoint P5: toes_l (0.00030138 0.00472162 -0.01537037)
      MusclePoint P6: toes_l (0.04450374 -0.00040184 -0.02511498)
    Thelen2003Muscle ext_hal_l: max_isometric_force=162 optimal_fiber_length=0.1192289 tendon_slack_length=0.3276109
        pennation_angle=0.1047198
      MusclePoint P1: tibia_l (0.00133157 -0.1960732 -0.02529977)
      MusclePoint P2: tibia_l (0.03617424 -0.4421912 0.00943193)
      MusclePoint P3: calcn_l (0.09744612 0.03907891 0.02119704)
      MusclePoint P4: calcn_l (0.1298947 0.03104211 0.0258182)
      MusclePoint P5: calcn_l (0.1741975 0.01396393 0.02812878)
      MusclePoint P6: toes_l (0.02993705 0.00411886 0.02461268)
      MusclePoint P7: toes_l (0.05655893 0.00341564 0.01868554)
    Thelen2003Muscle ercspn_r: max_isometric_force=2500 optimal_fiber_length=0.1248057 tendon_slack_length=0.03120142
        pennation_angle=0
      MusclePoint P1: pelvis (-0.1385767 0.04345369 0.04315674)
      MusclePoint P2: torso (-0.05813881 0.1162776 0.02547537)
    Thelen2003Muscle ercspn_l: max_isometric_force=2500 optimal_fiber_length=0.1248057 tendon_slack_length=0.03120142
        pennation_angle=0
      MusclePoint P1: pelvis (-0.1385767 0.04345369 -0.04315674)
      MusclePoint P2: torso (-0.05813881 0.1162776 -0.02547537)
    Thelen2003Muscle intobl_r: max_isometric_force=900 optimal_fiber_length=0.103563 tendon_slack_length=0.103563
        pennation_angle=0
      MusclePoint P1: pelvis (-0.03959334 0.06928835 0.1145237)
      MusclePoint P2: torso (0.07399485 0.1691311 0.01585604)
    Thelen2003Muscle intobl_l: max_isometric_force=900 optimal_fiber_length=0.103563 tendon_slack_length=0.103563
        pennation_angle=0
      MusclePoint P1: pelvis (-0.03959334 0.06928835 -0.1145237)
      MusclePoint P2: torso (0.07399485 0.1691311 -0.01585604)
    Thelen2003Muscle extobl_r: max_isometric_force=900 optimal_fiber_length=0.1229662 tendon_slack_length=0.1434605
        pennation_angle=0
      MusclePoint P1: pelvis (-0.02969501 -0.06295341 0.00989834)
      MusclePoint P2: torso (0.0687095 0.1162776 0.1162776)
    Thelen2003Muscle extobl_l: max_isometric_force=900 optimal_fiber_length=0.1229662 tendon_slack_length=0.1434605
        pennation_angle=0
      MusclePoint P1: pelvis (-0.02969501 -0.06295341 -0.00989834)
      MusclePoint P2: torso (0.0687095 0.1162776 -0.1162776)
    ObjectGroup R_hip_abd: members=(glut_max1_r glut_med1_r glut_med2_r glut_med3_r glut_min1_r glut_min2_r glut_min3_r peri_r sar_r tfl_r)
    ObjectGroup R_hip_flex: members=(add_brev_r add_long_r glut_med1_r glut_min1_r grac_r iliacus_r pect_r psoas_r rect_fem_r sar_r tfl_r)
    ObjectGroup R_hip_inrot: members=(glut_med1_r glut_min1_r iliacus_r psoas_r tfl_r)
    ObjectGroup R_hip_exrot: members=(gem_r glut_med3_r glut_min3_r peri_r quad_fem_r)
    ObjectGroup R_hip_ext: members=(add_long_r add_mag1_r add_mag2_r add_mag3_r bifemlh_r glut_max1_r glut_max2_r glut_max3_r glut_med3_r glut_min3_r semimem_r semiten_r)
    ObjectGroup R_hip_add: members=(add_brev_r add_long_r add_mag1_r add_mag2_r add_mag3_r bifemlh_r grac_r pect_r semimem_r semiten_r)
    ObjectGroup R_knee_bend: members=(bifemlh_r bifemsh_r grac_r lat_gas_r med_gas_r sar_r semimem_r semiten_r)
    ObjectGroup R_knee_ext: members=(rect_fem_r vas_int_r vas_lat_r vas_med_r)
    ObjectGroup R_ankle_pf: members=(flex_dig_r flex_hal_r lat_gas_r med_gas_r per_brev_r per_long_r soleus_r tib_post_r)
    ObjectGroup R_inverter: members=(ext_hal_r flex_dig_r flex_hal_r tib_ant_r tib_post_r)
    ObjectGroup R_ankle_df: members=(ext_dig_r ext_hal_r per_tert_r tib_ant_r)
    ObjectGroup R_everter: members=(ext_dig_r per_brev_r per_long_r per_tert_r)
    ObjectGroup L_hip_abd: members=(glut_max1_l glut_med1_l glut_med2_l glut_med3_l glut_min1_l glut_min2_l glut_min3_l peri_l sar_l tfl_l)
    ObjectGroup L_hip_flex: members=(add_brev_l add_long_l glut_med1_l glut_min1_l grac_l iliacus_l pect_l psoas_l rect_fem_l sar_l tfl_l)
    ObjectGroup L_hip_inrot: members=(glut_med1_l glut_min1_l iliacus_l psoas_l tfl_l)
    ObjectGroup L_hip_exrot: members=(gem_l glut_med3_l glut_min3_l peri_l quad_fem_l)
    ObjectGroup L_hip_ext: members=(add_long_l add_mag1_l add_mag2_l add_mag3_l bifemlh_l glut_max1_l glut_max2_l glut_max3_l glut_med3_l glut_min3_l semimem_l semiten_l)
    ObjectGroup L_hip_add: members=(add_brev_l add_long_l add_mag1_l add_mag2_l add_mag3_l bifemlh_l grac_l pect_l semimem_l semiten_l)
    ObjectGroup L_knee_bend: members=(bifemlh_l bifemsh_l grac_l lat_gas_l med_gas_l sar_l semimem_l semiten_l)
    ObjectGroup L_knee_ext: members=(rect_fem_l vas_int_l vas_lat_l vas_med_l)
    ObjectGroup L_ankle_pf: members=(flex_dig_l flex_hal_l lat_gas_l med_gas_l per_brev_l per_long_l soleus_l tib_post_l)
    ObjectGroup L_inverter: members=(ext_hal_l flex_dig_l flex_hal_l tib_ant_l tib_post_l)
    ObjectGroup L_ankle_df: members=(ext_dig_l ext_hal_l per_tert_l tib_ant_l)
    ObjectGroup L_everter: members=(ext_dig_l per_brev_l per_long_l per_tert_l)
    ObjectGroup back_ext: members=(ercspn_l ercspn_r)
    ObjectGroup back_rlb: members=(ercspn_r extobl_r intobl_r)
    ObjectGroup back_introt: members=(ercspn_r extobl_l intobl_r)
    ObjectGroup back_llb: members=(ercspn_l extobl_l intobl_l)
    ObjectGroup back_extrot: members=(ercspn_l extobl_r intobl_l)
    ObjectGroup back_flex: members=(extobl_l extobl_r intobl_l intobl_r)
