# OpenSim document version 20302
Model twoMusclesOnBlock_tugOfWar:
  length_units: meters
  force_units: N
  gravity: 0 -9.80665 0
  defaults: Thelen2003Muscle default: min_control=0.01 max_control=1 optimal_force=1 max_isometric_force=0
      optimal_fiber_length=0 tendon_slack_length=0 pennation_angle_at_optimal=0 max_contraction_velocity=10
      activation_time_constant=0.01 deactivation_time_constant=0.04 Vmax=10 Vmax0=5 FmaxTendonStrain=0.033
      FmaxMuscleStrain=0.6 KshapeActive=0.5 KshapePassive=4 damping=0.05 Af=0.3 Flen=1.8
  ForceSet:
    Thelen2003Muscle muscle1: min_control=0 max_control=1 optimal_force=1 max_isometric_force=1000
        optimal_fiber_length=0.1 tendon_slack_length=0.2 pennation_angle_at_optimal=0 max_contraction_velocity=10
        activation_time_constant=0.01 deactivation_time_constant=0.04 Vmax=10 Vmax0=5 FmaxTendonStrain=0.033
        FmaxMuscleStrain=0.6 KshapeActive=0.5 KshapePassive=4 damping=0.05 Af=0.3 Flen=1.8
      PathPoint point1: ground (0 0.05 -0.35)
      PathPoint point2: block (0 0 -0.05)
    Thelen2003Muscle muscle2: min_control=0 max_control=1 optimal_force=1 max_isometric_force=1000
        optimal_fiber_length=0.1 tendon_slack_length=0.2 pennation_angle_at_optimal=0 max_contraction_velocity=10
        activation_time_constant=0.01 deactivation_time_constant=0.04 Vmax=10 Vmax0=5 FmaxTendonStrain=0.033
        FmaxMuscleStrain=0.6 KshapeActive=0.5 KshapePassive=4 damping=0.05 Af=0.3 Flen=1.8
      PathPoint point1: ground (0 0.05 0.35)
      PathPoint point2: block (0 0 0.05)
  BodySet:
    Body ground: mass=0 mass_center=(0 0 0) inertia_xx=1 inertia_yy=1 inertia_zz=1
        meshes=(ground.vtp anchor1.vtp anchor2.vtp)
    Body block: mass=20 mass_center=(0 0 0) inertia_xx=0.1333333 inertia_yy=0.1333333 inertia_zz=0.1333333
        meshes=block.vtp
      SliderJoint blockToGround: parent_body=ground location_in_parent=(0 0.05 0) orientation_in_parent=(0 -1.570796 0)
          location=(0 0 0) orientation=(0 -1.570796 0)
        Coordinate tz_block: motion_type=translational default_value=0 initial_value=0 range=(-1 1) clamped=false
