# OpenSim document version 20302
Model block_hanging_RigidTendonMuscle:
  credits: Developed by Ajay Seth for unit testing of CMC algorithm
  publications: List of publications related to model...
  length_units: meters
  force_units: N
  gravity: 0 -9.80665 0
  ForceSet:
    RigidTendonMuscle muscle: min_control=0 max_control=1 max_isometric_force=100 optimal_fiber_length=0.2
        tendon_slack_length=0.1 pennation_angle_at_optimal=0
      PathPoint P1: ground (0 0 0)
      PathPoint P2: block (0 0.1 0)
  BodySet:
    Body ground: mass=0 mass_center=(0 0 0) inertia_xx=0 inertia_yy=0 inertia_zz=0
    Body block: mass=1 mass_center=(0 0 0) inertia_xx=0.01666667 inertia_yy=0.01666667 inertia_zz=0.01666667
        meshes=box.vtp
      CustomJoint ground_block: parent_body=ground location_in_parent=(0 0 0) location=(0 0 0)
        Coordinate block_ty: motion_type=translational default_value=-0.35 initial_value=-0.35 range=(-0.5 -0.1)
            clamped=true
        SpatialTransform: axes_held_at_zero=(rotation1 rotation2 rotation3 translation2 translation3)
          TransformAxis translation1: coordinates=block_ty axis=(0 1 0) LinearFunction(coefficients=1 0)
