# OpenSim document version 20302
ForwardTool subject01:
  model_file: subject01_adjusted.osim
  replace_force_set: false
  force_set_files: gait2354_CMC_Actuators.xml
  results_directory: Results
  output_precision: 20
  initial_time: 0.8
  final_time: 0.95
  solve_for_equilibrium_for_auxiliary_states: false
  maximum_number_of_integrator_steps: 30000
  maximum_integrator_step_size: 1
  minimum_integrator_step_size: 0.00000001
  integrator_error_tolerance: 0.00001
  external_loads_file: subject01_GRFs.xml
  states_file: std_subject01_walk1_states.sto
  use_specified_dt: false
  ControllerSet:
    ControlSetController: enable_controller=false controls_file=subject01_walk1_controls.xml
