# OpenSim document version 20302
ForwardTool subject01:
  model_file: subject01_adjusted.osim
  replace_force_set: false
  force_set_files: gait2354_CMC_Actuators.xml
  results_directory: ResultsCorrectionController
  output_precision: 8
  initial_time: 0.8
  final_time: 0.95
  solve_for_equilibrium_for_auxiliary_states: false
  maximum_number_of_integrator_steps: 30000
  maximum_integrator_step_size: 1
  minimum_integrator_step_size: 0.00000001
  integrator_error_tolerance: 0.00001
  external_loads_file: subject01_GRFs.xml
  states_file: std_subject01_walk1_states.sto
  use_specified_dt: false
  AnalysisSet Analyses:
    Actuation: start_time=-infinity end_time=infinity step_interval=10 in_degrees=true
  ControllerSet:
    ControlSetController Control_Set_Controller: enable_controller=true controls_file=subject01_walk1_controls.xml
    CorrectionController Correction_Controller: enable_controller=true kp=25 kv=10
