# OpenSim document version 40000
Model calibrated_FacingX:
  gravity: 0 -9.80665 0
  length_units: meters
  force_units: N
  credits:
    Rajagopal, A, Dembia, C.L., DeMers, M.S., Delp, D.D., Hicks, J.L., and Delp, S.L.
  publications:
    Rajagopal, Apoorva, et al. "Full-Body Musculoskeletal Model for Muscle-Driven Simulation of Human Gait." IEEE Transactions on Biomedical Engineering 63.10 (2016): 2068-2079. (2016)
  Ground
  BodySet:
    Body pelvis: mass=12.40882 [kg] mass_center=(-0.0806358 0 0) inertia=(0.114711 0.114711 0.0711124 0 0 0)
        meshes=(r_pelvis.vtp l_pelvis.vtp sacrum.vtp)
      PhysicalOffsetFrame pelvis_imu: socket_parent=.. translation=(-0.0806358 0 0) [meters]
          orientation=(1.53867 1.237939 -0.04107818) [radians]
        Brick pelvis_imu_geom_1: half_lengths=(0.02 0.01 0.005)
      WrapCylinder Gmax1_at_pelvis_r: xyz_body_rotation=(-0.6 0.45 0) translation=(-0.0878212 -0.101181 0.0615241)
          quadrant=-x radius=0.04270535 length=0.1557372
      WrapCylinder Gmax2_at_pelvis_r: xyz_body_rotation=(-0.75 0.39 0) translation=(-0.0912428 -0.0848283 0.0685843)
          quadrant=all radius=0.0427809 length=0.1033967
      WrapCylinder Gmax3_at_pelvis_r: xyz_body_rotation=(-0.1 0 0) translation=(-0.0946644 -0.0899384 0.0685843)
          quadrant=all radius=0.04324857 length=0.1008727
      WrapCylinder Gmax1_at_pelvis_l: xyz_body_rotation=(0.6 -0.45 0) translation=(-0.0878212 -0.101181 -0.0615241)
          quadrant=-x radius=0.04270535 length=0.1557372
      WrapCylinder Gmax2_at_pelvis_l: xyz_body_rotation=(0.75 -0.39 0) translation=(-0.0912428 -0.0848283 -0.0685843)
          quadrant=all radius=0.0427809 length=0.1033967
      WrapCylinder Gmax3_at_pelvis_l: xyz_body_rotation=(0.1 0 0) translation=(-0.0946644 -0.0899384 -0.0685843)
          quadrant=all radius=0.04324857 length=0.1008727
      WrapCylinder PS_at_brim_r: xyz_body_rotation=(-0.25 -0.27 0.1) translation=(-0.0843996 -0.0613216 0.0661636)
          quadrant=-y radius=0.05382535 length=0.1019305
      WrapCylinder PS_at_brim_l: xyz_body_rotation=(0.25 0.27 0.1) translation=(-0.0843996 -0.0613216 -0.0661636)
          quadrant=-y radius=0.05382535 length=0.1019305
      WrapCylinder IL_at_brim_r: xyz_body_rotation=(-0.32 -0.24 0.9) translation=(-0.0809779 -0.0664318 0.0762496)
          quadrant=-y radius=0.05921195 length=0.1017756
      WrapCylinder IL_at_brim_l: xyz_body_rotation=(0.32 0.24 0.9) translation=(-0.0809779 -0.0664318 -0.0762496)
          quadrant=-y radius=0.05921195 length=0.1017756
    Body femur_r: mass=9.800404 mass_center=(0 -0.168783 0) inertia=(0.13907 0.0364552 0.146652 0 0 0)
        meshes=r_femur.vtp
      PhysicalOffsetFrame femur_r_imu: socket_parent=.. translation=(0 -0.168783 0)
          orientation=(-3.067271 -0.1457698 -1.599161)
        Brick femur_r_imu_geom_1: half_lengths=(0.02 0.01 0.005)
      WrapCylinder Gastroc_at_condyles_r: translation=(0.00496419 -0.407064 0) quadrant=all radius=0.02482096
          length=0.09928386
      WrapCylinder KnExt_at_fem_r: xyz_body_rotation=(-0.0623366 0.0507601 0)
          translation=(0.00356258 -0.399848 0.00207613) quadrant=all radius=0.02482096 length=0.09928386
      WrapCylinder AB_at_femshaft_r: xyz_body_rotation=(1.66157 0.186644 0) translation=(0.0145385 -0.111789 0.0231977)
          quadrant=all radius=0.01638184 length=0.0694987
      WrapCylinder AL_at_femshaft_r: xyz_body_rotation=(1.77711 0.136489 0) translation=(0.0305126 -0.230248 0.0150055)
          quadrant=all radius=0.01995606 length=0.09928386
      WrapCylinder AMprox_at_femshaft_r: xyz_body_rotation=(1.61126 0.18656 0)
          translation=(0.00514587 -0.0723728 0.0252211) quadrant=all radius=0.02094889 length=0.0694987
      WrapCylinder AMmid_at_femshaft_r: xyz_body_rotation=(1.61139 0.13656 0)
          translation=(0.0228477 -0.15956 0.0204368) quadrant=all radius=0.02124675 length=0.1191406
      WrapCylinder AMdist_at_femshaft_r: xyz_body_rotation=(1.71188 0.186636 0)
          translation=(0.0313802 -0.258869 0.00929754) quadrant=all radius=0.02164388 length=0.1985677
      WrapCylinder AMisch_at_condyles_r: xyz_body_rotation=(1.71115 -0.463363 0)
          translation=(-0.0224889 -0.374132 -0.00313178) quadrant=all radius=0.03971354 length=0.2382813
      WrapCylinder PECT_at_femshaft_r: xyz_body_rotation=(1.81295 0.276344 0)
          translation=(0.00604215 -0.0838977 0.0302225) quadrant=all radius=0.01489258 length=0.04964193
    Body tibia_r: mass=3.906401 mass_center=(0 -0.204691 0) inertia=(0.0634325 0.0056617 0.0634325 0 0 0)
        meshes=(r_tibia.vtp r_fibula.vtp)
      PhysicalOffsetFrame tibia_r_imu: socket_parent=.. translation=(0 -0.204691 0)
          orientation=(3.071617 0.1928854 -1.440519)
        Brick tibia_r_imu_geom_1: half_lengths=(0.02 0.01 0.005)
      WrapCylinder GasLat_at_shank_r: xyz_body_rotation=(2.96723 -0.279725 -1.47812)
          translation=(-0.00759578 -0.0811307 -0.00338731) quadrant=-y radius=0.05832801 length=0.1028464
      WrapCylinder GasMed_at_shank_r: xyz_body_rotation=(2.96723 0.0279725 -1.47812)
          translation=(-0.00759578 -0.0811307 -0.00338731) quadrant=-y radius=0.05832235 length=0.1028628
      WrapCylinder GR_at_condyles_r: xyz_body_rotation=(0 -0.4 0) translation=(-0.00307937 -0.0219272 0) quadrant=all
          radius=0.0382107 length=0.1026456
      WrapCylinder SM_at_condyles_r: xyz_body_rotation=(0 -0.1 0) translation=(-0.00102646 -0.0219272 0) quadrant=all
          radius=0.03736157 length=0.1026456
      WrapCylinder ST_at_condyles_r: xyz_body_rotation=(0 -0.2 0) translation=(-0.00205291 -0.0224754 0) quadrant=all
          radius=0.04510985 length=0.1026456
      WrapCylinder BF_at_gastroc_r: translation=(-0.0595345 -0.0657816 0) quadrant=y radius=0.03184225 length=0.1539684
    Body patella_r: mass=0.09082448 mass_center=(0.00243858 0.0357659 0) inertia=(5.55019e-6 2.5353e-5 2.5353e-5 0 0 0)
        meshes=r_patella.vtp
    Body talus_r: mass=0.1053648 mass_center=(0 0 0) inertia=(0.00108152 0.000973557 0.000973557 0 0 0)
        meshes=r_talus.vtp
    Body calcn_r: mass=1.31706 mass_center=(0.0906376 0.03 0) inertia=(0.00151413 0.00352695 0.00352695 0 0 0)
        meshes=r_foot.vtp
      PhysicalOffsetFrame calcn_r_imu: socket_parent=.. translation=(0.0906376 0.03 0)
          orientation=(1.680441 -0.5640612 -1.436798)
        Brick calcn_r_imu_geom_1: half_lengths=(0.02 0.01 0.005)
    Body toes_r: mass=0.2282202 mass_center=(0.0313606 0.006 -0.017963)
        inertia=(0.000108152 0.000183915 0.000183915 0 0 0) meshes=r_bofoot.vtp
    Body femur_l: mass=9.800404 mass_center=(0 -0.16385 0) inertia=(0.13106 0.0343555 0.138205 0 0 0)
        meshes=l_femur.vtp
      PhysicalOffsetFrame femur_l_imu: socket_parent=.. translation=(0 -0.16385 0)
          orientation=(-0.05044 -0.08169624 1.356073)
        Brick femur_l_imu_geom_1: half_lengths=(0.02 0.01 0.005)
      WrapCylinder Gastroc_at_condyles_l: translation=(0.00481911 -0.395167 0) quadrant=all radius=0.02409554
          length=0.09638215
      WrapCylinder KnExt_at_fem_l: xyz_body_rotation=(0.0623366 -0.0507601 0)
          translation=(0.00345846 -0.388162 -0.00201546) quadrant=all radius=0.02409554 length=0.09638215
      WrapCylinder AB_at_femshaft_l: xyz_body_rotation=(-1.66157 -0.186644 0)
          translation=(0.0141136 -0.108521 -0.0225197) quadrant=all radius=0.01590305 length=0.0674675
      WrapCylinder AL_at_femshaft_l: xyz_body_rotation=(-1.77711 -0.136489 0)
          translation=(0.0296208 -0.223519 -0.0145669) quadrant=all radius=0.01937281 length=0.09638215
      WrapCylinder AMprox_at_femshaft_l: xyz_body_rotation=(-1.61126 -0.18656 0)
          translation=(0.00499548 -0.0702576 -0.024484) quadrant=all radius=0.02033663 length=0.0674675
      WrapCylinder AMmid_at_femshaft_l: xyz_body_rotation=(-1.61139 -0.13656 0)
          translation=(0.0221799 -0.154897 -0.0198395) quadrant=all radius=0.02062578 length=0.1156586
      WrapCylinder AMdist_at_femshaft_l: xyz_body_rotation=(-1.71188 -0.186636 0)
          translation=(0.030463 -0.251303 -0.0090258) quadrant=all radius=0.02101131 length=0.1927643
      WrapCylinder AMisch_at_condyles_l: xyz_body_rotation=(-1.71115 0.463363 0)
          translation=(-0.0218316 -0.363198 0.00304025) quadrant=all radius=0.03855286 length=0.2313172
      WrapCylinder PECT_at_femshaft_l: xyz_body_rotation=(-1.81295 -0.276344 0)
          translation=(0.00586556 -0.0814457 -0.0293392) quadrant=all radius=0.01445732 length=0.04819107
    Body tibia_l: mass=3.906401 mass_center=(0 -0.202735 0) inertia=(0.0622653 0.00563255 0.0622653 0 0 0)
        meshes=(l_tibia.vtp l_fibula.vtp)
      PhysicalOffsetFrame tibia_l_imu: socket_parent=.. translation=(0 -0.202735 0)
          orientation=(0.09471504 -0.05946007 1.484055)
        Brick tibia_l_imu_geom_1: half_lengths=(0.02 0.01 0.005)
      WrapCylinder GasLat_at_shank_l: xyz_body_rotation=(-2.96723 0.279725 -1.47812)
          translation=(-0.0075762 -0.0803555 0.00337858) quadrant=-y radius=0.05797234 length=0.1025587
      WrapCylinder GasMed_at_shank_l: xyz_body_rotation=(-2.96723 -0.0279725 -1.47812)
          translation=(-0.0075762 -0.0803555 0.00337858) quadrant=-y radius=0.05796744 length=0.1025732
      WrapCylinder GR_at_condyles_l: xyz_body_rotation=(0 0.4 0) translation=(-0.00307143 -0.0217177 0) quadrant=all
          radius=0.03797452 length=0.1023811
      WrapCylinder SM_at_condyles_l: xyz_body_rotation=(0 0.1 0) translation=(-0.00102381 -0.0217177 0) quadrant=all
          radius=0.03713064 length=0.1023811
      WrapCylinder ST_at_condyles_l: xyz_body_rotation=(0 0.2 0) translation=(-0.00204762 -0.0222606 0) quadrant=all
          radius=0.04483103 length=0.1023811
      WrapCylinder BF_at_gastroc_l: translation=(-0.059381 -0.0651531 0) quadrant=all radius=0.03164543
          length=0.1535716
    Body patella_l: mass=0.09082448 mass_center=(0.00254727 0.0373599 0)
        inertia=(6.05595e-6 2.76632e-5 2.76632e-5 0 0 0) meshes=l_patella.vtp
    Body talus_l: mass=0.1053648 mass_center=(0 0 0) inertia=(0.00107874 0.000962282 0.000962282 0 0 0)
        meshes=l_talus.vtp
    Body calcn_l: mass=1.31706 mass_center=(0.0895969 0.03 0) inertia=(0.00151023 0.00346176 0.00346176 0 0 0)
        meshes=l_foot.vtp
      PhysicalOffsetFrame calcn_l_imu: socket_parent=.. translation=(0.0895969 0.03 0)
          orientation=(1.646975 -0.514262 1.732792)
        Brick calcn_l_imu_geom_1: half_lengths=(0.02 0.01 0.005)
    Body toes_l: mass=0.2282202 mass_center=(0.0310005 0.006 0.0179167)
        inertia=(0.000107874 0.000180811 0.000180811 0 0 0) meshes=l_bofoot.vtp
    Body torso: mass=28.2658 mass_center=(-0.03 0.336366 0) inertia=(1.77913 1.00463 1.77913 0 0 0)
        meshes=(hat_spine.vtp hat_jaw.vtp hat_skull.vtp hat_ribs_scap.vtp)
      PhysicalOffsetFrame torso_imu: socket_parent=.. translation=(-0.03 0.336366 0)
          orientation=(0.5597765 1.182163 0.9629135)
        Brick torso_imu_geom_1: half_lengths=(0.02 0.01 0.005)
    Body humerus_r: mass=2.14154 mass_center=(0 -0.164502 0) inertia=(0.0125869 0.00434208 0.0141284 0 0 0)
        meshes=humerus_rv.vtp
    Body ulna_r: mass=0.6400913 mass_center=(0 -0.120525 0) inertia=(0.00312091 0.000651155 0.00338537 0 0 0)
        meshes=ulna_rv.vtp
    Body radius_r: mass=0.6400913 mass_center=(0 -0.120525 0) inertia=(0.00312091 0.000651155 0.00338537 0 0 0)
        meshes=radius_rv.vtp
    Body hand_r: mass=0.4820441 mass_center=(0 -0.068095 0) inertia=(0.000939854 0.000576346 0.00141189 0 0 0)
        meshes=(pisiform_rvs.vtp lunate_rvs.vtp scaphoid_rvs.vtp triquetrum_rvs.vtp hamate_rvs.vtp capitate_rvs.vtp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)
    Body humerus_l: mass=2.14154 mass_center=(0 -0.164502 0) inertia=(0.0125869 0.00434208 0.0141284 0 0 0)
        meshes=humerus_lv.vtp
    Body ulna_l: mass=0.6400913 mass_center=(0 -0.120525 0) inertia=(0.00312091 0.000651155 0.00338537 0 0 0)
        meshes=ulna_lv.vtp
    Body radius_l: mass=0.6400913 mass_center=(0 -0.120525 0) inertia=(0.00312091 0.000651155 0.00338537 0 0 0)
        meshes=radius_lv.vtp
    Body hand_l: mass=0.4820441 mass_center=(0 -0.068095 0) inertia=(0.000939854 0.000576346 0.00141189 0 0 0)
        meshes=(pisiform_lvs.vtp lunate_lvs.vtp scaphoid_lvs.vtp triquetrum_lvs.vtp hamate_lvs.vtp capitate_lvs.vtp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)
  JointSet:
    CustomJoint ground_pelvis: socket_parent_frame=ground_offset socket_child_frame=pelvis_offset
      Coordinate pelvis_tilt: default_value=0 range=(-1.570796 1.570796) clamped=false
      Coordinate pelvis_list: default_value=0 range=(-1.570796 1.570796) clamped=false
      Coordinate pelvis_rotation: default_value=0 range=(-1.570796 1.570796) clamped=false
      Coordinate pelvis_tx: default_value=0 range=(-5 5) clamped=false
      Coordinate pelvis_ty: default_value=0.93 range=(-1 2) clamped=false
      Coordinate pelvis_tz: default_value=0 range=(-3 3) clamped=false
      PhysicalOffsetFrame ground_offset: socket_parent=/ground translation=(0 0 0)
      PhysicalOffsetFrame pelvis_offset: socket_parent=/bodyset/pelvis translation=(0 0 0)
      SpatialTransform:
        TransformAxis rotation1: coordinates=pelvis_tilt axis=(0 0 1) LinearFunction(coefficients=1 0)
        TransformAxis rotation2: coordinates=pelvis_list axis=(1 0 0) LinearFunction(coefficients=1 0)
        TransformAxis rotation3: coordinates=pelvis_rotation axis=(0 1 0) LinearFunction(coefficients=1 0)
        TransformAxis translation1: coordinates=pelvis_tx axis=(1 0 0) LinearFunction(coefficients=1 0)
        TransformAxis translation2: coordinates=pelvis_ty axis=(0 1 0) LinearFunction(coefficients=1 0)
        TransformAxis translation3: coordinates=pelvis_tz axis=(0 0 1) LinearFunction(coefficients=1 0)
    CustomJoint hip_r: socket_parent_frame=pelvis_offset socket_child_frame=femur_r_offset
      Coordinate hip_flexion_r: default_value=0 range=(-0.5235988 2.094395) clamped=true
      Coordinate hip_adduction_r: default_value=0 range=(-0.8726646 0.5235988) clamped=true
      Coordinate hip_rotation_r: default_value=0 range=(-0.6981317 0.6981317) clamped=true
      PhysicalOffsetFrame pelvis_offset: socket_parent=/bodyset/pelvis translation=(-0.0641847 -0.0802189 0.0779238)
      PhysicalOffsetFrame femur_r_offset: socket_parent=/bodyset/femur_r translation=(0 0 0)
      SpatialTransform: axes_held_at_zero=(translation1 translation2 translation3)
        TransformAxis rotation1: coordinates=hip_flexion_r axis=(0 0 1) LinearFunction(coefficients=1 0)
        TransformAxis rotation2: coordinates=hip_adduction_r axis=(1 0 0) LinearFunction(coefficients=1 0)
        TransformAxis rotation3: coordinates=hip_rotation_r axis=(0 1 0) LinearFunction(coefficients=1 0)
    CustomJoint walker_knee_r: socket_parent_frame=femur_r_offset socket_child_frame=tibia_r_offset
      Coordinate knee_angle_r: default_value=0 range=(0 2.0944) clamped=true
      PhysicalOffsetFrame femur_r_offset: socket_parent=/bodyset/femur_r
          translation=(-0.00803206 -0.405038 -0.00273031) orientation=(-1.64157 1.44618 1.5708)
      PhysicalOffsetFrame tibia_r_offset: socket_parent=/bodyset/tibia_r
          translation=(-0.00830356 -0.00387542 -0.00152402) orientation=(-1.64157 1.44618 1.5708)
      SpatialTransform: axes_held_at_zero=translation3
        TransformAxis rotation1: coordinates=knee_angle_r axis=(1 0 0) LinearFunction(coefficients=1 0)
        TransformAxis rotation2: coordinates=knee_angle_r axis=(0 0 1)
          SimmSpline: x=(0 0.174533 0.349066 0.523599 0.698132 0.872665 1.0472 1.22173 1.39626 1.5708 1.74533 1.91986 2.0944)
              y=(0 0.0126809 0.0226969 0.0296054 0.0332049 0.0335354 0.0308779 0.0257548 0.0189295 0.011407 0.00443314 -0.00050475 -0.0016782)
        TransformAxis rotation3: coordinates=knee_angle_r axis=(0 1 0)
          SimmSpline: x=(0 0.174533 0.349066 0.523599 0.698132 0.872665 1.0472 1.22173 1.39626 1.5708 1.74533 1.91986 2.0944)
              y=(0 0.059461 0.109399 0.150618 0.18392 0.210107 0.229983 0.24435 0.254012 0.25977 0.262428 0.262788 0.261654)
        TransformAxis translation1: coordinates=knee_angle_r axis=(0 1 0)
          MultiplierFunction: scale=0.9928386
            SimmSpline: x=(0 0.174533 0.349066 0.523599 0.698132 0.872665 1.0472 1.22173 1.39626 1.5708 1.74533 1.91986 2.0944)
                y=(0 0.000479 0.000835 0.001086 0.001251 0.001346 0.001391 0.001403 0.0014 0.0014 0.001421 0.001481 0.001599)
        TransformAxis translation2: coordinates=knee_angle_r axis=(0 0 1)
          MultiplierFunction: scale=0.9928386
            SimmSpline: x=(0 0.174533 0.349066 0.523599 0.698132 0.872665 1.0472 1.22173 1.39626 1.5708 1.74533 1.91986 2.0944)
                y=(0 0.000988 0.001899 0.002734 0.003492 0.004173 0.004777 0.005305 0.005756 0.00613 0.006427 0.006648 0.006792)
    CustomJoint patellofemoral_r: socket_parent_frame=femur_r_offset socket_child_frame=patella_r_offset
      Coordinate knee_angle_r_beta: default_value=0 range=(-99999.9 99999.9) clamped=false
          is_free_to_satisfy_constraints=true
      PhysicalOffsetFrame femur_r_offset: socket_parent=/bodyset/femur_r
          translation=(-0.00803206 -0.405038 -0.00273031)
      PhysicalOffsetFrame patella_r_offset: socket_parent=/bodyset/patella_r translation=(0 0 0)
      SpatialTransform: axes_held_at_zero=(rotation2 rotation3)
        TransformAxis rotation1: coordinates=knee_angle_r_beta axis=(0 0 1)
          SimmSpline: x=(0 0.174533 0.349066 0.523599 0.698132 0.872665 1.0472 1.22173 1.39626 1.5708 1.74533 1.91986 2.0944)
              y=(0.00113686 -0.00629212 -0.105582 -0.253683 -0.414245 -0.579047 -0.747244 -0.91799 -1.09044 -1.26379 -1.43763 -1.61186 -1.78634)
        TransformAxis translation1: coordinates=knee_angle_r_beta axis=(1 0 0)
          MultiplierFunction: scale=0.9928386
            SimmSpline f9: x=(0 0.174533 0.349066 0.523599 0.698132 0.872665 1.0472 1.22173 1.39626 1.5708 1.74533 1.91986 2.0944)
                y=(0.0524 0.0488 0.0437 0.0371 0.0296 0.0216 0.0136 0.0057 -0.0019 -0.0088 -0.0148 -0.0196 -0.0227)
        TransformAxis translation2: coordinates=knee_angle_r_beta axis=(0 1 0)
          MultiplierFunction: scale=0.9928386
            SimmSpline f10: x=(0 0.174533 0.349066 0.523599 0.698132 0.872665 1.0472 1.22173 1.39626 1.5708 1.74533 1.91986 2.0944)
                y=(-0.0108 -0.019 -0.0263 -0.0322 -0.0367 -0.0395 -0.0408 -0.0404 -0.0384 -0.0349 -0.0301 -0.0245 -0.0187)
        TransformAxis translation3: axis=(0 0 1) MultiplierFunction(scale=0.9928386, Constant(value=0.00275))
    PinJoint ankle_r: socket_parent_frame=tibia_r_offset socket_child_frame=talus_r_offset
      Coordinate ankle_angle_r: default_value=0 range=(-0.6981317 0.5235988) clamped=true
      PhysicalOffsetFrame tibia_r_offset: socket_parent=/bodyset/tibia_r translation=(-0.0102646 -0.438544 0)
          orientation=(0.175895 -0.105208 0.0186622)
      PhysicalOffsetFrame talus_r_offset: socket_parent=/bodyset/talus_r translation=(0 0 0)
          orientation=(0.175895 -0.105208 0.0186622)
    PinJoint subtalar_r: socket_parent_frame=talus_r_offset socket_child_frame=calcn_r_offset
      Coordinate subtalar_angle_r: default_value=0 range=(-0.3490659 0.3490659) clamped=true locked=true
      PhysicalOffsetFrame talus_r_offset: socket_parent=/bodyset/talus_r translation=(-0.0442039 -0.04195 0.00812953)
          orientation=(-1.76819 0.906223 1.8196)
      PhysicalOffsetFrame calcn_r_offset: socket_parent=/bodyset/calcn_r translation=(0 0 0)
          orientation=(-1.76819 0.906223 1.8196)
    PinJoint mtp_r: socket_parent_frame=calcn_r_offset socket_child_frame=toes_r_offset
      Coordinate mtp_angle_r: default_value=0 range=(-0.5235988 0.5235988) clamped=true locked=true
      PhysicalOffsetFrame calcn_r_offset: socket_parent=/bodyset/calcn_r translation=(0.16206 -0.002 0.00110857)
          orientation=(-3.14159 0.619901 0)
      PhysicalOffsetFrame toes_r_offset: socket_parent=/bodyset/toes_r translation=(0 0 0)
          orientation=(-3.14159 0.619901 0)
    CustomJoint hip_l: socket_parent_frame=pelvis_offset socket_child_frame=femur_l_offset
      Coordinate hip_flexion_l: default_value=0 range=(-0.5235988 2.094395) clamped=true
      Coordinate hip_adduction_l: default_value=0 range=(-0.8726646 0.5235988) clamped=true
      Coordinate hip_rotation_l: default_value=0 range=(-0.6981317 0.6981317) clamped=true
      PhysicalOffsetFrame pelvis_offset: socket_parent=/bodyset/pelvis translation=(-0.0641847 -0.0802189 -0.0779238)
      PhysicalOffsetFrame femur_l_offset: socket_parent=/bodyset/femur_l translation=(0 0 0)
      SpatialTransform: axes_held_at_zero=(translation1 translation2 translation3)
        TransformAxis rotation1: coordinates=hip_flexion_l axis=(0 0 1) LinearFunction(coefficients=1 0)
        TransformAxis rotation2: coordinates=hip_adduction_l axis=(1 0 0) LinearFunction(coefficients=-1 0)
        TransformAxis rotation3: coordinates=hip_rotation_l axis=(0 1 0) LinearFunction(coefficients=-1 0)
    CustomJoint walker_knee_l: socket_parent_frame=femur_l_offset socket_child_frame=tibia_l_offset
      Coordinate knee_angle_l: default_value=0 range=(0 2.0944) clamped=true
      PhysicalOffsetFrame femur_l_offset: socket_parent=/bodyset/femur_l translation=(-0.00779732 -0.393201 0.00265051)
          orientation=(1.64157 -1.44618 1.5708)
      PhysicalOffsetFrame tibia_l_offset: socket_parent=/bodyset/tibia_l
          translation=(-0.00828216 -0.00383839 0.00152009) orientation=(1.64157 -1.44618 1.5708)
      SpatialTransform: axes_held_at_zero=translation3
        TransformAxis rotation1: coordinates=knee_angle_l axis=(-1 0 0) LinearFunction(coefficients=1 0)
        TransformAxis rotation2: coordinates=knee_angle_l axis=(0 0 1)
          SimmSpline: x=(0 0.174533 0.349066 0.523599 0.698132 0.872665 1.0472 1.22173 1.39626 1.5708 1.74533 1.91986 2.0944)
              y=(0 0.0126809 0.0226969 0.0296054 0.0332049 0.0335354 0.0308779 0.0257548 0.0189295 0.011407 0.00443314 -0.00050475 -0.0016782)
        TransformAxis rotation3: coordinates=knee_angle_l axis=(0 1 0)
          SimmSpline: x=(0 0.174533 0.349066 0.523599 0.698132 0.872665 1.0472 1.22173 1.39626 1.5708 1.74533 1.91986 2.0944)
              y=(0 -0.059461 -0.109399 -0.150618 -0.18392 -0.210107 -0.229983 -0.24435 -0.254012 -0.25977 -0.262428 -0.262788 -0.261654)
        TransformAxis translation1: coordinates=knee_angle_l axis=(0 1 0)
          MultiplierFunction: scale=0.9638215
            SimmSpline: x=(0 0.174533 0.349066 0.523599 0.698132 0.872665 1.0472 1.22173 1.39626 1.5708 1.74533 1.91986 2.0944)
                y=(0 0.000479 0.000835 0.001086 0.001251 0.001346 0.001391 0.001403 0.0014 0.0014 0.001421 0.001481 0.001599)
        TransformAxis translation2: coordinates=knee_angle_l axis=(0 0 1)
          MultiplierFunction: scale=0.9638215
            SimmSpline: x=(0 0.174533 0.349066 0.523599 0.698132 0.872665 1.0472 1.22173 1.39626 1.5708 1.74533 1.91986 2.0944)
                y=(0 -0.000988 -0.001899 -0.002734 -0.003492 -0.004173 -0.004777 -0.005305 -0.005756 -0.00613 -0.006427 -0.006648 -0.006792)
    CustomJoint patellofemoral_l: socket_parent_frame=femur_l_offset socket_child_frame=patella_l_offset
      Coordinate knee_angle_l_beta: default_value=0 range=(-99999.9 99999.9) clamped=false
          is_free_to_satisfy_constraints=true
      PhysicalOffsetFrame femur_l_offset: socket_parent=/bodyset/femur_l translation=(-0.00779732 -0.393201 0.00265051)
      PhysicalOffsetFrame patella_l_offset: socket_parent=/bodyset/patella_l translation=(0 0 0)
      SpatialTransform: axes_held_at_zero=(rotation2 rotation3)
        TransformAxis rotation1: coordinates=knee_angle_l_beta axis=(0 0 1)
          SimmSpline: x=(0 0.174533 0.349066 0.523599 0.698132 0.872665 1.0472 1.22173 1.39626 1.5708 1.74533 1.91986 2.0944)
              y=(0.00113686 -0.00629212 -0.105582 -0.253683 -0.414245 -0.579047 -0.747244 -0.91799 -1.09044 -1.26379 -1.43763 -1.61186 -1.78634)
        TransformAxis translation1: coordinates=knee_angle_l_beta axis=(1 0 0)
          MultiplierFunction: scale=0.9638215
            SimmSpline f23: x=(0 0.174533 0.349066 0.523599 0.698132 0.872665 1.0472 1.22173 1.39626 1.5708 1.74533 1.91986 2.0944)
                y=(0.0524 0.0488 0.0437 0.0371 0.0296 0.0216 0.0136 0.0057 -0.0019 -0.0088 -0.0148 -0.0196 -0.0227)
        TransformAxis translation2: coordinates=knee_angle_l_beta axis=(0 1 0)
          MultiplierFunction: scale=0.9638215
            SimmSpline f24: x=(0 0.174533 0.349066 0.523599 0.698132 0.872665 1.0472 1.22173 1.39626 1.5708 1.74533 1.91986 2.0944)
                y=(-0.0108 -0.019 -0.0263 -0.0322 -0.0367 -0.0395 -0.0408 -0.0404 -0.0384 -0.0349 -0.0301 -0.0245 -0.0187)
        TransformAxis translation3: axis=(0 0 1) MultiplierFunction(scale=0.9638215, Constant(value=-0.00275))
    PinJoint ankle_l: socket_parent_frame=tibia_l_offset socket_child_frame=talus_l_offset
      Coordinate ankle_angle_l: default_value=0 range=(-0.6981317 0.5235988) clamped=true
      PhysicalOffsetFrame tibia_l_offset: socket_parent=/bodyset/tibia_l translation=(-0.0102381 -0.434354 0)
          orientation=(-0.175895 0.105208 0.0186622)
      PhysicalOffsetFrame talus_l_offset: socket_parent=/bodyset/talus_l translation=(0 0 0)
          orientation=(-0.175895 0.105208 0.0186622)
    PinJoint subtalar_l: socket_parent_frame=talus_l_offset socket_child_frame=calcn_l_offset
      Coordinate subtalar_angle_l: default_value=0 range=(-0.3490659 0.3490659) clamped=true locked=true
      PhysicalOffsetFrame talus_l_offset: socket_parent=/bodyset/talus_l translation=(-0.0436964 -0.04195 -0.00810858)
          orientation=(1.76819 -0.906223 1.8196)
      PhysicalOffsetFrame calcn_l_offset: socket_parent=/bodyset/calcn_l translation=(0 0 0)
          orientation=(1.76819 -0.906223 1.8196)
    PinJoint mtp_l: socket_parent_frame=calcn_l_offset socket_child_frame=toes_l_offset
      Coordinate mtp_angle_l: default_value=0 range=(-0.5235988 0.5235988) clamped=true locked=true
      PhysicalOffsetFrame calcn_l_offset: socket_parent=/bodyset/calcn_l translation=(0.160199 -0.002 -0.00110572)
          orientation=(-3.14159 -0.619901 0)
      PhysicalOffsetFrame toes_l_offset: socket_parent=/bodyset/toes_l translation=(0 0 0)
          orientation=(-3.14159 -0.619901 0)
    CustomJoint back: socket_parent_frame=pelvis_offset socket_child_frame=torso_offset
      Coordinate lumbar_extension: default_value=0 range=(-1.570796 1.570796) clamped=true locked=true
      Coordinate lumbar_bending: default_value=0 range=(-1.570796 1.570796) clamped=true locked=true
      Coordinate lumbar_rotation: default_value=0 range=(-1.570796 1.570796) clamped=true locked=true
      PhysicalOffsetFrame pelvis_offset: socket_parent=/bodyset/pelvis translation=(-0.114852 0.0832952 0)
      PhysicalOffsetFrame torso_offset: socket_parent=/bodyset/torso translation=(0 0 0)
      SpatialTransform: axes_held_at_zero=(translation1 translation2 translation3)
        TransformAxis rotation1: coordinates=lumbar_extension axis=(0 0 1) LinearFunction(coefficients=1 0)
        TransformAxis rotation2: coordinates=lumbar_bending axis=(1 0 0) LinearFunction(coefficients=1 0)
        TransformAxis rotation3: coordinates=lumbar_rotation axis=(0 1 0) LinearFunction(coefficients=1 0)
    CustomJoint acromial_r: socket_parent_frame=torso_offset socket_child_frame=humerus_r_offset
      Coordinate arm_flex_r: default_value=0 range=(-1.570796 1.570796) clamped=true locked=true
      Coordinate arm_add_r: default_value=0 range=(-2.094395 1.570796) clamped=true locked=true
      Coordinate arm_rot_r: default_value=0 range=(-1.570796 1.570796) clamped=true locked=true
      PhysicalOffsetFrame torso_offset: socket_parent=/bodyset/torso translation=(0.003155 0.3905 0.214548)
      PhysicalOffsetFrame humerus_r_offset: socket_parent=/bodyset/humerus_r translation=(0 0 0)
      SpatialTransform: axes_held_at_zero=(translation1 translation2 translation3)
        TransformAxis rotation1: coordinates=arm_flex_r axis=(0 0 1) LinearFunction(coefficients=1 0)
        TransformAxis rotation2: coordinates=arm_add_r axis=(1 0 0) LinearFunction(coefficients=1 0)
        TransformAxis rotation3: coordinates=arm_rot_r axis=(0 1 0) LinearFunction(coefficients=1 0)
    PinJoint elbow_r: socket_parent_frame=humerus_r_offset socket_child_frame=ulna_r_offset
      Coordinate elbow_flex_r: default_value=0 range=(0 2.618) clamped=true locked=true
      PhysicalOffsetFrame humerus_r_offset: socket_parent=/bodyset/humerus_r translation=(0.013144 -0.286273 -0.009595)
          orientation=(-0.0228627 0.228018 0.0051689)
      PhysicalOffsetFrame ulna_r_offset: socket_parent=/bodyset/ulna_r translation=(0 0 0)
          orientation=(-0.0228627 0.228018 0.0051689)
    PinJoint radioulnar_r: socket_parent_frame=ulna_r_offset socket_child_frame=radius_r_offset
      Coordinate pro_sup_r: default_value=0 range=(0 1.570796) clamped=true locked=true
      PhysicalOffsetFrame ulna_r_offset: socket_parent=/bodyset/ulna_r translation=(-0.006727 -0.013007 0.026083)
          orientation=(-1.56884 0.056428 1.53614)
      PhysicalOffsetFrame radius_r_offset: socket_parent=/bodyset/radius_r translation=(0 0 0)
          orientation=(-1.56884 0.056428 1.53614)
    UniversalJoint radius_hand_r: socket_parent_frame=radius_r_offset socket_child_frame=hand_r_offset
      Coordinate wrist_flex_r: default_value=0 range=(-1.22173 1.22173) clamped=true locked=true
      Coordinate wrist_dev_r: default_value=0 range=(-0.4363323 0.6108652) clamped=true locked=true
      PhysicalOffsetFrame radius_r_offset: socket_parent=/bodyset/radius_r translation=(-0.008797 -0.235841 0.01361)
          orientation=(-1.5708 0 -1.5708)
      PhysicalOffsetFrame hand_r_offset: socket_parent=/bodyset/hand_r translation=(0 0 0)
          orientation=(-1.5708 0 -1.5708)
    CustomJoint acromial_l: socket_parent_frame=torso_offset socket_child_frame=humerus_l_offset
      Coordinate arm_flex_l: default_value=0 range=(-1.570796 1.570796) clamped=true locked=true
      Coordinate arm_add_l: default_value=0 range=(-2.094395 1.570796) clamped=true locked=true
      Coordinate arm_rot_l: default_value=0 range=(-1.570796 1.570796) clamped=true locked=true
      PhysicalOffsetFrame torso_offset: socket_parent=/bodyset/torso translation=(0.003155 0.3905 -0.214548)
      PhysicalOffsetFrame humerus_l_offset: socket_parent=/bodyset/humerus_l translation=(0 0 0)
      SpatialTransform: axes_held_at_zero=(translation1 translation2 translation3)
        TransformAxis rotation1: coordinates=arm_flex_l axis=(0 0 1) LinearFunction(coefficients=1 0)
        TransformAxis rotation2: coordinates=arm_add_l axis=(-1 0 0) LinearFunction(coefficients=1 0)
        TransformAxis rotation3: coordinates=arm_rot_l axis=(0 -1 0) LinearFunction(coefficients=1 0)
    PinJoint elbow_l: socket_parent_frame=humerus_l_offset socket_child_frame=ulna_l_offset
      Coordinate elbow_flex_l: default_value=0 range=(0 2.618) clamped=true locked=true
      PhysicalOffsetFrame humerus_l_offset: socket_parent=/bodyset/humerus_l translation=(0.013144 -0.286273 0.009595)
          orientation=(0.0228627 -0.228018 0.0051689)
      PhysicalOffsetFrame ulna_l_offset: socket_parent=/bodyset/ulna_l translation=(0 0 0)
          orientation=(0.0228627 -0.228018 0.0051689)
    PinJoint radioulnar_l: socket_parent_frame=ulna_l_offset socket_child_frame=radius_l_offset
      Coordinate pro_sup_l: default_value=0 range=(0 1.570796) clamped=true locked=true
      PhysicalOffsetFrame ulna_l_offset: socket_parent=/bodyset/ulna_l translation=(-0.006727 -0.013007 -0.026083)
          orientation=(1.56884 -0.056428 1.53614)
      PhysicalOffsetFrame radius_l_offset: socket_parent=/bodyset/radius_l translation=(0 0 0)
          orientation=(1.56884 -0.056428 1.53614)
    UniversalJoint radius_hand_l: socket_parent_frame=radius_l_offset socket_child_frame=hand_l_offset
      Coordinate wrist_flex_l: default_value=0 range=(-1.22173 1.22173) clamped=true locked=true
      Coordinate wrist_dev_l: default_value=0 range=(-0.4363323 0.6108652) clamped=true locked=true
      PhysicalOffsetFrame radius_l_offset: socket_parent=/bodyset/radius_l translation=(-0.008797 -0.235841 -0.01361)
          orientation=(1.5708 0 1.5708)
      PhysicalOffsetFrame hand_l_offset: socket_parent=/bodyset/hand_l translation=(0 0 0)
          orientation=(1.5708 0 1.5708)
  ConstraintSet:
    CoordinateCouplerConstraint patellofemoral_knee_angle_r_con: independent_coordinate_names=knee_angle_r
        dependent_coordinate_name=knee_angle_r_beta scale_factor=1
        coupled_coordinates_function=LinearFunction(coefficients=1 0)
    CoordinateCouplerConstraint patellofemoral_knee_angle_l_con: independent_coordinate_names=knee_angle_l
        dependent_coordinate_name=knee_angle_l_beta scale_factor=1
        coupled_coordinates_function=LinearFunction(coefficients=1 0)
  MarkerSet:
    Marker C7: torso (-0.085 0.457248 0.00208775) fixed=true
    Marker R.Acromion: torso (0 0.439379 0.179211) fixed=true
    Marker L.Acromion: torso (0 0.439379 -0.179211) fixed=true
    Marker R.ASIS: pelvis (0.0148269 0.0306608 0.1291) fixed=true
    Marker L.ASIS: pelvis (0.0148269 0.0306608 -0.1291) fixed=true
    Marker R.PSIS: pelvis (-0.174687 0.0417155 0.042175)
    Marker L.PSIS: pelvis (-0.174801 0.0483974 -0.0387967)
    Marker R.Knee: femur_r (0 -0.401107 0.0496419) fixed=true
    Marker R.MKnee: femur_r (0 -0.401107 -0.0496419) fixed=true
    Marker L.Knee: femur_l (0 -0.389384 -0.0452996) fixed=true
    Marker L.MKnee: femur_l (0.00481911 -0.386492 0.0481911) fixed=true
    Marker R.Ankle: tibia_r (-0.00927081 -0.417238 0.0511744)
    Marker R.MAnkle: tibia_r (0.00615874 -0.415301 -0.0390053) fixed=true
    Marker L.Ankle: tibia_l (-0.00739998 -0.417548 -0.0531005)
    Marker L.MAnkle: tibia_l (0.00614287 -0.411333 0.0389048) fixed=true
    Marker R.Toe: calcn_r (0.217489 0.0363532 0.0241763)
    Marker R.MT5: calcn_r (0.162432 0.00123315 0.0858259)
    Marker R.Heel: calcn_r (-0.0126055 0.00787576 0.00374121)
    Marker L.Toe: calcn_l (0.215274 0.0252331 -0.0051274)
    Marker L.MT5: calcn_l (0.163169 -0.00935958 -0.0658558)
    Marker L.Heel: calcn_l (-0.0219158 0.00104566 -0.00513179)
    Marker midASIS: pelvis (0.0145146 0.0225746 0.00778738)
    Marker midPSIS: pelvis (-0.174744 0.0450564 0.00168917)
    Marker midPelvis: pelvis (-0.0801147 0.0338155 0.00473827)
    Marker R_HJC: femur_r (0 0 0) fixed=true
    Marker L_HJC: femur_l (0 0 0) fixed=true
    Marker midHJC: pelvis (-0.0641847 -0.0802189 0) fixed=true
    Marker R_KJC: tibia_r (0 0 0) fixed=true
    Marker L_KJC: tibia_l (0 0 0) fixed=true
    Marker R_AJC: tibia_r (0.000513228 -0.415301 0.00769842) fixed=true
    Marker R_AJC_proj: tibia_r (0.015542 -0.511085 -2.1997e-5)
    Marker L_AJC: tibia_l (0.00317057 -0.409563 -0.0080873)
    Marker L_AJC_proj: tibia_l (0.0136415 -0.516569 -0.00191705)
    Marker R.MT5_proj: calcn_r (0.165095 -0.0289673 0.0836006)
    Marker R.Toe_proj: calcn_r (0.22239 -0.019235 0.0200803)
    Marker L.MT5_proj: calcn_l (0.165653 -0.0347385 -0.0643924)
    Marker L.Toe_proj: calcn_l (0.220269 -0.0258072 -0.00218431)
    Marker Back_IMU_O: torso (-0.0765139 0.433552 0.0498207)
    Marker Back_IMU_X: torso (-0.0851138 0.436666 -0.0351228)
    Marker Back_IMU_Y: torso (-0.108622 0.33527 0.0497322)
    Marker Back_IMU_D: torso (-0.116416 0.337869 -0.0357918)
    Marker Pelvis_IMU_O: pelvis (-0.17952 0.062787 0.0489131)
    Marker Pelvis_IMU_X: pelvis (-0.177096 0.0647247 -0.0402503)
    Marker Pelvis_IMU_Y: pelvis (-0.215429 -0.0326284 0.0407029)
    Marker Pelvis_IMU_D: pelvis (-0.213092 -0.0285842 -0.04447)
    Marker R.Femur_IMU_O: femur_r (0.0732157 -0.151369 0.0913971)
    Marker R.Femur_IMU_X: femur_r (-0.0178877 -0.14854 0.120671)
    Marker R.Femur_IMU_Y: femur_r (0.0643694 -0.264197 0.0772002)
    Marker R.Femur_IMU_D: femur_r (-0.0275947 -0.261526 0.105729)
    Marker R.Tibia_IMU_O: tibia_r (0.0251364 -0.0813355 0.0647652)
    Marker R.Tibia_IMU_X: tibia_r (-0.0626159 -0.0807337 0.102113)
    Marker R.Tibia_IMU_Y: tibia_r (0.0271289 -0.196439 0.0703661)
    Marker R.Tibia_IMU_D: tibia_r (-0.0606168 -0.194624 0.1089)
    Marker L.Femur_IMU_O: femur_l (0.0490018 -0.14073 -0.112682)
    Marker L.Femur_IMU_X: femur_l (-0.0466792 -0.144197 -0.104701)
    Marker L.Femur_IMU_Y: femur_l (0.0533179 -0.253141 -0.0988882)
    Marker L.Femur_IMU_D: femur_l (-0.0426245 -0.256535 -0.0897163)
    Marker L.Femur_IMU_5: femur_l (0.00685483 -0.283967 -0.0871204)
    Marker L.Tibia_IMU_O: tibia_l (0.0226795 -0.0726078 -0.0761288)
    Marker L.Tibia_IMU_X: tibia_l (-0.0736966 -0.072742 -0.0840835)
    Marker L.Tibia_IMU_Y: tibia_l (0.0223841 -0.186627 -0.0867626)
    Marker L.Tibia_IMU_D: tibia_l (-0.0729788 -0.186193 -0.0947616)
    Marker L.Tibia_IMU_5: tibia_l (-0.0260026 -0.214815 -0.0926585)
    Marker R.Foot_IMU_O: calcn_r (0.159185 0.0766136 -0.0298498)
    Marker R.Foot_IMU_D: calcn_r (0.218213 0.0239492 0.0786583)
    Marker R.Foot_IMU_X: calcn_r (0.13942 0.0557184 0.0693679)
    Marker R.Foot_IMU_Y: calcn_r (0.237572 0.0447139 -0.0207306)
    Marker L.Foot_IMU_O: calcn_l (0.149187 0.0437447 -0.0517838)
    Marker L.Foot_IMU_D: calcn_l (0.230687 0.0366195 0.0566781)
    Marker L.Foot_IMU_X: calcn_l (0.149054 0.0627475 0.0517386)
    Marker L.Foot_IMU_Y: calcn_l (0.230258 0.0194798 -0.0454438)
