# OpenSim document version 20302
Model Dynamic Mocap Model:
  credits: Model authors names..
  publications: List of publications related to model...
  length_units: m
  force_units: N
  gravity: 0 -9.80665 0
  BodySet:
    Body ground: mass=0 mass_center=(0 0 0) inertia_xx=0 inertia_yy=0 inertia_zz=0
    Body loadcell1: mass=0 mass_center=(0 0 0) inertia_xx=0 inertia_yy=0 inertia_zz=0
      CustomJoint gnd_loadcell1: parent_body=ground location_in_parent=(0 0 0) location=(0 0 0)
        Coordinate loadcell1_rz: motion_type=rotational default_value=0 initial_value=0 range=(-6.283185 6.283185)
            clamped=false
        Coordinate loadcell1_rx: motion_type=rotational default_value=0 initial_value=0 range=(-6.283185 6.283185)
            clamped=false
        Coordinate loadcell1_ry: motion_type=rotational default_value=0 initial_value=0 range=(-6.283185 6.283185)
            clamped=false
        Coordinate loadcell1_tx: motion_type=translational default_value=0 initial_value=0 range=(-360 360)
            clamped=false
        Coordinate loadcell1_ty: motion_type=translational default_value=0 initial_value=0 range=(-360 360)
            clamped=false
        Coordinate loadcell1_tz: motion_type=translational default_value=0 initial_value=0 range=(-360 360)
            clamped=false
        SpatialTransform:
          TransformAxis rotation1: coordinates=loadcell1_rz axis=(0 0 1) LinearFunction(coefficients=1 0)
          TransformAxis rotation2: coordinates=loadcell1_rx axis=(1 0 0) LinearFunction(coefficients=1 0)
          TransformAxis rotation3: coordinates=loadcell1_ry axis=(0 1 0) LinearFunction(coefficients=1 0)
          TransformAxis translation1: coordinates=loadcell1_tx axis=(1 0 0) LinearFunction(coefficients=1 0)
          TransformAxis translation2: coordinates=loadcell1_ty axis=(0 1 0) LinearFunction(coefficients=1 0)
          TransformAxis translation3: coordinates=loadcell1_tz axis=(0 0 1) LinearFunction(coefficients=1 0)
    Body loadcell2: mass=0 mass_center=(0 0 0) inertia_xx=0 inertia_yy=0 inertia_zz=0
      CustomJoint gnd_loadcell2: parent_body=ground location_in_parent=(0 0 0) location=(0 0 0)
        Coordinate loadcell2_rz: motion_type=rotational default_value=0 initial_value=0 range=(-6.283185 6.283185)
            clamped=false
        Coordinate loadcell2_rx: motion_type=rotational default_value=0 initial_value=0 range=(-6.283185 6.283185)
            clamped=false
        Coordinate loadcell2_ry: motion_type=rotational default_value=0 initial_value=0 range=(-6.283185 6.283185)
            clamped=false
        Coordinate loadcell2_tx: motion_type=translational default_value=0 initial_value=0 range=(-360 360)
            clamped=false
        Coordinate loadcell2_ty: motion_type=translational default_value=0 initial_value=0 range=(-360 360)
            clamped=false
        Coordinate loadcell2_tz: motion_type=translational default_value=0 initial_value=0 range=(-360 360)
            clamped=false
        SpatialTransform:
          TransformAxis rotation1: coordinates=loadcell2_rz axis=(0 0 1) LinearFunction(coefficients=1 0)
          TransformAxis rotation2: coordinates=loadcell2_rx axis=(1 0 0) LinearFunction(coefficients=1 0)
          TransformAxis rotation3: coordinates=loadcell2_ry axis=(0 1 0) LinearFunction(coefficients=1 0)
          TransformAxis translation1: coordinates=loadcell2_tx axis=(1 0 0) LinearFunction(coefficients=1 0)
          TransformAxis translation2: coordinates=loadcell2_ty axis=(0 1 0) LinearFunction(coefficients=1 0)
          TransformAxis translation3: coordinates=loadcell2_tz axis=(0 0 1) LinearFunction(coefficients=1 0)
    Body pelvis: mass=8.3775 mass_center=(-0.0893 -0.025796 0) inertia_xx=0.053993 inertia_yy=0.061279
        inertia_zz=0.067263 meshes=(pelvis_rv.vtp pelvis_lv.vtp sacrumv.vtp)
      CustomJoint gnd_pelvis: parent_body=ground location_in_parent=(0 0 0) location=(0 0 0)
        Coordinate pelvis_tilt: motion_type=rotational default_value=0 initial_value=0 range=(-4.712389 4.712389)
            clamped=false
        Coordinate pelvis_list: motion_type=rotational default_value=0 initial_value=0 range=(-4.712389 4.712389)
            clamped=false
        Coordinate pelvis_rot: motion_type=rotational default_value=0 initial_value=0 range=(-4.712389 4.712389)
            clamped=false
        Coordinate pelvis_tx: motion_type=translational default_value=0 initial_value=0 range=(-10 10) clamped=false
        Coordinate pelvis_ty: motion_type=translational default_value=0 initial_value=0 range=(-10 10) clamped=false
        Coordinate pelvis_tz: motion_type=translational default_value=0 initial_value=0 range=(-10 10) clamped=false
        SpatialTransform:
          TransformAxis rotation1: coordinates=pelvis_tilt axis=(0 0 1) LinearFunction(coefficients=1 0)
          TransformAxis rotation2: coordinates=pelvis_list axis=(1 0 0) LinearFunction(coefficients=1 0)
          TransformAxis rotation3: coordinates=pelvis_rot axis=(0 1 0) LinearFunction(coefficients=1 0)
          TransformAxis translation1: coordinates=pelvis_tx axis=(1 0 0) LinearFunction(coefficients=1 0)
          TransformAxis translation2: coordinates=pelvis_ty axis=(0 1 0) LinearFunction(coefficients=1 0)
          TransformAxis translation3: coordinates=pelvis_tz axis=(0 0 1) LinearFunction(coefficients=1 0)
    Body torso: mass=24.2175 mass_center=(0.0145 0.256438 0) inertia_xx=0.440821 inertia_yy=0.276872
        inertia_zz=0.596511
        meshes=(lumbar1sm.vtp lumbar2sm.vtp lumbar3sm.vtp lumbar4sm.vtp lumbar5.vtp ribcage_s.vtp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)
      CustomJoint pelvis_torso: parent_body=pelvis location_in_parent=(-0.0872 0.0331 0) location=(0 0 0)
        Coordinate lumbar_ext: motion_type=rotational default_value=0 initial_value=0 range=(-1.047198 1.047198)
            clamped=false
        Coordinate lumbar_latbend: motion_type=rotational default_value=0 initial_value=0 range=(-1.047198 1.047198)
            clamped=false
        Coordinate lumbar_rot: motion_type=rotational default_value=0 initial_value=0 range=(-1.047198 1.047198)
            clamped=false
        SpatialTransform: axes_held_at_zero=(translation1 translation2 translation3)
          TransformAxis rotation1: coordinates=lumbar_ext axis=(0 0 1) LinearFunction(coefficients=1 0)
          TransformAxis rotation2: coordinates=lumbar_latbend axis=(1 0 0) LinearFunction(coefficients=1 0)
          TransformAxis rotation3: coordinates=lumbar_rot axis=(0 1 0) LinearFunction(coefficients=1 0)
    Body neckhead: mass=5.205 mass_center=(0.0288 0.161501 0) inertia_xx=0.030471 inertia_yy=0.02092
        inertia_zz=0.028195 meshes=(cerv1sm.vtp cerv2sm.vtp cerv3sm.vtp cerv4sm.vtp cerv5sm.vtp cerv6sm.vtp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)
      CustomJoint torso_neckhead: parent_body=torso location_in_parent=(-0.0253 0.44895 0) location=(0 0 0)
        Coordinate neck_ext: motion_type=rotational default_value=0 initial_value=0 range=(-0.8726646 1.256637)
            clamped=false
        Coordinate neck_latbend: motion_type=rotational default_value=0 initial_value=0 range=(-0.6981317 0.6981317)
            clamped=false
        Coordinate neck_rot: motion_type=rotational default_value=0 initial_value=0 range=(-1.151917 1.151917)
            clamped=false
        SpatialTransform: axes_held_at_zero=(translation1 translation2 translation3)
          TransformAxis rotation1: coordinates=neck_ext axis=(0 0 1) LinearFunction(coefficients=1 0)
          TransformAxis rotation2: coordinates=neck_latbend axis=(1 0 0) LinearFunction(coefficients=1 0)
          TransformAxis rotation3: coordinates=neck_rot axis=(0 1 0) LinearFunction(coefficients=1 0)
    Body humerus_r: mass=2.0325 mass_center=(0 -0.164502 0) inertia_xx=0.011946 inertia_yy=0.004121 inertia_zz=0.013409
        meshes=humerus_rv.vtp
      CustomJoint acromial_r: parent_body=torso location_in_parent=(-0.0281 0.41645 0.199) location=(0 0 0)
        Coordinate arm_add_r: motion_type=rotational default_value=0 initial_value=0 range=(-2.094395 1.570796)
            clamped=false
        Coordinate arm_flex_r: motion_type=rotational default_value=0 initial_value=0 range=(-1.570796 1.570796)
            clamped=false
        Coordinate arm_rot_r: motion_type=rotational default_value=0 initial_value=0 range=(-1.570796 1.570796)
            clamped=false
        SpatialTransform: axes_held_at_zero=(translation1 translation2 translation3)
          TransformAxis rotation1: coordinates=arm_add_r axis=(1 0 0) LinearFunction(coefficients=1 0)
          TransformAxis rotation2: coordinates=arm_flex_r axis=(0 0 1) LinearFunction(coefficients=1 0)
          TransformAxis rotation3: coordinates=arm_rot_r axis=(0 1 0) LinearFunction(coefficients=1 0)
    Body ulna_r: mass=0.6075 mass_center=(0 -0.120525 0) inertia_xx=0.002962 inertia_yy=0.000618 inertia_zz=0.003213
        meshes=ulna_rv.vtp
      CustomJoint elbow_r: parent_body=humerus_r location_in_parent=(0.013144 -0.286273 -0.009595) location=(0 0 0)
        Coordinate elbow_flex_r: motion_type=rotational default_value=0 initial_value=0 range=(0 2.792527)
            clamped=false
        SpatialTransform: axes_held_at_zero=(rotation2 rotation3 translation1 translation2 translation3)
          TransformAxis rotation1: coordinates=elbow_flex_r axis=(0.226047 0.022269 0.9738618)
              LinearFunction(coefficients=1 0)
    Body radius_r: mass=0.6075 mass_center=(0 -0.120525 0) inertia_xx=0.002962 inertia_yy=0.000618 inertia_zz=0.003213
        meshes=radius_rv.vtp
      CustomJoint radioulnar_r: parent_body=ulna_r location_in_parent=(-0.006727 -0.013007 0.026083) location=(0 0 0)
        Coordinate pro_sup_r: motion_type=rotational default_value=0 initial_value=0 range=(0 1.570796) clamped=false
        SpatialTransform: axes_held_at_zero=(rotation1 rotation3 translation1 translation2 translation3)
          TransformAxis rotation2: coordinates=pro_sup_r axis=(0.05639803 0.9984065 0.001952)
              LinearFunction(coefficients=1 0)
    Body hand_r: mass=0.4575 mass_center=(0 -0.068095 0) inertia_xx=0.000892 inertia_yy=0.000547 inertia_zz=0.00134
        meshes=(pisiform_rvs.vtp lunate_rvs.vtp scaphoid_rvs.vtp triquetrum_rvs.vtp hamate_rvs.vtp capitate_rvs.vtp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)
      CustomJoint radius_hand_r: parent_body=radius_r location_in_parent=(-0.008797 -0.235841 0.01361) location=(0 0 0)
        Coordinate wrist_flex_r: motion_type=rotational default_value=0 initial_value=0 range=(-1.22173 1.22173)
            clamped=false
        SpatialTransform: axes_held_at_zero=(rotation2 rotation3 translation1 translation2 translation3)
          TransformAxis rotation1: coordinates=wrist_flex_r axis=(0 0 1) LinearFunction(coefficients=1 0)
    Body humerus_l: mass=2.0325 mass_center=(0 -0.164502 0) inertia_xx=0.011946 inertia_yy=0.004121 inertia_zz=0.013409
        meshes=humerus_lv.vtp
      CustomJoint acromial_l: parent_body=torso location_in_parent=(-0.0281 0.41645 -0.199) location=(0 0 0)
        Coordinate arm_add_l: motion_type=rotational default_value=0 initial_value=0 range=(-2.094395 1.570796)
            clamped=false
        Coordinate arm_flex_l: motion_type=rotational default_value=0 initial_value=0 range=(-1.570796 1.570796)
            clamped=false
        Coordinate arm_rot_l: motion_type=rotational default_value=0 initial_value=0 range=(-1.570796 1.570796)
            clamped=false
        SpatialTransform: axes_held_at_zero=(translation1 translation2 translation3)
          TransformAxis rotation1: coordinates=arm_add_l axis=(-1 0 0) LinearFunction(coefficients=1 0)
          TransformAxis rotation2: coordinates=arm_flex_l axis=(0 0 1) LinearFunction(coefficients=1 0)
          TransformAxis rotation3: coordinates=arm_rot_l axis=(0 -1 0) LinearFunction(coefficients=1 0)
    Body ulna_l: mass=0.6075 mass_center=(0 -0.120525 0) inertia_xx=0.002962 inertia_yy=0.000618 inertia_zz=0.003213
        meshes=ulna_lv.vtp
      CustomJoint elbow_l: parent_body=humerus_l location_in_parent=(0.013144 -0.286273 0.009595) location=(0 0 0)
        Coordinate elbow_flex_l: motion_type=rotational default_value=0 initial_value=0 range=(0 2.792527)
            clamped=false
        SpatialTransform: axes_held_at_zero=(rotation2 rotation3 translation1 translation2 translation3)
          TransformAxis rotation1: coordinates=elbow_flex_l axis=(-0.226047 -0.022269 0.9738618)
              LinearFunction(coefficients=1 0)
    Body radius_l: mass=0.6075 mass_center=(0 -0.120525 0) inertia_xx=0.002962 inertia_yy=0.000618 inertia_zz=0.003213
        meshes=radius_lv.vtp
      CustomJoint radioulnar_l: parent_body=ulna_l location_in_parent=(-0.006727 -0.013007 -0.026083) location=(0 0 0)
        Coordinate pro_sup_l: motion_type=rotational default_value=0 initial_value=0 range=(0 1.570796) clamped=false
        SpatialTransform: axes_held_at_zero=(rotation1 rotation3 translation1 translation2 translation3)
          TransformAxis rotation2: coordinates=pro_sup_l axis=(-0.05639803 -0.9984065 0.001952)
              LinearFunction(coefficients=1 0)
    Body hand_l: mass=0.4575 mass_center=(0 -0.068095 0) inertia_xx=0.000892 inertia_yy=0.000547 inertia_zz=0.00134
        meshes=(pisiform_lvs.vtp lunate_lvs.vtp scaphoid_lvs.vtp triquetrum_lvs.vtp hamate_lvs.vtp capitate_lvs.vtp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)
      CustomJoint radius_hand_l: parent_body=radius_l location_in_parent=(-0.008797 -0.235841 -0.01361)
          location=(0 0 0)
        Coordinate wrist_flex_l: motion_type=rotational default_value=0 initial_value=0 range=(-1.22173 1.22173)
            clamped=false
        SpatialTransform: axes_held_at_zero=(rotation2 rotation3 translation1 translation2 translation3)
          TransformAxis rotation1: coordinates=wrist_flex_l axis=(0 0 1) LinearFunction(coefficients=1 0)
    Body femur_r: mass=10.5225 mass_center=(0 -0.162162 0) inertia_xx=0.178608 inertia_yy=0.036634 inertia_zz=0.178608
        meshes=femur_phd.vtp
      CustomJoint hip_r: parent_body=pelvis location_in_parent=(-0.08 -0.0824 0.0785) location=(0 0 0)
        Coordinate hip_flex_r: motion_type=rotational default_value=0 initial_value=0 range=(-1.047198 2.617994)
            clamped=false
        Coordinate hip_add_r: motion_type=rotational default_value=0 initial_value=0 range=(-1.047198 1.047198)
            clamped=false
        Coordinate hip_rot_r: motion_type=rotational default_value=0 initial_value=0 range=(-1.047198 1.047198)
            clamped=false
        SpatialTransform: axes_held_at_zero=(translation1 translation2 translation3)
          TransformAxis rotation1: coordinates=hip_flex_r axis=(0 0 1) LinearFunction(coefficients=1 0)
          TransformAxis rotation2: coordinates=hip_add_r axis=(1 0 0) LinearFunction(coefficients=1 0)
          TransformAxis rotation3: coordinates=hip_rot_r axis=(0 1 0) LinearFunction(coefficients=1 0)
    Body tibia_r: mass=3.2475 mass_center=(0 -0.171713 0) inertia_xx=0.029999 inertia_yy=0.005157 inertia_zz=0.031231
        meshes=(tibia_dt.vtp fibula_dt.vtp)
      CustomJoint knee_r: parent_body=femur_r location_in_parent=(0 0 0) location=(0 0 0)
        Coordinate knee_flex_r: motion_type=rotational default_value=0 initial_value=0 range=(-0.1745329 2.792527)
            clamped=false
        SpatialTransform:
          TransformAxis rotation1: coordinates=knee_flex_r axis=(0 0 -1) LinearFunction(coefficients=1 0)
          TransformAxis rotation2: coordinates=knee_flex_r axis=(1 0 0)
            NaturalCubicSpline: x=(0 0.1745329 0.3490659 0.5235988 0.6981317 0.8726646 1.047198 1.22173 1.396263 1.570796 1.745329 1.919862 2.094395 2.268928 2.443461 2.617994 2.792527)
                y=(0 0.0060646 0.012709 0.01938724 0.0256798 0.03132044 0.03621675 0.04046542 0.04436418 0.04842268 0.05337498 0.06019442 0.07010958 0.08461711 0.1054824 0.1347151 0.1745013)
          TransformAxis rotation3: coordinates=knee_flex_r axis=(0 1 0)
            NaturalCubicSpline: x=(0 0.1745329 0.3490659 0.5235988 0.6981317 0.8726646 1.047198 1.22173 1.396263 1.570796 1.745329 1.919862 2.094395 2.268928 2.443461 2.617994 2.792527)
                y=(0.00000002 0.0472224 0.08572846 0.1163331 0.1399435 0.1575379 0.1701397 0.1787921 0.1845345 0.1883863 0.1913376 0.1943462 0.1983404 0.2042234 0.2128787 0.2251758 0.2419777)
          TransformAxis translation1: coordinates=knee_flex_r axis=(1 0 0)
            NaturalCubicSpline: x=(0 0.1745329 0.3490659 0.5235988 0.6981317 0.8726646 1.047198 1.22173 1.396263 1.570796 1.745329 1.919862 2.094395 2.268928 2.443461 2.617994 2.792527)
                y=(0 0.001536 0.002797 0.003653 0.004006 0.003799 0.003015 0.001679 -0.000146 -0.002365 -0.00486 -0.007499 -0.01015 -0.01269 -0.015018 -0.017065 -0.018799)
          TransformAxis translation2: coordinates=knee_flex_r axis=(0 1 0)
            NaturalCubicSpline: x=(0 0.1745329 0.3490659 0.5235988 0.6981317 0.8726646 1.047198 1.22173 1.396263 1.570796 1.745329 1.919862 2.094395 2.268928 2.443461 2.617994 2.792527)
                y=(-0.404425 -0.405485 -0.407063 -0.409057 -0.411338 -0.413759 -0.416169 -0.418418 -0.420374 -0.421927 -0.423003 -0.423563 -0.42361 -0.423184 -0.422358 -0.421229 -0.419907)
          TransformAxis translation3: coordinates=knee_flex_r axis=(0 0 1)
            NaturalCubicSpline: x=(-0.1745329 0.3490659 0.8726646 1.396263 1.919862 2.443461 2.96706) y=(0 0 0 0 0 0 0)
    Body patella_r: mass=0.0975 mass_center=(0.0018 0.0264 0) inertia_xx=0.000003 inertia_yy=0.000015
        inertia_zz=0.000015 meshes=patella_r.vtp
      CustomJoint tib_pat_r: parent_body=tibia_r location_in_parent=(0 0 0) location=(0 0 0)
        Coordinate tib_pat_r_r3: motion_type=rotational default_value=0 initial_value=0 range=(-99999.9 99999.9)
            clamped=false
        Coordinate tib_pat_r_tx: motion_type=translational default_value=0 initial_value=0 range=(-99999.9 99999.9)
            clamped=false
        Coordinate tib_pat_r_ty: motion_type=translational default_value=0 initial_value=0 range=(-99999.9 99999.9)
            clamped=false
        Coordinate tib_pat_r_tz: motion_type=translational default_value=0 initial_value=0 range=(-99999.9 99999.9)
            clamped=false
        SpatialTransform: axes_held_at_zero=(rotation2 rotation3)
          TransformAxis rotation1: coordinates=tib_pat_r_r3 axis=(0 0 1) LinearFunction(coefficients=1 0)
          TransformAxis translation1: coordinates=tib_pat_r_tx axis=(1 0 0) LinearFunction(coefficients=1 0)
          TransformAxis translation2: coordinates=tib_pat_r_ty axis=(0 1 0) LinearFunction(coefficients=1 0)
          TransformAxis translation3: coordinates=tib_pat_r_tz axis=(0 0 1) LinearFunction(coefficients=1 0)
    Body talus_r: mass=0.045 mass_center=(0.0055 0.0023 0) inertia_xx=0.000003 inertia_yy=0.000001 inertia_zz=0.000003
        meshes=talus_rv.vtp
      CustomJoint ankle_r: parent_body=tibia_r location_in_parent=(0 -0.426 0) location=(0 0 0)
        Coordinate ankle_flex_r: motion_type=rotational default_value=0 initial_value=0 range=(-1.570796 1.570796)
            clamped=false
        SpatialTransform: axes_held_at_zero=(rotation2 rotation3 translation1 translation2 translation3)
          TransformAxis rotation1: coordinates=ankle_flex_r axis=(-0.104529 -0.1736491 0.9792444)
              LinearFunction(coefficients=1 0)
    Body foot_r: mass=0.885 mass_center=(0.101865 0.0156 0) inertia_xx=0.000909 inertia_yy=0.002314 inertia_zz=0.002683
        meshes=(calcaneous_rv.vtp navicular_rv.vtp cuboid_rv.vtp first_cuneiform_rv.vtp second_cuneiform_rv.vtp third_cuneiform_rv.vtp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)
      CustomJoint subtalar_r: parent_body=talus_r location_in_parent=(-0.04877 -0.04195 0.00792) location=(0 0 0)
        Coordinate subt_angle_r: motion_type=rotational default_value=0 initial_value=0 range=(-1.047198 1.047198)
            clamped=false
        SpatialTransform: axes_held_at_zero=(rotation2 rotation3 translation1 translation2 translation3)
          TransformAxis rotation1: coordinates=subt_angle_r axis=(0.78718 0.604747 -0.120949)
              LinearFunction(coefficients=1 0)
    Body toes_r: mass=0.0975 mass_center=(0.0307 -0.0026 0.0105) inertia_xx=0.0001 inertia_yy=0.000255
        inertia_zz=0.000294
        meshes=(prox_phalanx1_rvs.vtp prox_phalanx2_rvs.vtp prox_phalanx3_rvs.vtp prox_phalanx4_rvs.vtp prox_phalanx5_rvs.vtp mid_phalanx2_rvs.vtp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)
      CustomJoint toes_r: parent_body=foot_r location_in_parent=(0.1768 -0.002 0.00108) location=(0 0 0)
        Coordinate toe_angle_r: motion_type=rotational default_value=0 initial_value=0 range=(-1.047198 1.047198)
            clamped=false
        SpatialTransform: axes_held_at_zero=(rotation2 rotation3 translation1 translation2 translation3)
          TransformAxis rotation1: coordinates=toe_angle_r axis=(0.541717 0 -0.840561) LinearFunction(coefficients=1 0)
    Body femur_l: mass=10.5225 mass_center=(0 -0.162162 0) inertia_xx=0.178608 inertia_yy=0.036634 inertia_zz=0.178608
        meshes=(femur_phd_l.vtp femur_l.vtp)
      CustomJoint hip_l: parent_body=pelvis location_in_parent=(-0.08 -0.0824 -0.0785) location=(0 0 0)
        Coordinate hip_flex_l: motion_type=rotational default_value=0 initial_value=0 range=(-1.047198 2.617994)
            clamped=false
        Coordinate hip_add_l: motion_type=rotational default_value=0 initial_value=0 range=(-1.047198 0.3490659)
            clamped=false
        Coordinate hip_rot_l: motion_type=rotational default_value=0 initial_value=0 range=(-1.047198 1.047198)
            clamped=false
        SpatialTransform: axes_held_at_zero=(translation1 translation2 translation3)
          TransformAxis rotation1: coordinates=hip_flex_l axis=(0 0 1) LinearFunction(coefficients=1 0)
          TransformAxis rotation2: coordinates=hip_add_l axis=(-1 0 0) LinearFunction(coefficients=1 0)
          TransformAxis rotation3: coordinates=hip_rot_l axis=(0 -1 0) LinearFunction(coefficients=1 0)
    Body tibia_l: mass=3.2475 mass_center=(0 -0.171713 0) inertia_xx=0.029999 inertia_yy=0.005157 inertia_zz=0.031231
        meshes=(tibia_dt_l.vtp fibula_dt_l.vtp tibia_l.vtp fibula_l.vtp)
      CustomJoint knee_l: parent_body=femur_l location_in_parent=(0 0 0) location=(0 0 0)
        Coordinate knee_flex_l: motion_type=rotational default_value=0 initial_value=0 range=(-0.1745329 2.792527)
            clamped=false
        SpatialTransform:
          TransformAxis rotation1: coordinates=knee_flex_l axis=(0 0 -1) LinearFunction(coefficients=1 0)
          TransformAxis rotation2: coordinates=knee_flex_l axis=(1 0 0)
            NaturalCubicSpline: x=(0 0.1745329 0.3490659 0.5235988 0.6981317 0.8726646 1.047198 1.22173 1.396263 1.570796 1.745329 1.919862 2.094395 2.268928 2.443461 2.617994 2.792527)
                y=(0 -0.0060646 -0.012709 -0.01938724 -0.0256798 -0.03132044 -0.03621675 -0.04046542 -0.04436418 -0.04842268 -0.05337498 -0.06019442 -0.07010958 -0.08461711 -0.1054824 -0.1347151 -0.1745013)
          TransformAxis rotation3: coordinates=knee_flex_l axis=(0 1 0)
            NaturalCubicSpline: x=(0 0.1745329 0.3490659 0.5235988 0.6981317 0.8726646 1.047198 1.22173 1.396263 1.570796 1.745329 1.919862 2.094395 2.268928 2.443461 2.617994 2.792527)
                y=(-0.00000002 -0.0472224 -0.08572846 -0.1163331 -0.1399435 -0.1575379 -0.1701397 -0.1787921 -0.1845345 -0.1883863 -0.1913376 -0.1943462 -0.1983404 -0.2042234 -0.2128787 -0.2251758 -0.2419777)
          TransformAxis translation1: coordinates=knee_flex_l axis=(1 0 0)
            NaturalCubicSpline: x=(0 0.1745329 0.3490659 0.5235988 0.6981317 0.8726646 1.047198 1.22173 1.396263 1.570796 1.745329 1.919862 2.094395 2.268928 2.443461 2.617994 2.792527)
                y=(0 0.001536 0.002797 0.003653 0.004006 0.003799 0.003015 0.001679 -0.000146 -0.002365 -0.00486 -0.007499 -0.01015 -0.01269 -0.015018 -0.017065 -0.018799)
          TransformAxis translation2: coordinates=knee_flex_l axis=(0 1 0)
            NaturalCubicSpline: x=(0 0.1745329 0.3490659 0.5235988 0.6981317 0.8726646 1.047198 1.22173 1.396263 1.570796 1.745329 1.919862 2.094395 2.268928 2.443461 2.617994 2.792527)
                y=(-0.404425 -0.405485 -0.407063 -0.409057 -0.411338 -0.413759 -0.416169 -0.418418 -0.420374 -0.421927 -0.423003 -0.423563 -0.42361 -0.423184 -0.422358 -0.421229 -0.419907)
          TransformAxis translation3: coordinates=knee_flex_l axis=(0 0 1)
            NaturalCubicSpline: x=(-0.1745329 0.3490659 0.8726646 1.396263 1.919862 2.443461 2.96706) y=(0 0 0 0 0 0 0)
    Body patella_l: mass=0.0975 mass_center=(0.0018 0.0264 0) inertia_xx=0.000003 inertia_yy=0.000015
        inertia_zz=0.000015 meshes=patella_l.vtp
      CustomJoint tib_pat_l: parent_body=tibia_l location_in_parent=(0 0 0) location=(0 0 0)
        Coordinate tib_pat_l_r3: motion_type=rotational default_value=0 initial_value=0 range=(-99999.9 99999.9)
            clamped=false
        Coordinate tib_pat_l_tx: motion_type=translational default_value=0 initial_value=0 range=(-99999.9 99999.9)
            clamped=false
        Coordinate tib_pat_l_ty: motion_type=translational default_value=0 initial_value=0 range=(-99999.9 99999.9)
            clamped=false
        Coordinate tib_pat_l_tz: motion_type=translational default_value=0 initial_value=0 range=(-99999.9 99999.9)
            clamped=false
        SpatialTransform: axes_held_at_zero=(rotation2 rotation3)
          TransformAxis rotation1: coordinates=tib_pat_l_r3 axis=(0 0 1) LinearFunction(coefficients=1 0)
          TransformAxis translation1: coordinates=tib_pat_l_tx axis=(1 0 0) LinearFunction(coefficients=1 0)
          TransformAxis translation2: coordinates=tib_pat_l_ty axis=(0 1 0) LinearFunction(coefficients=1 0)
          TransformAxis translation3: coordinates=tib_pat_l_tz axis=(0 0 1) LinearFunction(coefficients=1 0)
    Body talus_l: mass=0.045 mass_center=(0.0055 0.0023 0) inertia_xx=0.000003 inertia_yy=0.000001 inertia_zz=0.000003
        meshes=talus_lv.vtp
      CustomJoint ankle_l: parent_body=tibia_l location_in_parent=(0 -0.426 0) location=(0 0 0)
        Coordinate ankle_flex_l: motion_type=rotational default_value=0 initial_value=0 range=(-1.570796 1.570796)
            clamped=false
        SpatialTransform: axes_held_at_zero=(rotation2 rotation3 translation1 translation2 translation3)
          TransformAxis rotation1: coordinates=ankle_flex_l axis=(0.104529 0.1736491 0.9792444)
              LinearFunction(coefficients=1 0)
    Body foot_l: mass=0.885 mass_center=(0.101865 0.0156 0) inertia_xx=0.000909 inertia_yy=0.002314 inertia_zz=0.002683
        meshes=(calcaneous_lv.vtp navicular_lv.vtp cuboid_lv.vtp first_cuneiform_lv.vtp second_cuneiform_lv.vtp third_cuneiform_lv.vtp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)
      CustomJoint subtalar_l: parent_body=talus_l location_in_parent=(-0.04877 -0.04195 -0.00792) location=(0 0 0)
        Coordinate subt_angle_l: motion_type=rotational default_value=0 initial_value=0 range=(-0.6981317 0.6981317)
            clamped=false
        SpatialTransform: axes_held_at_zero=(rotation2 rotation3 translation1 translation2 translation3)
          TransformAxis rotation1: coordinates=subt_angle_l axis=(-0.78718 -0.604747 -0.120949)
              LinearFunction(coefficients=1 0)
    Body toes_left: mass=0.0975 mass_center=(0.0307 -0.0026 -0.0105) inertia_xx=0.0001 inertia_yy=0.000255
        inertia_zz=0.000294
        meshes=(prox_phalanx1_lvs.vtp prox_phalanx2_lvs.vtp prox_phalanx3_lvs.vtp prox_phalanx4_lvs.vtp prox_phalanx5_lvs.vtp mid_phalanx2_lvs.vtp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)
      CustomJoint toes_l: parent_body=foot_l location_in_parent=(0.1768 -0.002 -0.00108) location=(0 0 0)
        Coordinate toe_angle_l: motion_type=rotational default_value=0 initial_value=0 range=(-1.047198 1.047198)
            clamped=false
        SpatialTransform: axes_held_at_zero=(rotation2 rotation3 translation1 translation2 translation3)
          TransformAxis rotation1: coordinates=toe_angle_l axis=(-0.541717 0 -0.840561)
              LinearFunction(coefficients=1 0)
  ConstraintSet:
    CoordinateCouplerConstraint tib_pat_r_r3_con: independent_coordinate_names=knee_flex_r
        dependent_coordinate_name=tib_pat_r_r3 scale_factor=1
      coupled_coordinates_function: NaturalCubicSpline: x=(0 0.1745329 0.3490659 0.5235988 0.6981317 0.8726646 1.047198 1.22173 1.396263 1.570796 1.745329 1.919862 2.094395 2.255164 2.396111 2.572296 2.792527)
          y=(0.0496029 0.1688684 0.235353 0.2697737 0.2899273 0.3013556 0.3063859 0.3073454 0.3065614 0.3064793 0.3110097 0.3250536 0.3535311 0.3931591 0.4374889 0.4951177 0.5682619)
    CoordinateCouplerConstraint tib_pat_r_tx_con: independent_coordinate_names=knee_flex_r
        dependent_coordinate_name=tib_pat_r_tx scale_factor=1
      coupled_coordinates_function: NaturalCubicSpline: x=(0 0.1745329 0.3490659 0.5235988 0.6981317 0.8726646 1.047198 1.22173 1.396263 1.570796 1.745329 1.919862 2.094395 2.268928 2.431348 2.598724 2.792527)
          y=(0.045024 0.042156 0.039838 0.037205 0.034355 0.031627 0.028876 0.025995 0.023166 0.020603 0.018415 0.016759 0.015563 0.014496 0.014152 0.014063 0.014688)
    CoordinateCouplerConstraint tib_pat_r_ty_con: independent_coordinate_names=knee_flex_r
        dependent_coordinate_name=tib_pat_r_ty scale_factor=1
      coupled_coordinates_function: NaturalCubicSpline: x=(0 0.1745329 0.3435601 0.528554 0.6981317 0.872114 1.039489 1.224483 1.396263 1.570796 1.745329 1.919862 2.096597 2.290401 2.466585 2.625151 2.792527)
          y=(-0.014087 -0.01435 -0.01451 -0.014347 -0.014209 -0.014022 -0.013886 -0.013832 -0.013987 -0.014261 -0.014923 -0.015873 -0.016193 -0.016247 -0.01622 -0.01603 -0.015759)
    CoordinateCouplerConstraint tib_pat_r_tz_con: independent_coordinate_names=knee_flex_r
        dependent_coordinate_name=tib_pat_r_tz scale_factor=1
      coupled_coordinates_function: PiecewiseLinearFunction: x=(-17453.29 17453.29) y=(0.0024 0.0024)
    CoordinateCouplerConstraint tib_pat_l_r3_con: independent_coordinate_names=knee_flex_l
        dependent_coordinate_name=tib_pat_l_r3 scale_factor=1
      coupled_coordinates_function: NaturalCubicSpline: x=(0 0.1745329 0.3490659 0.5235988 0.6981317 0.8726646 1.047198 1.22173 1.396263 1.570796 1.745329 1.919862 2.094395 2.255164 2.396111 2.572296 2.792527)
          y=(0.0496029 0.1688684 0.235353 0.2697737 0.2899273 0.3013556 0.3063859 0.3073454 0.3065614 0.3064793 0.3110097 0.3250536 0.3535311 0.3931591 0.4374889 0.4951177 0.5682619)
    CoordinateCouplerConstraint tib_pat_l_tx_con: independent_coordinate_names=knee_flex_l
        dependent_coordinate_name=tib_pat_l_tx scale_factor=1
      coupled_coordinates_function: NaturalCubicSpline: x=(0 0.1745329 0.3490659 0.5235988 0.6981317 0.8726646 1.047198 1.22173 1.396263 1.570796 1.745329 1.919862 2.094395 2.268928 2.431348 2.598724 2.792527)
          y=(0.045024 0.042156 0.039838 0.037205 0.034355 0.031627 0.028876 0.025995 0.023166 0.020603 0.018415 0.016759 0.015563 0.014496 0.014152 0.014063 0.014688)
    CoordinateCouplerConstraint tib_pat_l_ty_con: independent_coordinate_names=knee_flex_l
        dependent_coordinate_name=tib_pat_l_ty scale_factor=1
      coupled_coordinates_function: NaturalCubicSpline: x=(0 0.1745329 0.3435601 0.528554 0.6981317 0.872114 1.039489 1.224483 1.396263 1.570796 1.745329 1.919862 2.096597 2.290401 2.466585 2.625151 2.792527)
          y=(-0.014087 -0.01435 -0.01451 -0.014347 -0.014209 -0.014022 -0.013886 -0.013832 -0.013987 -0.014261 -0.014923 -0.015873 -0.016193 -0.016247 -0.01622 -0.01603 -0.015759)
    CoordinateCouplerConstraint tib_pat_l_tz_con: independent_coordinate_names=knee_flex_l
        dependent_coordinate_name=tib_pat_l_tz scale_factor=1
      coupled_coordinates_function: PiecewiseLinearFunction: x=(-17453.29 17453.29) y=(-0.0024 -0.0024)
  MarkerSet:
    Marker S2: pelvis (-0.2 0 0)
    Marker R.ASIS: pelvis (0.01 0 0.128)
    Marker R.Iliac: pelvis (-0.08 0.06 0.15)
    Marker R.PSIS: pelvis (-0.2 0 0.055)
    Marker L.ASIS: pelvis (0.01 0 -0.128)
    Marker L.Iliac: pelvis (-0.08 0.06 -0.15)
    Marker L.PSIS: pelvis (-0.2 0 -0.055)
    Marker R_HJC: pelvis (-0.08 -0.0824 0.0785)
    Marker L_HJC: pelvis (-0.08 -0.0824 -0.0785)
    Marker R.Clavicle: torso (0.035 0.43 0.025)
    Marker L.Clavicle: torso (0.035 0.43 -0.025)
    Marker L.Scapula: torso (-0.12 -0.1 0.08)
    Marker R.Shoulder: torso (-0.0488 0.47065 0.165)
    Marker L.Shoulder: torso (-0.0488 0.47065 -0.165)
    Marker C7: neckhead (0 0 0)
    Marker R.Bicep: humerus_r (0.04 -0.15 0)
    Marker R.Elbow: humerus_r (-0.01 -0.281 0.04)
    Marker R.MElbow: humerus_r (0 -0.281 -0.04)
    Marker R.Forearm: ulna_r (0 -0.15 0)
    Marker R.Wrist: radius_r (-0.025 -0.245 0.006)
    Marker L.Bicep: humerus_l (0.04 -0.15 0)
    Marker L.Elbow: humerus_l (0.01 -0.281 -0.04)
    Marker L.MElbow: humerus_l (-0.02 -0.281 0.04)
    Marker L.Forearm: ulna_l (0 -0.15 0)
    Marker L.Wrist: radius_l (-0.025 -0.245 -0.006)
    Marker R.Knee: femur_r (0 -0.404 0.05)
    Marker R.MKnee: femur_r (0 -0.404 -0.05)
    Marker R.TH1: femur_r (0.0179 -0.224 0.1147)
    Marker R.TH2: femur_r (0.0179 -0.264 0.0647)
    Marker R.TH3: femur_r (0.0179 -0.264 0.0647)
    Marker R.TH4: femur_r (0.08 -0.324 0.0047)
    Marker R.Ankle: tibia_r (-0.005 -0.41 0.053)
    Marker R.MAnkle: tibia_r (0.006 -0.3888 -0.038)
    Marker R.SH1: tibia_r (0.0104 -0.2322 0.0748)
    Marker R.SH2: tibia_r (0.0125 -0.3196 0.06)
    Marker R.SH3: tibia_r (0.0125 -0.3196 0.06)
    Marker R.SH4: tibia_r (0.0125 -0.3196 0.06)
    Marker R.Toe: foot_r (0.19 0.018 0)
    Marker R.MT1: foot_r (0.2 0.005 -0.045)
    Marker R.MT5: foot_r (0.15 0.005 0.055)
    Marker R.Heel: foot_r (-0.03 0.018 -0.01)
    Marker L.Knee: femur_l (0 -0.404 -0.05)
    Marker L.MKnee: femur_l (0 -0.404 0.05)
    Marker L.TH1: femur_l (0.0179 -0.224 -0.1147)
    Marker L.TH2: femur_l (0.0179 -0.224 -0.1147)
    Marker L.TH3: femur_l (0.0179 -0.264 -0.0647)
    Marker L.TH4: femur_l (0.08 -0.324 -0.0047)
    Marker L.Ankle: tibia_l (-0.005 -0.41 -0.053)
    Marker L.MAnkle: tibia_l (0.006 -0.3888 0.038)
    Marker L.SH1: tibia_l (0.0104 -0.2322 -0.0748)
    Marker L.SH2: tibia_l (0.0425 -0.3596 0)
    Marker L.SH3: tibia_l (0.0125 -0.3196 -0.06)
    Marker L.SH4: tibia_l (0.0125 -0.3196 -0.06)
    Marker L.Toe: foot_l (0.19 0.018 0)
    Marker L.Heel: foot_l (-0.03 0.018 0.01)
    Marker L.MT1: foot_l (0.2 0.005 0.045)
    Marker L.MT5: foot_l (0.15 0.005 -0.055)
