# OpenSim document version 40000
InverseKinematicsTool:
  results_directory: ./
  model_file: subject1_abdbonepin.osim
  constraint_weight: Infinity
  accuracy: 1e-6
  marker_file: abdbonepin.trc
  time_range: 0 19
  report_errors: false
  output_motion_file: subject1_abdbonepin_IK.mot
  report_marker_locations: false
  IKTaskSet:
    IKMarkerTask ij: apply=true weight=1
    IKMarkerTask acc: apply=true weight=1
    IKMarkerTask ac: apply=true weight=1
    IKMarkerTask ai: apply=true weight=1
    IKMarkerTask ts: apply=true weight=1
    IKMarkerTask gu: apply=true weight=1
    IKMarkerTask EpL: apply=true weight=1
    IKMarkerTask centelbow: apply=true weight=1
    IKMarkerTask centijc7: apply=true weight=1
    IKMarkerTask centpxt8: apply=true weight=1
    IKMarkerTask ijc: apply=false weight=1
