# OpenSim document version 20302
MeasurementSet gait2354:
  Measurement torso: apply=true
    MarkerPair: markers=(V.Sacral Top.Head)
    BodyScale torso: axes=(X Y Z)
  Measurement pelvis: apply=true
    MarkerPair: markers=(R.ASIS L.ASIS)
    BodyScale pelvis: axes=(X Y Z)
  Measurement thigh: apply=true
    MarkerPair: markers=(R.ASIS R.Knee.Lat)
    MarkerPair: markers=(L.ASIS L.Knee.Lat)
    BodyScale femur_r: axes=(X Y Z)
    BodyScale femur_l: axes=(X Y Z)
    BodyScale patella_r: axes=(X Y Z)
    BodyScale patella_l: axes=(X Y Z)
  Measurement shank: apply=true
    MarkerPair: markers=(R.Knee.Lat R.Ankle.Lat)
    MarkerPair: markers=(L.Knee.Lat L.Ankle.Lat)
    BodyScale tibia_r: axes=(X Y Z)
    BodyScale tibia_l: axes=(X Y Z)
    BodyScale talus_r: axes=(X Y Z)
    BodyScale talus_l: axes=(X Y Z)
  Measurement foot: apply=true
    MarkerPair: markers=(R.Heel R.Toe.Tip)
    MarkerPair: markers=(L.Heel L.Toe.Tip)
    BodyScale calcn_r: axes=(X Y Z)
    BodyScale calcn_l: axes=(X Y Z)
    BodyScale toes_r: axes=(X Y Z)
    BodyScale toes_l: axes=(X Y Z)
