# OpenSim document version 30000
ScaleTool SimpleBlocksWithLigaments-scaled:
  mass: 2 [kg]
  height: -1
  age: -1
  GenericModelMaker:
    model_file: toyLigamentModel.osim
  ModelScaler:
    apply: true
    scaling_order: manualScale
    time_range: -1 -1
    preserve_mass_distribution: false
    output_model_file: toyLigamentModelScaled.osim
    ScaleSet:
      Scale: scales=(2 2 2) segment=block apply=true
      Scale: scales=(2 2 2) segment=block1 apply=true
  MarkerPlacer:
    apply: false
    time_range: -1 -1
    max_marker_movement: -1
