# OpenSim document version 40000
IMUInverseKinematicsTool track_HJC_trial:
  accuracy: 1e-6
  sensor_to_opensim_rotations: -1.570796 0 0
  constraint_weight: Inf
  time_range: 417 431
  orientations_file: MT_012005D6_009-quaternions_RHJCSwinger.sto
  OrientationWeightSet orientation_weights:
    OrientationWeight calcn_r_imu: weight=0
    OrientationWeight calcn_l_imu: weight=0
