# OpenSim document version 40000
XsensDataReaderSettings:
  trial_prefix: MT_012005D6_002-
  ExperimentalSensors:
    ExperimentalSensor 000_00B42268.txt: name_in_model=torso
    ExperimentalSensor 000_00B4226B.txt: name_in_model=pelvis
    ExperimentalSensor 000_00B4227D.txt: name_in_model=tibia_r
    ExperimentalSensor 000_00B4227C.txt: name_in_model=femur_r
    ExperimentalSensor 000_00B421ED.txt: name_in_model=tibia_l
    ExperimentalSensor 000_00B421EE.txt: name_in_model=femur_l
    ExperimentalSensor 000_00B421E6.txt: name_in_model=calcn_r
    ExperimentalSensor 000_00B421EF.txt: name_in_model=calcn_l
