# OpenSim document version 40000
Model DynamicWalkerModel:
  gravity: 0 -9.80665 0
  Ground
  BodySet:
    Body Platform: mass=1 [kg] inertia=(1 1 1 0 0 0)
      Brick Platform_geom_1: half_lengths=(10 0.01 1)
    Body Pelvis: mass=1 inertia=(1 1 1 0 0 0)
      Sphere Pelvis_geom_1: radius=0.2
    Body RightThigh: mass=1 mass_center=(0 0 0) inertia=(2 2 0.02 0 0 0)
      Ellipsoid RightThigh_geom_1: radii=(0.04 0.2 0.04)
    Body LeftThigh: mass=1 inertia=(2 2 0.02 0 0 0)
      Ellipsoid LeftThigh_geom_1: radii=(0.04 0.2 0.04)
    Body RightShank: mass=1 mass_center=(0 0 0) inertia=(2 2 0.002 0 0 0)
      Ellipsoid RightShank_geom_1: radii=(0.0435 0.2175 0.0435)
    Body LeftShank: mass=0.1 inertia=(2 2 0.002 0 0 0)
      Ellipsoid LeftShank_geom_1: radii=(0.0435 0.2175 0.0435)
  JointSet:
    PinJoint PlatformToGround: socket_parent_frame=ground_offset socket_child_frame=Platform_offset
      Coordinate platform_rz: default_value=-0.02617994 range=(-1.745329 1.745329) locked=true
      PhysicalOffsetFrame ground_offset: socket_parent=/ground translation=(0 0 0) [meters]
      PhysicalOffsetFrame Platform_offset: socket_parent=/bodyset/Platform translation=(0 0 0)
    PlanarJoint PelvisToPlatform: socket_parent_frame=/bodyset/Platform socket_child_frame=/bodyset/Pelvis
      Coordinate Pelvis_rz: default_value=0 range=(-3.141593 3.141593)
      Coordinate Pelvis_tx: default_value=0 range=(0 10)
      Coordinate Pelvis_ty: default_value=0.835 range=(-5 5)
    PinJoint RThighToPelvis: socket_parent_frame=Pelvis_offset socket_child_frame=RightThigh_offset
      Coordinate RHip_rz: default_value=0.5235988 range=(-1.745329 1.745329)
      PhysicalOffsetFrame Pelvis_offset: socket_parent=/bodyset/Pelvis translation=(0 0 0.2)
      PhysicalOffsetFrame RightThigh_offset: socket_parent=/bodyset/RightThigh translation=(0 0.2 0)
    PinJoint LThighToPelvis: socket_parent_frame=Pelvis_offset socket_child_frame=LeftThigh_offset
      Coordinate LHip_rz: default_value=-0.1745329 range=(-1.745329 1.745329)
      PhysicalOffsetFrame Pelvis_offset: socket_parent=/bodyset/Pelvis translation=(0 0 -0.2)
      PhysicalOffsetFrame LeftThigh_offset: socket_parent=/bodyset/LeftThigh translation=(0 0.2 0)
    PinJoint RShankToRThigh: socket_parent_frame=RightThigh_offset socket_child_frame=RightShank_offset
      Coordinate RKnee_rz: default_value=-0.5235988 range=(-1.745329 0)
      PhysicalOffsetFrame RightThigh_offset: socket_parent=/bodyset/RightThigh translation=(0 -0.2 0)
      PhysicalOffsetFrame RightShank_offset: socket_parent=/bodyset/RightShank translation=(0 0.2175 0)
    PinJoint LShankToLThigh: socket_parent_frame=LeftThigh_offset socket_child_frame=LeftShank_offset
      Coordinate LKnee_rz: default_value=-0.5235988 range=(-1.745329 0)
      PhysicalOffsetFrame LeftThigh_offset: socket_parent=/bodyset/LeftThigh translation=(0 -0.2 0)
      PhysicalOffsetFrame LeftShank_offset: socket_parent=/bodyset/LeftShank translation=(0 0.2175 0)
  ForceSet:
    HuntCrossleyForce RHipForce: transition_velocity=0.2
      ContactParametersSet contact_parameters:
        ContactParameters: geometry=(RHipContact PlatformContact) stiffness=1000000 dissipation=2 static_friction=0.8
            dynamic_friction=0.4 viscous_friction=0.4
    HuntCrossleyForce LHipForce: transition_velocity=0.2
      ContactParametersSet contact_parameters:
        ContactParameters: geometry=(LHipContact PlatformContact) stiffness=1000000 dissipation=2 static_friction=0.8
            dynamic_friction=0.4 viscous_friction=0.4
    HuntCrossleyForce RKneeForce: transition_velocity=0.2
      ContactParametersSet contact_parameters:
        ContactParameters: geometry=(RKneeContact PlatformContact) stiffness=1000000 dissipation=2 static_friction=0.8
            dynamic_friction=0.4 viscous_friction=0.4
    HuntCrossleyForce LKneeForce: transition_velocity=0.2
      ContactParametersSet contact_parameters:
        ContactParameters: geometry=(LKneeContact PlatformContact) stiffness=1000000 dissipation=2 static_friction=0.8
            dynamic_friction=0.4 viscous_friction=0.4
    HuntCrossleyForce RFootForce: transition_velocity=0.2
      ContactParametersSet contact_parameters:
        ContactParameters: geometry=(RFootContact PlatformContact) stiffness=1000000 dissipation=2 static_friction=0.8
            dynamic_friction=0.4 viscous_friction=0.4
    HuntCrossleyForce LFootForce: transition_velocity=0.2
      ContactParametersSet contact_parameters:
        ContactParameters: geometry=(LFootContact PlatformContact) stiffness=1000000 dissipation=2 static_friction=0.8
            dynamic_friction=0.4 viscous_friction=0.4
    CoordinateLimitForce RHipLimitTorque: coordinate=RHip_rz upper_stiffness=0.5 [N*m/degree] upper_limit=100 [degrees]
        lower_stiffness=0.5 [N*m/degree] lower_limit=-100 [degrees] damping=0.025 transition=5 [degrees]
    CoordinateLimitForce LHipLimitTorque: coordinate=LHip_rz upper_stiffness=0.5 upper_limit=100 lower_stiffness=0.5
        lower_limit=-100 damping=0.025 transition=5
    CoordinateLimitForce RKneeLimitTorque: coordinate=RKnee_rz upper_stiffness=0.5 upper_limit=0 lower_stiffness=0.5
        lower_limit=-140 damping=0.025 transition=5
    CoordinateLimitForce LKneeLimitTorque: coordinate=LKnee_rz upper_stiffness=0.5 upper_limit=0 lower_stiffness=0.5
        lower_limit=-140 damping=0.025 transition=5
  ContactGeometrySet:
    ContactHalfSpace PlatformContact: socket_frame=/bodyset/Platform location=(0 0.025 0) orientation=(0 0 -1.57)
    ContactSphere RHipContact: socket_frame=/bodyset/Pelvis location=(0 0 0.2) radius=0.05
    ContactSphere LHipContact: socket_frame=/bodyset/Pelvis location=(0 0 -0.2) radius=0.05
    ContactSphere RKneeContact: socket_frame=/bodyset/RightShank location=(0 0.2 0) radius=0.05
    ContactSphere LKneeContact: socket_frame=/bodyset/LeftShank location=(0 0.2 0) radius=0.05
    ContactSphere RFootContact: socket_frame=/bodyset/RightShank location=(0 -0.2175 0) radius=0.05
    ContactSphere LFootContact: socket_frame=/bodyset/LeftShank location=(0 -0.2175 0) radius=0.05
