# OpenSim document version 40000
Model DynamicWalkerModel_CustomFeet:
  gravity: 0 -9.80665 0
  ContactMesh LFootContact: socket_frame=/bodyset/LeftFoot location=(0 0 0) filename=ThinHalfCylinder100mmby50mm.obj
  ContactMesh RFootContact: socket_frame=/bodyset/RightFoot location=(0 0 0) filename=ThinHalfCylinder100mmby50mm.obj
  Ground
  BodySet:
    Body Platform: mass=1 [kg] inertia=(1 1 1 0 0 0)
      Brick Platform_geom_1: half_lengths=(10 0.01 1)
    Body Pelvis: mass=1 inertia=(1 1 1 0 0 0)
      Sphere Pelvis_geom_1: radius=0.2
    Body RightThigh: mass=1 mass_center=(0 0 0) inertia=(2 2 0.02 0 0 0)
      Ellipsoid RightThigh_geom_1: radii=(0.04 0.2 0.04)
    Body LeftThigh: mass=1 inertia=(2 2 0.02 0 0 0)
      Ellipsoid LeftThigh_geom_1: radii=(0.04 0.2 0.04)
    Body RightShank: mass=1 mass_center=(0 0 0) inertia=(2 2 0.002 0 0 0)
      Ellipsoid RightShank_geom_1: radii=(0.0435 0.2175 0.0435)
    Body LeftShank: mass=0.1 inertia=(2 2 0.002 0 0 0)
      Ellipsoid LeftShank_geom_1: radii=(0.0435 0.2175 0.0435)
    Body LeftFoot: mass=0.0001 mass_center=(0 0 0) inertia=(1 1 0.0001 0 0 0) meshes=ThinHalfCylinder100mmby50mm.obj
    Body RightFoot: mass=0.0001 mass_center=(0 0 0) inertia=(1 1 0.0001 0 0 0) meshes=ThinHalfCylinder100mmby50mm.obj
  JointSet:
    PinJoint PlatformToGround: socket_parent_frame=ground_offset socket_child_frame=Platform_offset
      Coordinate platform_rz: default_value=-0.1745329 range=(-1.745329 1.745329) locked=true
      PhysicalOffsetFrame ground_offset: socket_parent=/ground translation=(0 0 0) [meters]
      PhysicalOffsetFrame Platform_offset: socket_parent=/bodyset/Platform translation=(0 0 0)
    PlanarJoint PelvisToPlatform: socket_parent_frame=/bodyset/Platform socket_child_frame=/bodyset/Pelvis
      Coordinate Pelvis_rz: default_value=0 range=(-3.141593 3.141593)
      Coordinate Pelvis_tx: default_value=0 range=(0 10)
      Coordinate Pelvis_ty: default_value=0.835 range=(-5 5)
    PinJoint RThighToPelvis: socket_parent_frame=Pelvis_offset socket_child_frame=RightThigh_offset
      Coordinate RHip_rz: default_value=0.5235988 range=(-1.745329 1.745329)
      PhysicalOffsetFrame Pelvis_offset: socket_parent=/bodyset/Pelvis translation=(0 0 0.2)
      PhysicalOffsetFrame RightThigh_offset: socket_parent=/bodyset/RightThigh translation=(0 0.2 0)
    PinJoint LThighToPelvis: socket_parent_frame=Pelvis_offset socket_child_frame=LeftThigh_offset
      Coordinate LHip_rz: default_value=-0.1745329 range=(-1.745329 1.745329)
      PhysicalOffsetFrame Pelvis_offset: socket_parent=/bodyset/Pelvis translation=(0 0 -0.2)
      PhysicalOffsetFrame LeftThigh_offset: socket_parent=/bodyset/LeftThigh translation=(0 0.2 0)
    PinJoint RShankToRThigh: socket_parent_frame=RightThigh_offset socket_child_frame=RightShank_offset
      Coordinate RKnee_rz: default_value=-0.5235988 range=(-1.745329 0)
      PhysicalOffsetFrame RightThigh_offset: socket_parent=/bodyset/RightThigh translation=(0 -0.2 0)
      PhysicalOffsetFrame RightShank_offset: socket_parent=/bodyset/RightShank translation=(0 0.2175 0)
    PinJoint LShankToLThigh: socket_parent_frame=LeftThigh_offset socket_child_frame=LeftShank_offset
      Coordinate LKnee_rz: default_value=-0.5235988 range=(-1.745329 0)
      PhysicalOffsetFrame LeftThigh_offset: socket_parent=/bodyset/LeftThigh translation=(0 -0.2 0)
      PhysicalOffsetFrame LeftShank_offset: socket_parent=/bodyset/LeftShank translation=(0 0.2175 0)
    WeldJoint ankle_l: socket_parent_frame=LeftShank_offset socket_child_frame=LeftFoot_offset
      PhysicalOffsetFrame LeftShank_offset: socket_parent=/bodyset/LeftShank translation=(0.075 -0.2 0)
      PhysicalOffsetFrame LeftFoot_offset: socket_parent=/bodyset/LeftFoot translation=(0 0 0)
    WeldJoint ankle_r: socket_parent_frame=RightShank_offset socket_child_frame=RightFoot_offset
      PhysicalOffsetFrame RightShank_offset: socket_parent=/bodyset/RightShank translation=(0.075 -0.2 0)
      PhysicalOffsetFrame RightFoot_offset: socket_parent=/bodyset/RightFoot translation=(0 0 0)
  ForceSet:
    HuntCrossleyForce RHipForce: transition_velocity=0.2
      ContactParametersSet contact_parameters:
        ContactParameters: geometry=(RHipContact PlatformContact) stiffness=1000000 dissipation=2 static_friction=0.8
            dynamic_friction=0.4 viscous_friction=0.4
    HuntCrossleyForce LHipForce: transition_velocity=0.2
      ContactParametersSet contact_parameters:
        ContactParameters: geometry=(LHipContact PlatformContact) stiffness=1000000 dissipation=2 static_friction=0.8
            dynamic_friction=0.4 viscous_friction=0.4
    HuntCrossleyForce RKneeForce: transition_velocity=0.2
      ContactParametersSet contact_parameters:
        ContactParameters: geometry=(RKneeContact PlatformContact) stiffness=1000000 dissipation=2 static_friction=0.8
            dynamic_friction=0.4 viscous_friction=0.4
    HuntCrossleyForce LKneeForce: transition_velocity=0.2
      ContactParametersSet contact_parameters:
        ContactParameters: geometry=(LKneeContact PlatformContact) stiffness=1000000 dissipation=2 static_friction=0.8
            dynamic_friction=0.4 viscous_friction=0.4
    CoordinateLimitForce RHipLimitTorque: coordinate=RHip_rz upper_stiffness=0.5 [N*m/degree] upper_limit=100 [degrees]
        lower_stiffness=0.5 [N*m/degree] lower_limit=-100 [degrees] damping=0.025 transition=5 [degrees]
    CoordinateLimitForce LHipLimitTorque: coordinate=LHip_rz upper_stiffness=0.5 upper_limit=100 lower_stiffness=0.5
        lower_limit=-100 damping=0.025 transition=5
    CoordinateLimitForce RKneeLimitTorque: coordinate=RKnee_rz upper_stiffness=0.5 upper_limit=0 lower_stiffness=0.5
        lower_limit=-140 damping=0.025 transition=5
    CoordinateLimitForce LKneeLimitTorque: coordinate=LKnee_rz upper_stiffness=0.5 upper_limit=0 lower_stiffness=0.5
        lower_limit=-140 damping=0.025 transition=5
    HuntCrossleyForce ObstacleForces: transition_velocity=0.2
      ContactParametersSet contact_parameters:
        ContactParameters: geometry=(LFootContact RFootContact Obstacle1 Obstacle2 Obstacle3 Obstacle4 Obstacle5 Obstacle6 Obstacle7 Obstacle8 Obstacle9 Obstacle10 Obstacle11 Obstacle12 Obstacle13 Obstacle14 Obstacle15 Obstacle16 Obstacle17 Obstacle18 Obstacle19 Obstacle20 Obstacle21 Obstacle22 Obstacle23 Obstacle24 Obstacle25 Obstacle26 Obstacle27 Obstacle28 Obstacle29 Obstacle30 Obstacle31 Obstacle32 Obstacle33 Obstacle34 Obstacle35 Obstacle36 Obstacle37 Obstacle38 Obstacle39 Obstacle40)
            stiffness=1000000 dissipation=1 static_friction=0.8 dynamic_friction=0.4 viscous_friction=0.4
    ElasticFoundationForce LFootForce: transition_velocity=0.1
      ContactParametersSet contact_parameters:
        ContactParameters: geometry=(LFootContact PlatformContact) stiffness=1000000 dissipation=2 static_friction=0.8
            dynamic_friction=0.4 viscous_friction=0.4
    ElasticFoundationForce RFootForce: transition_velocity=0.1
      ContactParametersSet contact_parameters:
        ContactParameters: geometry=(RFootContact PlatformContact) stiffness=1000000 dissipation=2 static_friction=0.8
            dynamic_friction=0.4 viscous_friction=0.4
  ContactGeometrySet:
    ContactHalfSpace PlatformContact: socket_frame=/bodyset/Platform location=(0 0.025 0) orientation=(0 0 -1.57)
    ContactSphere RHipContact: socket_frame=/bodyset/Pelvis location=(0 0 0.2) radius=0.05
    ContactSphere LHipContact: socket_frame=/bodyset/Pelvis location=(0 0 -0.2) radius=0.05
    ContactSphere RKneeContact: socket_frame=/bodyset/RightShank location=(0 0.2 0) radius=0.05
    ContactSphere LKneeContact: socket_frame=/bodyset/LeftShank location=(0 0.2 0) radius=0.05
    ContactSphere Obstacle1: socket_frame=/bodyset/Platform location=(5.648841 -0.03455337 -0.4) radius=0.07444171
    ContactSphere Obstacle2: socket_frame=/bodyset/Platform location=(8.830593 -0.03692102 -0.4) radius=0.07740128
    ContactSphere Obstacle3: socket_frame=/bodyset/Platform location=(8.780489 -0.02168396 0.4) radius=0.05835495
    ContactSphere Obstacle4: socket_frame=/bodyset/Platform location=(6.665237 -0.03815732 0.4) radius=0.07894666
    ContactSphere Obstacle5: socket_frame=/bodyset/Platform location=(9.367585 -0.03797201 0.4) radius=0.07871501
    ContactSphere Obstacle6: socket_frame=/bodyset/Platform location=(9.239297 -0.01840527 0.4) radius=0.05425659
    ContactSphere Obstacle7: socket_frame=/bodyset/Platform location=(6.523896 -0.03401298 0.4) radius=0.07376622
    ContactSphere Obstacle8: socket_frame=/bodyset/Platform location=(7.993799 -0.01585708 0.4) radius=0.05107135
    ContactSphere Obstacle9: socket_frame=/bodyset/Platform location=(7.327145 -0.03128964 0.4) radius=0.07036205
    ContactSphere Obstacle10: socket_frame=/bodyset/Platform location=(8.88287 -0.02441345 -0.4) radius=0.06176681
    ContactSphere Obstacle11: socket_frame=/bodyset/Platform location=(7.091153 -0.03194511 -0.4) radius=0.07118138
    ContactSphere Obstacle12: socket_frame=/bodyset/Platform location=(3.317003 -0.01610811 0.4) radius=0.05138514
    ContactSphere Obstacle13: socket_frame=/bodyset/Platform location=(7.914651 -0.03167589 0.4) radius=0.07084486
    ContactSphere Obstacle14: socket_frame=/bodyset/Platform location=(9.285291 -0.01582671 -0.4) radius=0.05103338
    ContactSphere Obstacle15: socket_frame=/bodyset/Platform location=(8.842997 -0.0333724 -0.4) radius=0.0729655
    ContactSphere Obstacle16: socket_frame=/bodyset/Platform location=(9.153754 -0.02675435 0.4) radius=0.06469293
    ContactSphere Obstacle17: socket_frame=/bodyset/Platform location=(7.170526 -0.03202476 -0.4) radius=0.07128094
    ContactSphere Obstacle18: socket_frame=/bodyset/Platform location=(8.238521 -0.03131286 -0.4) radius=0.07039108
    ContactSphere Obstacle19: socket_frame=/bodyset/Platform location=(9.485616 -0.01785594 0.4) radius=0.05356993
    ContactSphere Obstacle20: socket_frame=/bodyset/Platform location=(8.720104 -0.02316926 -0.4) radius=0.06021157
    ContactSphere Obstacle21: socket_frame=/bodyset/Platform location=(7.212965 -0.03303041 0.4) radius=0.07253801
    ContactSphere Obstacle22: socket_frame=/bodyset/Platform location=(7.188719 -0.03177784 0.4) radius=0.0709723
    ContactSphere Obstacle23: socket_frame=/bodyset/Platform location=(6.36766 -0.02813317 -0.4) radius=0.06641647
    ContactSphere Obstacle24: socket_frame=/bodyset/Platform location=(4.56404 -0.0211802 -0.4) radius=0.05772525
    ContactSphere Obstacle25: socket_frame=/bodyset/Platform location=(9.095921 -0.03454284 0.4) radius=0.07442854
    ContactSphere Obstacle26: socket_frame=/bodyset/Platform location=(6.555235 -0.02339961 -0.4) radius=0.06049951
    ContactSphere Obstacle27: socket_frame=/bodyset/Platform location=(9.127512 -0.02978507 -0.4) radius=0.06848134
    ContactSphere Obstacle28: socket_frame=/bodyset/Platform location=(8.887673 -0.03493989 0.4) radius=0.07492486
    ContactSphere Obstacle29: socket_frame=/bodyset/Platform location=(7.810621 -0.03701265 0.4) radius=0.07751581
    ContactSphere Obstacle30: socket_frame=/bodyset/Platform location=(8.988198 -0.0330895 0.4) radius=0.07261187
    ContactSphere Obstacle31: socket_frame=/bodyset/Platform location=(7.089299 -0.0168205 0.4) radius=0.05227563
    ContactSphere Obstacle32: socket_frame=/bodyset/Platform location=(4.070468 -0.03370001 -0.4) radius=0.07337502
    ContactSphere Obstacle33: socket_frame=/bodyset/Platform location=(9.326762 -0.02865177 -0.4) radius=0.06706471
    ContactSphere Obstacle34: socket_frame=/bodyset/Platform location=(5.731174 -0.02309094 0.4) radius=0.06011368
    ContactSphere Obstacle35: socket_frame=/bodyset/Platform location=(9.289805 -0.02246916 -0.4) radius=0.05933645
    ContactSphere Obstacle36: socket_frame=/bodyset/Platform location=(8.239314 -0.02944757 0.4) radius=0.06805946
    ContactSphere Obstacle37: socket_frame=/bodyset/Platform location=(5.905036 -0.03154115 -0.4) radius=0.07067644
    ContactSphere Obstacle38: socket_frame=/bodyset/Platform location=(7.736864 -0.01701171 0.4) radius=0.05251464
    ContactSphere Obstacle39: socket_frame=/bodyset/Platform location=(7.481997 -0.01865707 0.4) radius=0.05457134
    ContactSphere Obstacle40: socket_frame=/bodyset/Platform location=(5.38211 -0.03890723 -0.4) radius=0.07988404
