# OpenSim document version 30516
Model WalkerModel:
  credits: Daniel A. Jacobs, Ajay Seth
  Ground
  BodySet:
    Body Platform: mass=1 [kg] inertia=(1 1 1 0 0 0)
      PhysicalOffsetFrame Platform_offset_frame: socket_parent_connectee_name=.. translation=(4.5 0 0) [meters]
        Brick Platform_offset_frame_geom_1: socket_frame_connectee_name=.. half_lengths=(10 0.05 1)
    Body Pelvis: mass=0.5 inertia=(0.0001 0.006666667 0.0001 0 0 0)
      Ellipsoid Pelvis_geom_1: socket_frame_connectee_name=.. radii=(0.1 0.1 0.2)
    Body LeftThigh: mass=0.05 inertia=(0.0001 0.0001 0.0006666667 0 0 0)
      Ellipsoid LeftThigh_geom_1: socket_frame_connectee_name=.. radii=(0.02 0.2 0.02)
    Body RightThigh: mass=0.05 inertia=(0.0001 0.0001 0.0006666667 0 0 0)
      Ellipsoid RightThigh_geom_1: socket_frame_connectee_name=.. radii=(0.02 0.2 0.02)
    Body LeftShank: mass=0.05 inertia=(0.0001 0.0001 0.0007884375 0 0 0)
      Ellipsoid LeftShank_geom_1: socket_frame_connectee_name=.. radii=(0.02175 0.2175 0.02175)
    Body RightShank: mass=0.05 inertia=(0.0001 0.0001 0.0007884375 0 0 0)
      Ellipsoid RightShank_geom_1: socket_frame_connectee_name=.. radii=(0.02175 0.2175 0.02175)
  JointSet:
    WeldJoint PlatformToGround: socket_parent_frame_connectee_name=ground_offset
        socket_child_frame_connectee_name=Platform_offset
      PhysicalOffsetFrame ground_offset: socket_parent_connectee_name=../../ground translation=(0 0 0)
          orientation=(0 0 -0.1745329) [radians]
      PhysicalOffsetFrame Platform_offset: socket_parent_connectee_name=../../Platform translation=(0 0 0)
    PlanarJoint PelvisToPlatform: socket_parent_frame_connectee_name=../Platform
        socket_child_frame_connectee_name=../Pelvis
      Coordinate Pelvis_rz: default_value=0 range=(-3.141593 3.141593)
      Coordinate Pelvis_tx: default_value=0 range=(-10 10)
      Coordinate Pelvis_ty: default_value=1 range=(-1 2)
    PinJoint LThighToPelvis: socket_parent_frame_connectee_name=Pelvis_offset
        socket_child_frame_connectee_name=LeftThigh_offset
      Coordinate LHip_rz: default_value=-0.1745329 range=(-1.745329 1.745329)
      PhysicalOffsetFrame Pelvis_offset: socket_parent_connectee_name=../../Pelvis translation=(0 0 -0.2)
      PhysicalOffsetFrame LeftThigh_offset: socket_parent_connectee_name=../../LeftThigh translation=(0 0.2 0)
    PinJoint RThighToPelvis: socket_parent_frame_connectee_name=Pelvis_offset
        socket_child_frame_connectee_name=RightThigh_offset
      Coordinate RHip_rz: default_value=0.5235988 range=(-1.745329 1.745329)
      PhysicalOffsetFrame Pelvis_offset: socket_parent_connectee_name=../../Pelvis translation=(0 0 0.2)
      PhysicalOffsetFrame RightThigh_offset: socket_parent_connectee_name=../../RightThigh translation=(0 0.2 0)
    PinJoint LShankToLThigh: socket_parent_frame_connectee_name=LeftThigh_offset
        socket_child_frame_connectee_name=LeftShank_offset
      Coordinate LKnee_rz: default_value=-0.5235988 range=(-1.745329 0)
      PhysicalOffsetFrame LeftThigh_offset: socket_parent_connectee_name=../../LeftThigh translation=(0 -0.2 0)
      PhysicalOffsetFrame LeftShank_offset: socket_parent_connectee_name=../../LeftShank translation=(0 0.2175 0)
    PinJoint RShankToRThigh: socket_parent_frame_connectee_name=RightThigh_offset
        socket_child_frame_connectee_name=RightShank_offset
      Coordinate RKnee_rz: default_value=-0.5235988 range=(-1.745329 0)
      PhysicalOffsetFrame RightThigh_offset: socket_parent_connectee_name=../../RightThigh translation=(0 -0.2 0)
      PhysicalOffsetFrame RightShank_offset: socket_parent_connectee_name=../../RightShank translation=(0 0.2175 0)
  ForceSet:
    HuntCrossleyForce LFootForce: transition_velocity=0.2
      ContactParametersSet contact_parameters:
        ContactParameters: geometry=(LFootContact PlatformContact) stiffness=1000000 dissipation=1 static_friction=0.8
            dynamic_friction=0.4 viscous_friction=0.4
    HuntCrossleyForce RFootForce: transition_velocity=0.2
      ContactParametersSet contact_parameters:
        ContactParameters: geometry=(RFootContact PlatformContact) stiffness=1000000 dissipation=1 static_friction=0.8
            dynamic_friction=0.4 viscous_friction=0.4
    HuntCrossleyForce LKneeForce: transition_velocity=0.2
      ContactParametersSet contact_parameters:
        ContactParameters: geometry=(LKneeContact PlatformContact) stiffness=1000000 dissipation=1 static_friction=0.8
            dynamic_friction=0.4 viscous_friction=0.4
    HuntCrossleyForce RKneeForce: transition_velocity=0.2
      ContactParametersSet contact_parameters:
        ContactParameters: geometry=(RKneeContact PlatformContact) stiffness=1000000 dissipation=1 static_friction=0.8
            dynamic_friction=0.4 viscous_friction=0.4
    HuntCrossleyForce LHipForce: transition_velocity=0.2
      ContactParametersSet contact_parameters:
        ContactParameters: geometry=(LHipContact PlatformContact) stiffness=1000000 dissipation=1 static_friction=0.8
            dynamic_friction=0.4 viscous_friction=0.4
    HuntCrossleyForce RHipForce: transition_velocity=0.2
      ContactParametersSet contact_parameters:
        ContactParameters: geometry=(RHipContact PlatformContact) stiffness=1000000 dissipation=1 static_friction=0.8
            dynamic_friction=0.4 viscous_friction=0.4
    CoordinateLimitForce LKneeLimitTorque: coordinate=LKnee_rz upper_stiffness=0.5 [N*m/degree] upper_limit=0 [degrees]
        lower_stiffness=0.5 [N*m/degree] lower_limit=-140 [degrees] damping=0.025 transition=5 [degrees]
        compute_dissipation_energy=false
    CoordinateLimitForce RKneeLimitTorque: coordinate=RKnee_rz upper_stiffness=0.5 upper_limit=0 lower_stiffness=0.5
        lower_limit=-140 damping=0.025 transition=5 compute_dissipation_energy=false
    CoordinateLimitForce LHipLimitTorque: coordinate=LHip_rz upper_stiffness=0.5 upper_limit=100 lower_stiffness=0.5
        lower_limit=-100 damping=0.025 transition=5 compute_dissipation_energy=false
    CoordinateLimitForce RHipLimitTorque: coordinate=RHip_rz upper_stiffness=0.5 upper_limit=100 lower_stiffness=0.5
        lower_limit=-100 damping=0.025 transition=5 compute_dissipation_energy=false
  ContactGeometrySet:
    ContactSphere LFootContact: socket_frame_connectee_name=../LeftShank location=(0 -0.1675 0) radius=0.05
    ContactSphere RFootContact: socket_frame_connectee_name=../RightShank location=(0 -0.1675 0) radius=0.05
    ContactSphere LKneeContact: socket_frame_connectee_name=../LeftShank location=(0 0.2175 0) radius=0.05
    ContactSphere RKneeContact: socket_frame_connectee_name=../RightShank location=(0 0.2175 0) radius=0.05
    ContactSphere LHipContact: socket_frame_connectee_name=../Pelvis location=(0 0 -0.2) radius=0.05
    ContactSphere RHipContact: socket_frame_connectee_name=../Pelvis location=(0 0 0.2) radius=0.05
    ContactHalfSpace PlatformContact: socket_frame_connectee_name=../Platform location=(0 0.025 0)
        orientation=(0 0 -1.570796)
