# OpenSim document version 30000
Model WalkerModelAddCustomFeet:
  credits: Daniel A. Jacobs, Ajay Seth
  length_units: meters
  force_units: N
  gravity: 0 -9.80665 0
  BodySet:
    Body ground: mass=0 mass_center=(0 0 0) inertia_xx=1 inertia_yy=1 inertia_zz=1
    Body Platform: mass=1 mass_center=(0 0 0) inertia_xx=1 inertia_yy=1 inertia_zz=1 meshes=box.vtp
      WeldJoint PlatformToGround: parent_body=ground location_in_parent=(0 0 0) orientation_in_parent=(0 0 -0.1745329)
          location=(0 0 0)
    Body Pelvis_massless: mass=0 mass_center=(0 0 0) inertia_xx=0 inertia_yy=0 inertia_zz=0
      SliderJoint PelvisMasslessToPlatform: parent_body=Platform location_in_parent=(0 0.025 0) location=(0 0 0)
        Coordinate Pelvis_tx: motion_type=translational default_value=0 range=(0 100)
    Body Pelvis: mass=0.5 mass_center=(0 0 0) inertia_xx=0.0001 inertia_yy=0.006666667 inertia_zz=0.0001
        meshes=sphere.vtp
      SliderJoint PelvisToPelvisMassless: parent_body=Pelvis_massless location_in_parent=(0 0 0)
          orientation_in_parent=(0 0 1.570796) location=(0 0 0) orientation=(0 0 1.570796)
        Coordinate Pelvis_ty: motion_type=translational default_value=1 range=(0 5)
    Body LeftThigh: mass=0.05 mass_center=(0 0 0) inertia_xx=0.0001 inertia_yy=0.0001 inertia_zz=0.001041667
        meshes=sphere.vtp
      PinJoint LThighToPelvis: parent_body=Pelvis location_in_parent=(0 0 -0.2) location=(0 0.25 0)
        Coordinate LHip_rz: motion_type=rotational default_value=1.047198 range=(-1.745329 1.745329)
    Body RightThigh: mass=0.05 mass_center=(0 0 0) inertia_xx=0.0001 inertia_yy=0.0001 inertia_zz=0.001041667
        meshes=sphere.vtp
      PinJoint RThighToPelvis: parent_body=Pelvis location_in_parent=(0 0 0.2) location=(0 0.25 0)
        Coordinate RHip_rz: motion_type=rotational default_value=0 range=(-1.745329 1.745329)
    Body LeftShank: mass=0.05 mass_center=(0 0 0) inertia_xx=0.0001 inertia_yy=0.0001 inertia_zz=0.001041667
        meshes=sphere.vtp
      PinJoint LShankToLThigh: parent_body=LeftThigh location_in_parent=(0 -0.25 0) location=(0 0.25 0)
        Coordinate LKnee_rz: motion_type=rotational default_value=0 range=(-2.443461 0)
    Body RightShank: mass=0.05 mass_center=(0 0 0) inertia_xx=0.0001 inertia_yy=0.0001 inertia_zz=0.001041667
        meshes=sphere.vtp
      PinJoint RShankToRThigh: parent_body=RightThigh location_in_parent=(0 -0.25 0) location=(0 0.25 0)
        Coordinate RKnee_rz: motion_type=rotational default_value=0 range=(-2.443461 0)
    Body LeftFoot: mass=0.0001 mass_center=(0 0 0) inertia_xx=1 inertia_yy=1 inertia_zz=0.0001
        meshes=ThinHalfCylinder100mmby50mm.obj
      WeldJoint LFootToLShank: parent_body=LeftShank location_in_parent=(0.075 -0.2 0) location=(0 0 0)
    Body RightFoot: mass=0.0001 mass_center=(0 0 0) inertia_xx=1 inertia_yy=1 inertia_zz=0.0001
        meshes=ThinHalfCylinder100mmby50mm.obj
      WeldJoint RFootToRShank: parent_body=RightShank location_in_parent=(0.075 -0.2 0) location=(0 0 0)
  ForceSet:
    HuntCrossleyForce LKneeForce: transition_velocity=0.2
      ContactParametersSet contact_parameters:
        ContactParameters: geometry=(LKneeContact PlatformContact) stiffness=1000000 dissipation=1 static_friction=0.8
            dynamic_friction=0.4 viscous_friction=0.4
    HuntCrossleyForce RKneeForce: transition_velocity=0.2
      ContactParametersSet contact_parameters:
        ContactParameters: geometry=(RKneeContact PlatformContact) stiffness=1000000 dissipation=1 static_friction=0.8
            dynamic_friction=0.4 viscous_friction=0.4
    HuntCrossleyForce LHipForce: transition_velocity=0.2
      ContactParametersSet contact_parameters:
        ContactParameters: geometry=(LHipContact PlatformContact) stiffness=1000000 dissipation=1 static_friction=0.8
            dynamic_friction=0.4 viscous_friction=0.4
    HuntCrossleyForce RHipForce: transition_velocity=0.2
      ContactParametersSet contact_parameters:
        ContactParameters: geometry=(RHipContact PlatformContact) stiffness=1000000 dissipation=1 static_friction=0.8
            dynamic_friction=0.4 viscous_friction=0.4
    CoordinateLimitForce LKneeLimitTorque: coordinate=LKnee_rz upper_stiffness=0.5 [N*m/degree] upper_limit=0 [degrees]
        lower_stiffness=0.5 [N*m/degree] lower_limit=-140 [degrees] damping=0.025 transition=5 [degrees]
        compute_dissipation_energy=false
    CoordinateLimitForce RKneeLimitTorque: coordinate=RKnee_rz upper_stiffness=0.5 upper_limit=0 lower_stiffness=0.5
        lower_limit=-140 damping=0.025 transition=5 compute_dissipation_energy=false
    CoordinateLimitForce LHipLimitTorque: coordinate=LHip_rz upper_stiffness=0.5 upper_limit=100 lower_stiffness=0.5
        lower_limit=-100 damping=0.025 transition=5 compute_dissipation_energy=false
    CoordinateLimitForce RHipLimitTorque: coordinate=RHip_rz upper_stiffness=0.5 upper_limit=100 lower_stiffness=0.5
        lower_limit=-100 damping=0.025 transition=5 compute_dissipation_energy=false
    ElasticFoundationForce LFootForce: transition_velocity=0.1
      ContactParametersSet contact_parameters:
        ContactParameters: geometry=(LFootContact PlatformContact) stiffness=1000000 dissipation=2 static_friction=0.8
            dynamic_friction=0.4 viscous_friction=0.4
    ElasticFoundationForce RFootForce: transition_velocity=0.1
      ContactParametersSet contact_parameters:
        ContactParameters: geometry=(RFootContact PlatformContact) stiffness=1000000 dissipation=2 static_friction=0.8
            dynamic_friction=0.4 viscous_friction=0.4
  ContactGeometrySet:
    ContactSphere LKneeContact: body_name=LeftShank location=(0 0.25 0) radius=0.05
    ContactSphere RKneeContact: body_name=RightShank location=(0 0.25 0) radius=0.05
    ContactSphere LHipContact: body_name=Pelvis location=(0 0 -0.2) radius=0.05
    ContactSphere RHipContact: body_name=Pelvis location=(0 0 0.2) radius=0.05
    ContactHalfSpace PlatformContact: body_name=Platform location=(0 0.025 0) orientation=(0 0 -1.570796)
    ContactMesh LFootContact: body_name=LeftFoot location=(0 0 0) filename=ThinHalfCylinder100mmby50mm.obj
    ContactMesh RFootContact: body_name=RightFoot location=(0 0 0) filename=ThinHalfCylinder100mmby50mm.obj
