# OpenSim document version 30000
Model WalkerModelTerrainAddCustomFeet:
  credits: Daniel A. Jacobs, Ajay Seth
  length_units: meters
  force_units: N
  gravity: 0 -9.80665 0
  BodySet:
    Body ground: mass=0 mass_center=(0 0 0) inertia_xx=1 inertia_yy=1 inertia_zz=1
    Body Platform: mass=1 mass_center=(0 0 0) inertia_xx=1 inertia_yy=1 inertia_zz=1 meshes=box.vtp
      WeldJoint PlatformToGround: parent_body=ground location_in_parent=(0 0 0) orientation_in_parent=(0 0 -0.1745329)
          location=(0 0 0)
    Body Pelvis_massless: mass=0 mass_center=(0 0 0) inertia_xx=0 inertia_yy=0 inertia_zz=0
      SliderJoint PelvisMasslessToPlatform: parent_body=Platform location_in_parent=(0 0.025 0) location=(0 0 0)
        Coordinate Pelvis_tx: motion_type=translational default_value=0 range=(0 100)
    Body Pelvis: mass=0.5 mass_center=(0 0 0) inertia_xx=0.0001 inertia_yy=0.006666667 inertia_zz=0.0001
        meshes=sphere.vtp
      SliderJoint PelvisToPelvisMassless: parent_body=Pelvis_massless location_in_parent=(0 0 0)
          orientation_in_parent=(0 0 1.570796) location=(0 0 0) orientation=(0 0 1.570796)
        Coordinate Pelvis_ty: motion_type=translational default_value=1 range=(0 5)
    Body LeftThigh: mass=0.05 mass_center=(0 0 0) inertia_xx=0.0001 inertia_yy=0.0001 inertia_zz=0.001041667
        meshes=sphere.vtp
      PinJoint LThighToPelvis: parent_body=Pelvis location_in_parent=(0 0 -0.2) location=(0 0.25 0)
        Coordinate LHip_rz: motion_type=rotational default_value=1.047198 range=(-1.745329 1.745329)
    Body RightThigh: mass=0.05 mass_center=(0 0 0) inertia_xx=0.0001 inertia_yy=0.0001 inertia_zz=0.001041667
        meshes=sphere.vtp
      PinJoint RThighToPelvis: parent_body=Pelvis location_in_parent=(0 0 0.2) location=(0 0.25 0)
        Coordinate RHip_rz: motion_type=rotational default_value=0 range=(-1.745329 1.745329)
    Body LeftShank: mass=0.05 mass_center=(0 0 0) inertia_xx=0.0001 inertia_yy=0.0001 inertia_zz=0.001041667
        meshes=sphere.vtp
      PinJoint LShankToLThigh: parent_body=LeftThigh location_in_parent=(0 -0.25 0) location=(0 0.25 0)
        Coordinate LKnee_rz: motion_type=rotational default_value=0 range=(-2.443461 0)
    Body RightShank: mass=0.05 mass_center=(0 0 0) inertia_xx=0.0001 inertia_yy=0.0001 inertia_zz=0.001041667
        meshes=sphere.vtp
      PinJoint RShankToRThigh: parent_body=RightThigh location_in_parent=(0 -0.25 0) location=(0 0.25 0)
        Coordinate RKnee_rz: motion_type=rotational default_value=0 range=(-2.443461 0)
    Body LeftFoot: mass=0.0001 mass_center=(0 0 0) inertia_xx=1 inertia_yy=1 inertia_zz=0.0001
        meshes=ThinHalfCylinder100mmby50mm.obj
      WeldJoint LFootToLShank: parent_body=LeftShank location_in_parent=(0.075 -0.2 0) location=(0 0 0)
    Body RightFoot: mass=0.0001 mass_center=(0 0 0) inertia_xx=1 inertia_yy=1 inertia_zz=0.0001
        meshes=ThinHalfCylinder100mmby50mm.obj
      WeldJoint RFootToRShank: parent_body=RightShank location_in_parent=(0.075 -0.2 0) location=(0 0 0)
  ForceSet:
    HuntCrossleyForce LKneeForce: transition_velocity=0.2
      ContactParametersSet contact_parameters:
        ContactParameters: geometry=(LKneeContact PlatformContact) stiffness=1000000 dissipation=1 static_friction=0.8
            dynamic_friction=0.4 viscous_friction=0.4
    HuntCrossleyForce RKneeForce: transition_velocity=0.2
      ContactParametersSet contact_parameters:
        ContactParameters: geometry=(RKneeContact PlatformContact) stiffness=1000000 dissipation=1 static_friction=0.8
            dynamic_friction=0.4 viscous_friction=0.4
    HuntCrossleyForce LHipForce: transition_velocity=0.2
      ContactParametersSet contact_parameters:
        ContactParameters: geometry=(LHipContact PlatformContact) stiffness=1000000 dissipation=1 static_friction=0.8
            dynamic_friction=0.4 viscous_friction=0.4
    HuntCrossleyForce RHipForce: transition_velocity=0.2
      ContactParametersSet contact_parameters:
        ContactParameters: geometry=(RHipContact PlatformContact) stiffness=1000000 dissipation=1 static_friction=0.8
            dynamic_friction=0.4 viscous_friction=0.4
    CoordinateLimitForce LKneeLimitTorque: coordinate=LKnee_rz upper_stiffness=0.5 [N*m/degree] upper_limit=0 [degrees]
        lower_stiffness=0.5 [N*m/degree] lower_limit=-140 [degrees] damping=0.025 transition=5 [degrees]
        compute_dissipation_energy=false
    CoordinateLimitForce RKneeLimitTorque: coordinate=RKnee_rz upper_stiffness=0.5 upper_limit=0 lower_stiffness=0.5
        lower_limit=-140 damping=0.025 transition=5 compute_dissipation_energy=false
    CoordinateLimitForce LHipLimitTorque: coordinate=LHip_rz upper_stiffness=0.5 upper_limit=100 lower_stiffness=0.5
        lower_limit=-100 damping=0.025 transition=5 compute_dissipation_energy=false
    CoordinateLimitForce RHipLimitTorque: coordinate=RHip_rz upper_stiffness=0.5 upper_limit=100 lower_stiffness=0.5
        lower_limit=-100 damping=0.025 transition=5 compute_dissipation_energy=false
    HuntCrossleyForce ObstacleForces: transition_velocity=0.2
      ContactParametersSet contact_parameters:
        ContactParameters: geometry=(LFootContact RFootContact Obstacle1 Obstacle2 Obstacle3 Obstacle4 Obstacle5 Obstacle6 Obstacle7 Obstacle8 Obstacle9 Obstacle10 Obstacle11 Obstacle12 Obstacle13 Obstacle14 Obstacle15 Obstacle16 Obstacle17 Obstacle18 Obstacle19 Obstacle20 Obstacle21 Obstacle22 Obstacle23 Obstacle24 Obstacle25 Obstacle26 Obstacle27 Obstacle28 Obstacle29 Obstacle30 Obstacle31 Obstacle32 Obstacle33 Obstacle34 Obstacle35 Obstacle36 Obstacle37 Obstacle38 Obstacle39 Obstacle40)
            stiffness=1000000 dissipation=1 static_friction=0.8 dynamic_friction=0.4 viscous_friction=0.4
    ElasticFoundationForce LFootForce: transition_velocity=0.1
      ContactParametersSet contact_parameters:
        ContactParameters: geometry=(LFootContact PlatformContact) stiffness=1000000 dissipation=2 static_friction=0.8
            dynamic_friction=0.4 viscous_friction=0.4
    ElasticFoundationForce RFootForce: transition_velocity=0.1
      ContactParametersSet contact_parameters:
        ContactParameters: geometry=(RFootContact PlatformContact) stiffness=1000000 dissipation=2 static_friction=0.8
            dynamic_friction=0.4 viscous_friction=0.4
  ContactGeometrySet:
    ContactSphere LKneeContact: body_name=LeftShank location=(0 0.25 0) radius=0.05
    ContactSphere RKneeContact: body_name=RightShank location=(0 0.25 0) radius=0.05
    ContactSphere LHipContact: body_name=Pelvis location=(0 0 -0.2) radius=0.05
    ContactSphere RHipContact: body_name=Pelvis location=(0 0 0.2) radius=0.05
    ContactHalfSpace PlatformContact: body_name=Platform location=(0 0.025 0) orientation=(0 0 -1.570796)
    ContactSphere Obstacle1: body_name=Platform location=(5.648841 -0.03455337 -0.2) radius=0.07444171
    ContactSphere Obstacle2: body_name=Platform location=(8.830593 -0.03692102 -0.2) radius=0.07740128
    ContactSphere Obstacle3: body_name=Platform location=(8.780489 -0.02168396 0.2) radius=0.05835495
    ContactSphere Obstacle4: body_name=Platform location=(6.665237 -0.03815732 0.2) radius=0.07894666
    ContactSphere Obstacle5: body_name=Platform location=(9.367585 -0.03797201 0.2) radius=0.07871501
    ContactSphere Obstacle6: body_name=Platform location=(9.239297 -0.01840527 0.2) radius=0.05425659
    ContactSphere Obstacle7: body_name=Platform location=(6.523896 -0.03401298 0.2) radius=0.07376622
    ContactSphere Obstacle8: body_name=Platform location=(7.993799 -0.01585708 0.2) radius=0.05107135
    ContactSphere Obstacle9: body_name=Platform location=(7.327145 -0.03128964 0.2) radius=0.07036205
    ContactSphere Obstacle10: body_name=Platform location=(8.88287 -0.02441345 -0.2) radius=0.06176681
    ContactSphere Obstacle11: body_name=Platform location=(7.091153 -0.03194511 -0.2) radius=0.07118138
    ContactSphere Obstacle12: body_name=Platform location=(3.317003 -0.01610811 0.2) radius=0.05138514
    ContactSphere Obstacle13: body_name=Platform location=(7.914651 -0.03167589 0.2) radius=0.07084486
    ContactSphere Obstacle14: body_name=Platform location=(9.285291 -0.01582671 -0.2) radius=0.05103338
    ContactSphere Obstacle15: body_name=Platform location=(8.842997 -0.0333724 -0.2) radius=0.0729655
    ContactSphere Obstacle16: body_name=Platform location=(9.153754 -0.02675435 0.2) radius=0.06469293
    ContactSphere Obstacle17: body_name=Platform location=(7.170526 -0.03202476 -0.2) radius=0.07128094
    ContactSphere Obstacle18: body_name=Platform location=(8.238521 -0.03131286 -0.2) radius=0.07039108
    ContactSphere Obstacle19: body_name=Platform location=(9.485616 -0.01785594 0.2) radius=0.05356993
    ContactSphere Obstacle20: body_name=Platform location=(8.720104 -0.02316926 -0.2) radius=0.06021157
    ContactSphere Obstacle21: body_name=Platform location=(7.212965 -0.03303041 0.2) radius=0.07253801
    ContactSphere Obstacle22: body_name=Platform location=(7.188719 -0.03177784 0.2) radius=0.0709723
    ContactSphere Obstacle23: body_name=Platform location=(6.36766 -0.02813317 -0.2) radius=0.06641647
    ContactSphere Obstacle24: body_name=Platform location=(4.56404 -0.0211802 -0.2) radius=0.05772525
    ContactSphere Obstacle25: body_name=Platform location=(9.095921 -0.03454284 0.2) radius=0.07442854
    ContactSphere Obstacle26: body_name=Platform location=(6.555235 -0.02339961 -0.2) radius=0.06049951
    ContactSphere Obstacle27: body_name=Platform location=(9.127512 -0.02978507 -0.2) radius=0.06848134
    ContactSphere Obstacle28: body_name=Platform location=(8.887673 -0.03493989 0.2) radius=0.07492486
    ContactSphere Obstacle29: body_name=Platform location=(7.810621 -0.03701265 0.2) radius=0.07751581
    ContactSphere Obstacle30: body_name=Platform location=(8.988198 -0.0330895 0.2) radius=0.07261187
    ContactSphere Obstacle31: body_name=Platform location=(7.089299 -0.0168205 0.2) radius=0.05227563
    ContactSphere Obstacle32: body_name=Platform location=(4.070468 -0.03370001 -0.2) radius=0.07337502
    ContactSphere Obstacle33: body_name=Platform location=(9.326762 -0.02865177 -0.2) radius=0.06706471
    ContactSphere Obstacle34: body_name=Platform location=(5.731174 -0.02309094 0.2) radius=0.06011368
    ContactSphere Obstacle35: body_name=Platform location=(9.289805 -0.02246916 -0.2) radius=0.05933645
    ContactSphere Obstacle36: body_name=Platform location=(8.239314 -0.02944757 0.2) radius=0.06805946
    ContactSphere Obstacle37: body_name=Platform location=(5.905036 -0.03154115 -0.2) radius=0.07067644
    ContactSphere Obstacle38: body_name=Platform location=(7.736864 -0.01701171 0.2) radius=0.05251464
    ContactSphere Obstacle39: body_name=Platform location=(7.481997 -0.01865707 0.2) radius=0.05457134
    ContactSphere Obstacle40: body_name=Platform location=(5.38211 -0.03890723 -0.2) radius=0.07988404
    ContactMesh LFootContact: body_name=LeftFoot location=(0 0 0) filename=ThinHalfCylinder100mmby50mm.obj
    ContactMesh RFootContact: body_name=RightFoot location=(0 0 0) filename=ThinHalfCylinder100mmby50mm.obj
