# OpenSim document version 30507
Model WalkerModel_AddPathSpring:
  gravity: 0 -9.80665 0
  credits: Daniel A. Jacobs, Ajay Seth
  length_units: meters
  force_units: N
  Ground
  BodySet:
    Body Platform: mass=1 [kg] mass_center=(0 0 0) inertia=(1 1 1 0 0 0)
    Body Pelvis: mass=0.5 mass_center=(0 0 0) inertia=(0.0001 0.00666667 0.0001 0 0 0) meshes=sphere.vtp
    Body LeftThigh: mass=0.05 mass_center=(0 0 0) inertia=(0.0001 0.0001 0.00104167 0 0 0) meshes=sphere.vtp
    Body RightThigh: mass=0.05 mass_center=(0 0 0) inertia=(0.0001 0.0001 0.00104167 0 0 0) meshes=sphere.vtp
    Body LeftShank: mass=0.05 mass_center=(0 0 0) inertia=(0.0001 0.0001 0.00104167 0 0 0) meshes=sphere.vtp
    Body RightShank: mass=0.05 mass_center=(0 0 0) inertia=(0.0001 0.0001 0.00104167 0 0 0) meshes=sphere.vtp
  FrameSet: meshes=box.vtp
  JointSet:
    WeldJoint PlatformToGround:
      connectors: parent_frame=ground_offset child_frame=Platform
      PhysicalOffsetFrame ground_offset: translation=(0 0 0) orientation=(0 0 -0.174533)
        connectors: parent=ground
    PlanarJoint planarjoint_:
      connectors: parent_frame=Platform_offset child_frame=Pelvis
      Coordinate Pelvis_rot: default_value=0 range=(-10 10) clamped=true locked=true
      Coordinate Pelvis_tx: default_value=0 range=(0 100) clamped=false
      Coordinate Pelvis_ty: default_value=1 range=(0 5) clamped=false
      PhysicalOffsetFrame Platform_offset: translation=(0 0.025 0)
        connectors: parent=Platform
    PinJoint LThighToPelvis:
      connectors: parent_frame=Pelvis_offset child_frame=LeftThigh_offset
      Coordinate LHip_rz: default_value=1.047198 range=(-1.745329 1.745329)
      PhysicalOffsetFrame Pelvis_offset: translation=(0 0 -0.2)
        connectors: parent=Pelvis
      PhysicalOffsetFrame LeftThigh_offset: translation=(0 0.25 0)
        connectors: parent=LeftThigh
    PinJoint RThighToPelvis:
      connectors: parent_frame=Pelvis_offset child_frame=RightThigh_offset
      Coordinate RHip_rz: default_value=0 range=(-1.745329 1.745329)
      PhysicalOffsetFrame Pelvis_offset: translation=(0 0 0.2)
        connectors: parent=Pelvis
      PhysicalOffsetFrame RightThigh_offset: translation=(0 0.25 0)
        connectors: parent=RightThigh
    PinJoint LShankToLThigh:
      connectors: parent_frame=LeftThigh_offset child_frame=LeftShank_offset
      Coordinate LKnee_rz: default_value=0 range=(-2.443461 0)
      PhysicalOffsetFrame LeftThigh_offset: translation=(0 -0.25 0)
        connectors: parent=LeftThigh
      PhysicalOffsetFrame LeftShank_offset: translation=(0 0.25 0)
        connectors: parent=LeftShank
    PinJoint RShankToRThigh:
      connectors: parent_frame=RightThigh_offset child_frame=RightShank_offset
      Coordinate RKnee_rz: default_value=0 range=(-2.443461 0)
      PhysicalOffsetFrame RightThigh_offset: translation=(0 -0.25 0)
        connectors: parent=RightThigh
      PhysicalOffsetFrame RightShank_offset: translation=(0 0.25 0)
        connectors: parent=RightShank
  ForceSet:
    HuntCrossleyForce LFootForce: transition_velocity=0.2
      ContactParametersSet contact_parameters:
        ContactParameters: geometry=(LFootContact PlatformContact) stiffness=1000000 dissipation=1 static_friction=0.8
            dynamic_friction=0.4 viscous_friction=0.4
    HuntCrossleyForce RFootForce: transition_velocity=0.2
      ContactParametersSet contact_parameters:
        ContactParameters: geometry=(RFootContact PlatformContact) stiffness=1000000 dissipation=1 static_friction=0.8
            dynamic_friction=0.4 viscous_friction=0.4
    HuntCrossleyForce LKneeForce: transition_velocity=0.2
      ContactParametersSet contact_parameters:
        ContactParameters: geometry=(LKneeContact PlatformContact) stiffness=1000000 dissipation=1 static_friction=0.8
            dynamic_friction=0.4 viscous_friction=0.4
    HuntCrossleyForce RKneeForce: transition_velocity=0.2
      ContactParametersSet contact_parameters:
        ContactParameters: geometry=(RKneeContact PlatformContact) stiffness=1000000 dissipation=1 static_friction=0.8
            dynamic_friction=0.4 viscous_friction=0.4
    HuntCrossleyForce LHipForce: transition_velocity=0.2
      ContactParametersSet contact_parameters:
        ContactParameters: geometry=(LHipContact PlatformContact) stiffness=1000000 dissipation=1 static_friction=0.8
            dynamic_friction=0.4 viscous_friction=0.4
    HuntCrossleyForce RHipForce: transition_velocity=0.2
      ContactParametersSet contact_parameters:
        ContactParameters: geometry=(RHipContact PlatformContact) stiffness=1000000 dissipation=1 static_friction=0.8
            dynamic_friction=0.4 viscous_friction=0.4
    CoordinateLimitForce LKneeLimitTorque: coordinate=LKnee_rz upper_stiffness=0.5 [N*m/degree] upper_limit=0 [degrees]
        lower_stiffness=0.5 [N*m/degree] lower_limit=-140 [degrees] damping=0.025 transition=5 [degrees]
        compute_dissipation_energy=false
    CoordinateLimitForce RKneeLimitTorque: coordinate=RKnee_rz upper_stiffness=0.5 upper_limit=0 lower_stiffness=0.5
        lower_limit=-140 damping=0.025 transition=5 compute_dissipation_energy=false
    CoordinateLimitForce LHipLimitTorque: coordinate=LHip_rz upper_stiffness=0.5 upper_limit=100 lower_stiffness=0.5
        lower_limit=-100 damping=0.025 transition=5 compute_dissipation_energy=false
    CoordinateLimitForce RHipLimitTorque: coordinate=RHip_rz upper_stiffness=0.5 upper_limit=100 lower_stiffness=0.5
        lower_limit=-100 damping=0.025 transition=5 compute_dissipation_energy=false
    PathSpring path_spring_r: resting_length=1 [m] stiffness=100 [N/m] dissipation=0.01 [s/m]
      PathPoint right_shank: (0 0 0)
        connectors: parent_frame=WalkerModel_AddPathSpring/RightShank
      PathPoint right_thigh: (0 0 0)
        connectors: parent_frame=WalkerModel_AddPathSpring/RightThigh
    PathSpring path_spring_l: resting_length=1 stiffness=1000 dissipation=0.01
      PathPoint left_shank: (0 0 0)
        connectors: parent_frame=WalkerModel_AddPathSpring/LeftShank
      PathPoint left_thigh: (0 0 0)
        connectors: parent_frame=WalkerModel_AddPathSpring/LeftThigh
  ContactGeometrySet:
    ContactSphere LFootContact: location=(0 -0.2 0) radius=0.05
      connectors: frame=LeftShank
    ContactSphere RFootContact: location=(0 -0.2 0) radius=0.05
      connectors: frame=RightShank
    ContactSphere LKneeContact: location=(0 0.25 0) radius=0.05
      connectors: frame=LeftShank
    ContactSphere RKneeContact: location=(0 0.25 0) radius=0.05
      connectors: frame=RightShank
    ContactSphere LHipContact: location=(0 0 -0.2) radius=0.05
      connectors: frame=Pelvis
    ContactSphere RHipContact: location=(0 0 0.2) radius=0.05
      connectors: frame=Pelvis
    ContactHalfSpace PlatformContact: location=(0 0.025 0) orientation=(0 0 -1.570796)
      connectors: frame=Platform
