# OpenSim document version 30512
Model WalkerModelTerrainAddSpringGeneralizedForce:
  gravity: 0 -9.80665 0
  credits: Daniel A. Jacobs, Ajay Seth
  length_units: meters
  force_units: N
  Ground
  BodySet:
    Body Platform: mass=1 [kg] mass_center=(0 0 0) inertia=(1 1 1 0 0 0) meshes=box.vtp
    Body Pelvis_massless: mass=0 mass_center=(0 0 0) inertia=(0 0 0 0 0 0)
    Body Pelvis: mass=0.5 mass_center=(0 0 0) inertia=(0.0001 0.00666667 0.0001 0 0 0) meshes=sphere.vtp
    Body LeftThigh: mass=0.05 mass_center=(0 0 0) inertia=(0.0001 0.0001 0.00104167 0 0 0) meshes=sphere.vtp
    Body RightThigh: mass=0.05 mass_center=(0 0 0) inertia=(0.0001 0.0001 0.00104167 0 0 0) meshes=sphere.vtp
    Body LeftShank: mass=0.05 mass_center=(0 0 0) inertia=(0.0001 0.0001 0.00104167 0 0 0) meshes=sphere.vtp
    Body RightShank: mass=0.05 mass_center=(0 0 0) inertia=(0.0001 0.0001 0.00104167 0 0 0) meshes=sphere.vtp
  JointSet:
    WeldJoint PlatformToGround: socket_parent_frame_connectee_name=ground_offset
        socket_child_frame_connectee_name=Platform
      PhysicalOffsetFrame ground_offset: socket_parent_connectee_name=ground translation=(0 0 0)
          orientation=(0 0 -0.174533)
    SliderJoint PelvisMasslessToPlatform: socket_parent_frame_connectee_name=Platform_offset
        socket_child_frame_connectee_name=Pelvis_massless
      Coordinate Pelvis_tx: default_value=0 range=(0 100)
      PhysicalOffsetFrame Platform_offset: socket_parent_connectee_name=Platform translation=(0 0.025 0)
    SliderJoint PelvisToPelvisMassless: socket_parent_frame_connectee_name=Pelvis_massless_offset
        socket_child_frame_connectee_name=Pelvis_offset
      Coordinate Pelvis_ty: default_value=1 range=(0 5)
      PhysicalOffsetFrame Pelvis_massless_offset: socket_parent_connectee_name=Pelvis_massless translation=(0 0 0)
          orientation=(0 0 1.5708)
      PhysicalOffsetFrame Pelvis_offset: socket_parent_connectee_name=Pelvis translation=(0 0 0)
          orientation=(0 0 1.5708)
    PinJoint LThighToPelvis: socket_parent_frame_connectee_name=Pelvis_offset
        socket_child_frame_connectee_name=LeftThigh_offset
      Coordinate LHip_rz: default_value=1.047198 range=(-1.745329 1.745329)
      PhysicalOffsetFrame Pelvis_offset: socket_parent_connectee_name=Pelvis translation=(0 0 -0.2)
      PhysicalOffsetFrame LeftThigh_offset: socket_parent_connectee_name=LeftThigh translation=(0 0.25 0)
    PinJoint RThighToPelvis: socket_parent_frame_connectee_name=Pelvis_offset
        socket_child_frame_connectee_name=RightThigh_offset
      Coordinate RHip_rz: default_value=0 range=(-1.745329 1.745329)
      PhysicalOffsetFrame Pelvis_offset: socket_parent_connectee_name=Pelvis translation=(0 0 0.2)
      PhysicalOffsetFrame RightThigh_offset: socket_parent_connectee_name=RightThigh translation=(0 0.25 0)
    PinJoint LShankToLThigh: socket_parent_frame_connectee_name=LeftThigh_offset
        socket_child_frame_connectee_name=LeftShank_offset
      Coordinate LKnee_rz: default_value=0 range=(-2.443461 0)
      PhysicalOffsetFrame LeftThigh_offset: socket_parent_connectee_name=LeftThigh translation=(0 -0.25 0)
      PhysicalOffsetFrame LeftShank_offset: socket_parent_connectee_name=LeftShank translation=(0 0.25 0)
    PinJoint RShankToRThigh: socket_parent_frame_connectee_name=RightThigh_offset
        socket_child_frame_connectee_name=RightShank_offset
      Coordinate RKnee_rz: default_value=0 range=(-2.443461 0)
      PhysicalOffsetFrame RightThigh_offset: socket_parent_connectee_name=RightThigh translation=(0 -0.25 0)
      PhysicalOffsetFrame RightShank_offset: socket_parent_connectee_name=RightShank translation=(0 0.25 0)
  ForceSet:
    HuntCrossleyForce LFootForce: transition_velocity=0.2
      ContactParametersSet contact_parameters:
        ContactParameters: geometry=(LFootContact PlatformContact) stiffness=1000000 dissipation=1 static_friction=0.8
            dynamic_friction=0.4 viscous_friction=0.4
    HuntCrossleyForce RFootForce: transition_velocity=0.2
      ContactParametersSet contact_parameters:
        ContactParameters: geometry=(RFootContact PlatformContact) stiffness=1000000 dissipation=1 static_friction=0.8
            dynamic_friction=0.4 viscous_friction=0.4
    HuntCrossleyForce LKneeForce: transition_velocity=0.2
      ContactParametersSet contact_parameters:
        ContactParameters: geometry=(LKneeContact PlatformContact) stiffness=1000000 dissipation=1 static_friction=0.8
            dynamic_friction=0.4 viscous_friction=0.4
    HuntCrossleyForce RKneeForce: transition_velocity=0.2
      ContactParametersSet contact_parameters:
        ContactParameters: geometry=(RKneeContact PlatformContact) stiffness=1000000 dissipation=1 static_friction=0.8
            dynamic_friction=0.4 viscous_friction=0.4
    HuntCrossleyForce LHipForce: transition_velocity=0.2
      ContactParametersSet contact_parameters:
        ContactParameters: geometry=(LHipContact PlatformContact) stiffness=1000000 dissipation=1 static_friction=0.8
            dynamic_friction=0.4 viscous_friction=0.4
    HuntCrossleyForce RHipForce: transition_velocity=0.2
      ContactParametersSet contact_parameters:
        ContactParameters: geometry=(RHipContact PlatformContact) stiffness=1000000 dissipation=1 static_friction=0.8
            dynamic_friction=0.4 viscous_friction=0.4
    CoordinateLimitForce LKneeLimitTorque: coordinate=LKnee_rz upper_stiffness=0.5 [N*m/degree] upper_limit=0 [degrees]
        lower_stiffness=0.5 [N*m/degree] lower_limit=-140 [degrees] damping=0.025 transition=5 [degrees]
        compute_dissipation_energy=false
    CoordinateLimitForce RKneeLimitTorque: coordinate=RKnee_rz upper_stiffness=0.5 upper_limit=0 lower_stiffness=0.5
        lower_limit=-140 damping=0.025 transition=5 compute_dissipation_energy=false
    CoordinateLimitForce LHipLimitTorque: coordinate=LHip_rz upper_stiffness=0.5 upper_limit=100 lower_stiffness=0.5
        lower_limit=-100 damping=0.025 transition=5 compute_dissipation_energy=false
    CoordinateLimitForce RHipLimitTorque: coordinate=RHip_rz upper_stiffness=0.5 upper_limit=100 lower_stiffness=0.5
        lower_limit=-100 damping=0.025 transition=5 compute_dissipation_energy=false
    HuntCrossleyForce ObstacleForces: transition_velocity=0.2
      ContactParametersSet contact_parameters:
        ContactParameters: geometry=(LFootContact RFootContact Obstacle1 Obstacle2 Obstacle3 Obstacle4 Obstacle5 Obstacle6 Obstacle7 Obstacle8 Obstacle9 Obstacle10 Obstacle11 Obstacle12 Obstacle13 Obstacle14 Obstacle15 Obstacle16 Obstacle17 Obstacle18 Obstacle19 Obstacle20 Obstacle21 Obstacle22 Obstacle23 Obstacle24 Obstacle25 Obstacle26 Obstacle27 Obstacle28 Obstacle29 Obstacle30 Obstacle31 Obstacle32 Obstacle33 Obstacle34 Obstacle35 Obstacle36 Obstacle37 Obstacle38 Obstacle39 Obstacle40)
            stiffness=1000000 dissipation=1 static_friction=0.8 dynamic_friction=0.4 viscous_friction=0.4
    SpringGeneralizedForce spring_right_hip: coordinate=RHip_rz stiffness=10 rest_length=0.01 viscosity=0.01
    SpringGeneralizedForce spring_left_hip: coordinate=LHip_rz stiffness=10 rest_length=0.01 viscosity=0.01
  ContactGeometrySet:
    ContactSphere [values shared by the 46 below unless stated]: socket_frame_connectee_name=Platform
    ContactSphere LFootContact: socket_frame_connectee_name=LeftShank location=(0 -0.2 0) radius=0.05
    ContactSphere RFootContact: socket_frame_connectee_name=RightShank location=(0 -0.2 0) radius=0.05
    ContactSphere LKneeContact: socket_frame_connectee_name=LeftShank location=(0 0.25 0) radius=0.05
    ContactSphere RKneeContact: socket_frame_connectee_name=RightShank location=(0 0.25 0) radius=0.05
    ContactSphere LHipContact: socket_frame_connectee_name=Pelvis location=(0 0 -0.2) radius=0.05
    ContactSphere RHipContact: socket_frame_connectee_name=Pelvis location=(0 0 0.2) radius=0.05
    ContactHalfSpace PlatformContact: socket_frame_connectee_name=Platform location=(0 0.025 0)
        orientation=(0 0 -1.570796)
    ContactSphere Obstacle1: location=(5.648841 -0.03455337 -0.2) radius=0.07444171
    ContactSphere Obstacle2: location=(8.830593 -0.03692102 -0.2) radius=0.07740128
    ContactSphere Obstacle3: location=(8.780489 -0.02168396 0.2) radius=0.05835495
    ContactSphere Obstacle4: location=(6.665237 -0.03815732 0.2) radius=0.07894666
    ContactSphere Obstacle5: location=(9.367585 -0.03797201 0.2) radius=0.07871501
    ContactSphere Obstacle6: location=(9.239297 -0.01840527 0.2) radius=0.05425659
    ContactSphere Obstacle7: location=(6.523896 -0.03401298 0.2) radius=0.07376622
    ContactSphere Obstacle8: location=(7.993799 -0.01585708 0.2) radius=0.05107135
    ContactSphere Obstacle9: location=(7.327145 -0.03128964 0.2) radius=0.07036205
    ContactSphere Obstacle10: location=(8.88287 -0.02441345 -0.2) radius=0.06176681
    ContactSphere Obstacle11: location=(7.091153 -0.03194511 -0.2) radius=0.07118138
    ContactSphere Obstacle12: location=(3.317003 -0.01610811 0.2) radius=0.05138514
    ContactSphere Obstacle13: location=(7.914651 -0.03167589 0.2) radius=0.07084486
    ContactSphere Obstacle14: location=(9.285291 -0.01582671 -0.2) radius=0.05103338
    ContactSphere Obstacle15: location=(8.842997 -0.0333724 -0.2) radius=0.0729655
    ContactSphere Obstacle16: location=(9.153754 -0.02675435 0.2) radius=0.06469293
    ContactSphere Obstacle17: location=(7.170526 -0.03202476 -0.2) radius=0.07128094
    ContactSphere Obstacle18: location=(8.238521 -0.03131286 -0.2) radius=0.07039108
    ContactSphere Obstacle19: location=(9.485616 -0.01785594 0.2) radius=0.05356993
    ContactSphere Obstacle20: location=(8.720104 -0.02316926 -0.2) radius=0.06021157
    ContactSphere Obstacle21: location=(7.212965 -0.03303041 0.2) radius=0.07253801
    ContactSphere Obstacle22: location=(7.188719 -0.03177784 0.2) radius=0.0709723
    ContactSphere Obstacle23: location=(6.36766 -0.02813317 -0.2) radius=0.06641647
    ContactSphere Obstacle24: location=(4.56404 -0.0211802 -0.2) radius=0.05772525
    ContactSphere Obstacle25: location=(9.095921 -0.03454284 0.2) radius=0.07442854
    ContactSphere Obstacle26: location=(6.555235 -0.02339961 -0.2) radius=0.06049951
    ContactSphere Obstacle27: location=(9.127512 -0.02978507 -0.2) radius=0.06848134
    ContactSphere Obstacle28: location=(8.887673 -0.03493989 0.2) radius=0.07492486
    ContactSphere Obstacle29: location=(7.810621 -0.03701265 0.2) radius=0.07751581
    ContactSphere Obstacle30: location=(8.988198 -0.0330895 0.2) radius=0.07261187
    ContactSphere Obstacle31: location=(7.089299 -0.0168205 0.2) radius=0.05227563
    ContactSphere Obstacle32: location=(4.070468 -0.03370001 -0.2) radius=0.07337502
    ContactSphere Obstacle33: location=(9.326762 -0.02865177 -0.2) radius=0.06706471
    ContactSphere Obstacle34: location=(5.731174 -0.02309094 0.2) radius=0.06011368
    ContactSphere Obstacle35: location=(9.289805 -0.02246916 -0.2) radius=0.05933645
    ContactSphere Obstacle36: location=(8.239314 -0.02944757 0.2) radius=0.06805946
    ContactSphere Obstacle37: location=(5.905036 -0.03154115 -0.2) radius=0.07067644
    ContactSphere Obstacle38: location=(7.736864 -0.01701171 0.2) radius=0.05251464
    ContactSphere Obstacle39: location=(7.481997 -0.01865707 0.2) radius=0.05457134
    ContactSphere Obstacle40: location=(5.38211 -0.03890723 -0.2) radius=0.07988404
