# OpenSim document version 30512
Model WalkerModelTerrainAddMillardMuscle:
  gravity: 0 -9.80665 0
  credits: Daniel A. Jacobs, Ajay Seth
  length_units: meters
  force_units: N
  meshes: box.vtp
  Ground
  BodySet:
    Body Platform: mass=1 [kg] mass_center=(0 0 0) inertia=(1 1 1 0 0 0)
    Body Pelvis: mass=0.5 mass_center=(0 0 0) inertia=(0.0001 0.00666667 0.0001 0 0 0) meshes=sphere.vtp
    Body LeftThigh: mass=0.05 mass_center=(0 0 0) inertia=(0.0001 0.0001 0.00104167 0 0 0) meshes=sphere.vtp
    Body RightThigh: mass=0.05 mass_center=(0 0 0) inertia=(0.0001 0.0001 0.00104167 0 0 0) meshes=sphere.vtp
    Body LeftShank: mass=0.05 mass_center=(0 0 0) inertia=(0.0001 0.0001 0.00104167 0 0 0) meshes=sphere.vtp
    Body RightShank: mass=0.05 mass_center=(0 0 0) inertia=(0.0001 0.0001 0.00104167 0 0 0) meshes=sphere.vtp
  JointSet:
    WeldJoint PlatformToGround: socket_parent_frame_connectee_name=ground_offset
        socket_child_frame_connectee_name=Platform
      PhysicalOffsetFrame ground_offset: socket_parent_connectee_name=ground translation=(0 0 0)
          orientation=(0 0 -0.174533)
    PlanarJoint planarjoint_: socket_parent_frame_connectee_name=Platform_offset
        socket_child_frame_connectee_name=Pelvis
      Coordinate Pelvis_rot: default_value=0 range=(-10 10) clamped=true locked=true
      Coordinate Pelvis_tx: default_value=0 range=(0 100) clamped=false
      Coordinate Pelvis_ty: default_value=1 range=(0 5) clamped=false
      PhysicalOffsetFrame Platform_offset: socket_parent_connectee_name=Platform translation=(0 0.025 0)
    PinJoint LThighToPelvis: socket_parent_frame_connectee_name=Pelvis_offset
        socket_child_frame_connectee_name=LeftThigh_offset
      Coordinate LHip_rz: default_value=1.047198 range=(-1.745329 1.745329)
      PhysicalOffsetFrame Pelvis_offset: socket_parent_connectee_name=Pelvis translation=(0 0 -0.2)
      PhysicalOffsetFrame LeftThigh_offset: socket_parent_connectee_name=LeftThigh translation=(0 0.25 0)
    PinJoint RThighToPelvis: socket_parent_frame_connectee_name=Pelvis_offset
        socket_child_frame_connectee_name=RightThigh_offset
      Coordinate RHip_rz: default_value=0 range=(-1.745329 1.745329)
      PhysicalOffsetFrame Pelvis_offset: socket_parent_connectee_name=Pelvis translation=(0 0 0.2)
      PhysicalOffsetFrame RightThigh_offset: socket_parent_connectee_name=RightThigh translation=(0 0.25 0)
    PinJoint LShankToLThigh: socket_parent_frame_connectee_name=LeftThigh_offset
        socket_child_frame_connectee_name=LeftShank_offset
      Coordinate LKnee_rz: default_value=0 range=(-2.443461 0)
      PhysicalOffsetFrame LeftThigh_offset: socket_parent_connectee_name=LeftThigh translation=(0 -0.25 0)
      PhysicalOffsetFrame LeftShank_offset: socket_parent_connectee_name=LeftShank translation=(0 0.25 0)
    PinJoint RShankToRThigh: socket_parent_frame_connectee_name=RightThigh_offset
        socket_child_frame_connectee_name=RightShank_offset
      Coordinate RKnee_rz: default_value=0 range=(-2.443461 0)
      PhysicalOffsetFrame RightThigh_offset: socket_parent_connectee_name=RightThigh translation=(0 -0.25 0)
      PhysicalOffsetFrame RightShank_offset: socket_parent_connectee_name=RightShank translation=(0 0.25 0)
  ForceSet:
    HuntCrossleyForce LFootForce: transition_velocity=0.2
      ContactParametersSet contact_parameters:
        ContactParameters: geometry=(LFootContact PlatformContact) stiffness=1000000 dissipation=1 static_friction=0.8
            dynamic_friction=0.4 viscous_friction=0.4
    HuntCrossleyForce RFootForce: transition_velocity=0.2
      ContactParametersSet contact_parameters:
        ContactParameters: geometry=(RFootContact PlatformContact) stiffness=1000000 dissipation=1 static_friction=0.8
            dynamic_friction=0.4 viscous_friction=0.4
    HuntCrossleyForce LKneeForce: transition_velocity=0.2
      ContactParametersSet contact_parameters:
        ContactParameters: geometry=(LKneeContact PlatformContact) stiffness=1000000 dissipation=1 static_friction=0.8
            dynamic_friction=0.4 viscous_friction=0.4
    HuntCrossleyForce RKneeForce: transition_velocity=0.2
      ContactParametersSet contact_parameters:
        ContactParameters: geometry=(RKneeContact PlatformContact) stiffness=1000000 dissipation=1 static_friction=0.8
            dynamic_friction=0.4 viscous_friction=0.4
    HuntCrossleyForce LHipForce: transition_velocity=0.2
      ContactParametersSet contact_parameters:
        ContactParameters: geometry=(LHipContact PlatformContact) stiffness=1000000 dissipation=1 static_friction=0.8
            dynamic_friction=0.4 viscous_friction=0.4
    HuntCrossleyForce RHipForce: transition_velocity=0.2
      ContactParametersSet contact_parameters:
        ContactParameters: geometry=(RHipContact PlatformContact) stiffness=1000000 dissipation=1 static_friction=0.8
            dynamic_friction=0.4 viscous_friction=0.4
    CoordinateLimitForce LKneeLimitTorque: coordinate=LKnee_rz upper_stiffness=0.5 [N*m/degree] upper_limit=0 [degrees]
        lower_stiffness=0.5 [N*m/degree] lower_limit=-140 [degrees] damping=0.025 transition=5 [degrees]
        compute_dissipation_energy=false
    CoordinateLimitForce RKneeLimitTorque: coordinate=RKnee_rz upper_stiffness=0.5 upper_limit=0 lower_stiffness=0.5
        lower_limit=-140 damping=0.025 transition=5 compute_dissipation_energy=false
    CoordinateLimitForce LHipLimitTorque: coordinate=LHip_rz upper_stiffness=0.5 upper_limit=100 lower_stiffness=0.5
        lower_limit=-100 damping=0.025 transition=5 compute_dissipation_energy=false
    CoordinateLimitForce RHipLimitTorque: coordinate=RHip_rz upper_stiffness=0.5 upper_limit=100 lower_stiffness=0.5
        lower_limit=-100 damping=0.025 transition=5 compute_dissipation_energy=false
    Millard2012EquilibriumMuscle muscle_r: min_control=0 max_control=1 max_isometric_force=500
        optimal_fiber_length=0.15 tendon_slack_length=0.1 pennation_angle_at_optimal=0.3 [radians]
        minimum_activation=0.01
      PathPoint right_shank: socket_parent_frame_connectee_name=WalkerModelTerrainAddMillardMuscle/RightShank (0 0 0)
      PathPoint right_thigh: socket_parent_frame_connectee_name=WalkerModelTerrainAddMillardMuscle/RightThigh (0 0 0)
      ActiveForceLengthCurve: minimum_value=0
      ForceVelocityCurve: concentric_slope_at_vmax=0 concentric_slope_near_vmax=0.25 isometric_slope=5
          eccentric_slope_at_vmax=0 eccentric_slope_near_vmax=0.15 max_eccentric_velocity_force_multiplier=1.4
      FiberForceLengthCurve
      TendonForceLengthCurve
    Millard2012EquilibriumMuscle muscle_l: min_control=0 max_control=1 max_isometric_force=500
        optimal_fiber_length=0.15 tendon_slack_length=0.1 pennation_angle_at_optimal=0.3 minimum_activation=0.01
      PathPoint left_shank: socket_parent_frame_connectee_name=WalkerModelTerrainAddMillardMuscle/LeftShank (0 0 0)
      PathPoint left_thigh: socket_parent_frame_connectee_name=WalkerModelTerrainAddMillardMuscle/LeftThigh (0 0 0)
      ActiveForceLengthCurve: minimum_value=0
      ForceVelocityCurve: concentric_slope_at_vmax=0 concentric_slope_near_vmax=0.25 isometric_slope=5
          eccentric_slope_at_vmax=0 eccentric_slope_near_vmax=0.15 max_eccentric_velocity_force_multiplier=1.4
      FiberForceLengthCurve
      TendonForceLengthCurve
  ContactGeometrySet:
    ContactSphere LFootContact: socket_frame_connectee_name=LeftShank location=(0 -0.2 0) radius=0.05
    ContactSphere RFootContact: socket_frame_connectee_name=RightShank location=(0 -0.2 0) radius=0.05
    ContactSphere LKneeContact: socket_frame_connectee_name=LeftShank location=(0 0.25 0) radius=0.05
    ContactSphere RKneeContact: socket_frame_connectee_name=RightShank location=(0 0.25 0) radius=0.05
    ContactSphere LHipContact: socket_frame_connectee_name=Pelvis location=(0 0 -0.2) radius=0.05
    ContactSphere RHipContact: socket_frame_connectee_name=Pelvis location=(0 0 0.2) radius=0.05
    ContactHalfSpace PlatformContact: socket_frame_connectee_name=Platform location=(0 0.025 0)
        orientation=(0 0 -1.570796)
