# OpenSim document version 40000
XsensDataReaderSettings:
  trial_prefix: MT_012005D6_009-001
  ExperimentalSensors:
    ExperimentalSensor _00B42268: name_in_model=torso_imu
    ExperimentalSensor _00B42279: name_in_model=pelvis_imu
    ExperimentalSensor _00B4227D: name_in_model=tibia_r_imu
    ExperimentalSensor _00B4227C: name_in_model=femur_r_imu
    ExperimentalSensor _00B421ED: name_in_model=tibia_l_imu
    ExperimentalSensor _00B421EE: name_in_model=femur_l_imu
    ExperimentalSensor _00B421EF: name_in_model=calcn_r_imu
    ExperimentalSensor _00B421E6: name_in_model=calcn_l_imu
