# OpenSim document version 30505
Model TugOfWar:
  gravity: 0 0 0
  BodySet:
    Body Block: mass=20 [kg] mass_center=(0 0 0)
      geometry: meshes=block.vtp
  ControllerSet:
    PrescribedController LinearRamp Controller: actuator_list=(muscle1 muscle2)
      FunctionSet ControlFunctions: LinearFunction(coefficients=-0.333333 1) LinearFunction(coefficients=0.316667 0.05)
  ForceSet:
    Thelen2003Muscle muscle1: min_control=0 max_control=1 max_isometric_force=1000 optimal_fiber_length=0.25
        tendon_slack_length=0.1 pennation_angle_at_optimal=0 [radians]
      PathPoint point1: ground (0 0.05 -0.35)
      PathPoint point2: Block (0 0 -0.05)
      MuscleFirstOrderActivationDynamicModel:
        activation_time_constant: 0.015 [seconds]
        deactivation_time_constant: 0.05 [seconds]
      MuscleFixedWidthPennationModel:
        optimal_fiber_length: 0.25
        pennation_angle_at_optimal: 0 [radians]
        maximum_pennation_angle: 1.470629 [radians]
    Thelen2003Muscle muscle2: min_control=0 max_control=1 max_isometric_force=1000 optimal_fiber_length=0.25
        tendon_slack_length=0.1 pennation_angle_at_optimal=0
      PathPoint point1: ground (0 0.05 0.35)
      PathPoint point2: Block (0 0 0.05)
      MuscleFirstOrderActivationDynamicModel:
        activation_time_constant: 0.015
        deactivation_time_constant: 0.05
      MuscleFixedWidthPennationModel:
        optimal_fiber_length: 0.25
        pennation_angle_at_optimal: 0
        maximum_pennation_angle: 1.470629
