# OpenSim document version 30516
Model walk_subject01:
  gravity: 0 -9.80665 0
  length_units: meters
  force_units: N
  credits:
    A planar reduced gait model with 10 degrees of freedom and 18 muscles by Ajay Seth. Closely based on Delp S.L., Loan J.P., Hoy M.G., Zajac F.E., Topp E.L., Rosen J.M., Thelen D.G., Anderson F.C., Seth A. Notes: 3D, 23 DOF gait model created by D.G. Thelen, Univ. of Wisconsin-Madison, and Ajay Seth, Frank C. Anderson, and Scott L. Delp, Stanford University. Lower extremity joint defintions based on Delp et al. (1990). Low back joint and anthropometry based on Anderson and Pandy (1999, 2001). Planar knee model of Yamaguchi and Zajac (1989). Seth replaced tibia translation constraints with a CustomJoint for the knee and removed the patella to eliminate all kinematic constraints; insertions of the quadrucepts are handled with moving points in the tibia frame as defined by Delp 1990. Number of muscles was reduced by Anderson to improve simulation speed for demonstrations and is not intended to be used in research. License: Creative Commons (CCBY 3.0). You are free to distribute, remix, tweak, and build upon this work, even commercially, as long as you credit us for the original creation. http://creativecommons.org/licenses/by/3.0/ More Information: http://simtk-confluence.stanford.edu:8080/display/OpenSim/Gait+2392+and+2354+Models
  publications:
    Delp, S.L., Loan, J.P., Hoy, M.G., Zajac, F.E., Topp E.L., Rosen, J.M.: An interactive graphics-based model of the lower extremity to study orthopaedic surgical procedures, IEEE Transactions on Biomedical Engineering, vol. 37, pp. 757-767, 1990. Yamaguchi G.T., Zajac F.E.: A planar model of the knee joint to characterize the knee extensor mechanism." J . Biomech. vol. 22. pp. 1-10. 1989. Anderson F.C., Pandy M.G.: A dynamic optimization solution for vertical jumping in three dimensions. Computer Methods in Biomechanics and Biomedical Engineering 2:201-231, 1999. Anderson F.C., Pandy M.G.: Dynamic optimization of human walking. Journal of Biomechanical Engineering 123:381-390, 2001.
  Ground
  BodySet:
    Body toes_r: mass=0.2092097 [kg] mass_center=(0.035537 0.00616248 -0.0179739)
        inertia=(0.00010189 0.00020378 0.00010189 0 0 0) meshes=bofoot.vtp
    Body calcn_r: mass=1.20735 mass_center=(0.102708 0.0308124 0) inertia=(0.00142646 0.00397371 0.00417749 0 0 0)
        meshes=foot.vtp
    Body talus_r: mass=0.09658802 mass_center=(0 0 0) inertia=(0.00119861 0.00119861 0.00119861 0 0 0) meshes=talus.vtp
    Body tibia_r: mass=3.581001 mass_center=(0 -0.184557 0) inertia=(0.04756937 0.004813567 0.04823005 0 0 0)
        meshes=(tibia.vtp fibula.vtp)
  JointSet:
    PlanarJoint ground_toes: socket_parent_frame_connectee_name=../ground socket_child_frame_connectee_name=../toes_r
      Coordinate rz
      Coordinate tx
      Coordinate ty
    WeldJoint mtp_r: socket_parent_frame_connectee_name=../toes_r socket_child_frame_connectee_name=calcn_r_offset
      PhysicalOffsetFrame calcn_r_offset: socket_parent_connectee_name=../../calcn_r
          translation=(0.183642 -0.00205416 0.00110925) [meters]
    WeldJoint subtalar_r: socket_parent_frame_connectee_name=../calcn_r
        socket_child_frame_connectee_name=talus_r_offset
      PhysicalOffsetFrame talus_r_offset: socket_parent_connectee_name=../../talus_r
          translation=(-0.0543288 -0.0467315 0.00882272)
    PinJoint ankle_r: socket_parent_frame_connectee_name=../talus_r socket_child_frame_connectee_name=tibia_r_offset
      Coordinate ankle_angle_r: motion_type=rotational default_value=0 range=(-1.570796 1.570796) clamped=false
      PhysicalOffsetFrame tibia_r_offset: socket_parent_connectee_name=../../tibia_r translation=(0 -0.4250649 0)
  MarkerSet:
    Marker R.Heel: socket_parent_frame_connectee_name=../calcn_r (-0.0204819 0.0172884 -0.00503735)
    Marker R.Midfoot.Sup: socket_parent_frame_connectee_name=../calcn_r (0.122708 0.0309658 -0.0403332)
    Marker R.Midfoot.Lat: socket_parent_frame_connectee_name=../calcn_r (0.117766 0.011129 0.0669726)
    Marker R.Toe.Lat: socket_parent_frame_connectee_name=../calcn_r (0.207693 -0.0114107 0.0760669)
    Marker R.Toe.Med: socket_parent_frame_connectee_name=../calcn_r (0.209814 0.00169807 -0.0323684)
    Marker R.Toe.Tip: socket_parent_frame_connectee_name=../calcn_r (0.270734 0.00315005 -0.000612297)
    Marker R.Shank.Upper: socket_parent_frame_connectee_name=../tibia_r (-0.0233139 -0.0603613 0.070733)
    Marker R.Shank.Front: socket_parent_frame_connectee_name=../tibia_r (0.0516752 -0.0954298 0.0163046)
    Marker R.Shank.Rear: socket_parent_frame_connectee_name=../tibia_r (-0.00738164 -0.145526 0.0800029)
    Marker R.Ankle.Lat: socket_parent_frame_connectee_name=../tibia_r (-0.00490543 -0.430843 0.0549207)
    Marker R.Ankle.Med: socket_parent_frame_connectee_name=../tibia_r (0.00286259 -0.416327 -0.034325)
