# OpenSim document version 30516
Model walk_subject01:
  gravity: 0 -9.80665 0
  length_units: meters
  force_units: N
  credits:
    A planar reduced gait model with 10 degrees of freedom and 18 muscles by Ajay Seth. Closely based on Delp S.L., Loan J.P., Hoy M.G., Zajac F.E., Topp E.L., Rosen J.M., Thelen D.G., Anderson F.C., Seth A. Notes: 3D, 23 DOF gait model created by D.G. Thelen, Univ. of Wisconsin-Madison, and Ajay Seth, Frank C. Anderson, and Scott L. Delp, Stanford University. Lower extremity joint defintions based on Delp et al. (1990). Low back joint and anthropometry based on Anderson and Pandy (1999, 2001). Planar knee model of Yamaguchi and Zajac (1989). Seth replaced tibia translation constraints with a CustomJoint for the knee and removed the patella to eliminate all kinematic constraints; insertions of the quadrucepts are handled with moving points in the tibia frame as defined by Delp 1990. Number of muscles was reduced by Anderson to improve simulation speed for demonstrations and is not intended to be used in research. License: Creative Commons (CCBY 3.0). You are free to distribute, remix, tweak, and build upon this work, even commercially, as long as you credit us for the original creation. http://creativecommons.org/licenses/by/3.0/ More Information: http://simtk-confluence.stanford.edu:8080/display/OpenSim/Gait+2392+and+2354+Models
  publications:
    Delp, S.L., Loan, J.P., Hoy, M.G., Zajac, F.E., Topp E.L., Rosen, J.M.: An interactive graphics-based model of the lower extremity to study orthopaedic surgical procedures, IEEE Transactions on Biomedical Engineering, vol. 37, pp. 757-767, 1990. Yamaguchi G.T., Zajac F.E.: A planar model of the knee joint to characterize the knee extensor mechanism." J . Biomech. vol. 22. pp. 1-10. 1989. Anderson F.C., Pandy M.G.: A dynamic optimization solution for vertical jumping in three dimensions. Computer Methods in Biomechanics and Biomedical Engineering 2:201-231, 1999. Anderson F.C., Pandy M.G.: Dynamic optimization of human walking. Journal of Biomechanical Engineering 123:381-390, 2001.
  AckermannVanDenBogert2010Force marker0_contact: socket_station_connectee_name=../marker0
      friction_coefficient=7.623057e-7 stiffness=2813391 dissipation=6.434056e-6
      tangent_velocity_scaling_factor=0.07309635
    # Path to a Component that satisfies the Socket 'station' of type Station (description: TODO).
    # TODO
    # TODO N/m^3
    # TODO s/m
    # TODO
  AckermannVanDenBogert2010Force marker1_contact: socket_station_connectee_name=../marker1
      friction_coefficient=0.3510134 stiffness=4.825994e7 dissipation=1.999996
      tangent_velocity_scaling_factor=0.01000006
    # Path to a Component that satisfies the Socket 'station' of type Station (description: TODO).
    # TODO
    # TODO N/m^3
    # TODO s/m
    # TODO
  AckermannVanDenBogert2010Force marker2_contact: socket_station_connectee_name=../marker2
      friction_coefficient=0.8802754 stiffness=1.423912 dissipation=1.399176 tangent_velocity_scaling_factor=0.04174572
    # Path to a Component that satisfies the Socket 'station' of type Station (description: TODO).
    # TODO
    # TODO N/m^3
    # TODO s/m
    # TODO
  AckermannVanDenBogert2010Force marker3_contact: socket_station_connectee_name=../marker3
      friction_coefficient=0.633281 stiffness=15.69695 dissipation=0.3645746 tangent_velocity_scaling_factor=0.0477929
    # Path to a Component that satisfies the Socket 'station' of type Station (description: TODO).
    # TODO
    # TODO N/m^3
    # TODO s/m
    # TODO
  AckermannVanDenBogert2010Force marker4_contact: socket_station_connectee_name=../marker4
      friction_coefficient=0.1415951 stiffness=3.507254e7 dissipation=2 tangent_velocity_scaling_factor=0.06601303
    # Path to a Component that satisfies the Socket 'station' of type Station (description: TODO).
    # TODO
    # TODO N/m^3
    # TODO s/m
    # TODO
  AckermannVanDenBogert2010Force marker5_contact: socket_station_connectee_name=../marker5
      friction_coefficient=0.4656432 stiffness=2057692 dissipation=1.999999 tangent_velocity_scaling_factor=0.01000001
    # Path to a Component that satisfies the Socket 'station' of type Station (description: TODO).
    # TODO
    # TODO N/m^3
    # TODO s/m
    # TODO
  Ground
  BodySet:
    Body toes_r: mass=0.2092097 [kg] mass_center=(0.035537 0.00616248 -0.0179739)
        inertia=(0.00010189 0.00020378 0.00010189 0 0 0) meshes=bofoot.vtp
    Body calcn_r: mass=1.20735 mass_center=(0.102708 0.0308124 0) inertia=(0.00142646 0.00397371 0.00417749 0 0 0)
        meshes=foot.vtp
    Body talus_r: mass=0.09658802 mass_center=(0 0 0) inertia=(0.00119861 0.00119861 0.00119861 0 0 0) meshes=talus.vtp
  JointSet:
    PlanarJoint ground_toes: socket_parent_frame_connectee_name=../ground socket_child_frame_connectee_name=../toes_r
      Coordinate rz
      Coordinate tx
      Coordinate ty
    WeldJoint mtp_r: socket_parent_frame_connectee_name=../toes_r socket_child_frame_connectee_name=calcn_r_offset
      PhysicalOffsetFrame calcn_r_offset: socket_parent_connectee_name=../../calcn_r
          translation=(0.183642 -0.00205416 0.00110925) [meters]
    WeldJoint subtalar_r: socket_parent_frame_connectee_name=../calcn_r
        socket_child_frame_connectee_name=talus_r_offset
      PhysicalOffsetFrame talus_r_offset: socket_parent_connectee_name=../../talus_r
          translation=(-0.0543288 -0.0467315 0.00882272)
  MarkerSet:
    Marker R.Heel: socket_parent_frame_connectee_name=../calcn_r (-0.0204819 0.0172884 -0.00503735)
    Marker R.Midfoot.Sup: socket_parent_frame_connectee_name=../calcn_r (0.122708 0.0309658 -0.0403332)
    Marker R.Midfoot.Lat: socket_parent_frame_connectee_name=../calcn_r (0.117766 0.011129 0.0669726)
    Marker R.Toe.Lat: socket_parent_frame_connectee_name=../calcn_r (0.207693 -0.0114107 0.0760669)
    Marker R.Toe.Med: socket_parent_frame_connectee_name=../calcn_r (0.209814 0.00169807 -0.0323684)
    Marker R.Toe.Tip: socket_parent_frame_connectee_name=../calcn_r (0.270734 0.00315005 -0.000612297)
    Marker marker0: socket_parent_frame_connectee_name=../calcn_r (-0.02 -0.04001906 0)
    Marker marker1: socket_parent_frame_connectee_name=../calcn_r (0.038 -0.04001906 0)
    Marker marker2: socket_parent_frame_connectee_name=../calcn_r (0.096 -0.04001906 0)
    Marker marker3: socket_parent_frame_connectee_name=../calcn_r (0.154 -0.04001906 0)
    Marker marker4: socket_parent_frame_connectee_name=../calcn_r (0.212 -0.04001906 0)
    Marker marker5: socket_parent_frame_connectee_name=../calcn_r (0.27 -0.04001906 0)
