# OpenSim document version 40000
IKTaskSet:
  IKMarkerTask R.ASIS: apply=true weight=50
  IKMarkerTask L.ASIS: apply=true weight=50
  IKMarkerTask S2: apply=true weight=5
  IKMarkerTask R.PSIS: apply=true weight=40
  IKMarkerTask L.PSIS: apply=true weight=40
  IKMarkerTask R.TH1: apply=true weight=5
  IKMarkerTask R.TH2: apply=true weight=5
  IKMarkerTask R.TH3: apply=true weight=5
  IKMarkerTask R.Knee: apply=true weight=35
  IKMarkerTask R.SH1: apply=true weight=1
  IKMarkerTask R.SH2: apply=true weight=1
  IKMarkerTask R.SH3: apply=true weight=1
  IKMarkerTask R.SH4: apply=true weight=1
  IKMarkerTask R.Ankle: apply=true weight=25
  IKMarkerTask R.Toe: apply=true weight=1
  IKMarkerTask R.MT5: apply=true weight=10
  IKMarkerTask R.Heel: apply=true weight=15
