# OpenSim document version 40000
Model FAIDC1:
  gravity: 0 -9.8066 0
  length_units: meters
  force_units: N
  credits:
    Delp S.L., Loan J.P., Hoy M.G., Zajac F.E., Topp E.L., Rosen J.M., Thelen D.G., Anderson F.C., Seth A., Hamner S.R.
  publications:
    Notes: 3D, 23 DOF gait model created by D.G. Thelen, Univ. of Wisconsin-Madison, and Ajay Seth, Frank C. Anderson, and Scott L. Delp, Stanford University. Lower extremity joint defintions based on Delp et al. (1990). Low back joint and anthropometry based on Anderson and Pandy (1999, 2001). Planar knee model of Yamaguchi and Zajac (1989). Seth removed the patella to avoid kinematic constraints; insertions of the quadrucepts are handled with moving points in the tibia frame. Delp, S.L., Loan, J.P., Hoy, M.G., Zajac, F.E., Topp E.L., Rosen, J.M.: An interactive graphics-based model of the lower extremity to study orthopaedic surgical procedures, IEEE Transactions on Biomedical Engineering, vol. 37, pp. 757-767, 1990. Yamaguchi G.T., Zajac F.E.: A planar model of the knee joint to characterize the knee extensor mechanism." J . Biomecl7. vol. 21. pp. 1-10. 1989. Anderson F.C., Pandy M.G.: A dynamic optimization solution for vertical jumping in three dimensions. Computer Methods in Biomechanics and Biomedical Engineering 2:201-231, 1999. Anderson F.C., Pandy M.G.: Dynamic optimization of human walking. Journal of Biomechanical Engineering 123:381-390, 2001.
  Ground: meshes=platform_800x85cm.vtp
  BodySet:
    Body pelvis: mass=12.69126 [kg] mass_center=(-0.063848 0 0) inertia=(0.116934 0.116934 0.0508879 0 0 0)
        meshes=(sacrum.vtp pelvis.vtp l_pelvis.vtp)
    Body femur_r: mass=10.02354 mass_center=(0 -0.18361 0) inertia=(0.171734 0.050918 0.171734 0 0 0) meshes=femur.vtp
    Body tibia_r: mass=3.99529 mass_center=(0 -0.200902 0) inertia=(0.0629102 0.00640691 0.0629102 0 0 0)
        meshes=(tibia.vtp fibula.vtp)
    Body talus_r: mass=0.1077608 mass_center=(0 0 0) inertia=(0.00125383 0.00125443 0.00125383 0 0 0) meshes=talus.vtp
    Body calcn_r: mass=1.34709 mass_center=(0.103561 0.0310681 0) inertia=(0.00171489 0.00455581 0.00455581 0 0 0)
        meshes=foot.vtp
    Body toes_r: mass=0.2334124 mass_center=(0.0358323 0.00621361 -0.0192078)
        inertia=(0.000122489 0.000234612 0.000234612 0 0 0) meshes=bofoot.vtp
    Body femur_l: mass=10.02354 mass_center=(0 -0.18361 0) inertia=(0.171734 0.050918 0.171734 0 0 0)
        meshes=l_femur.vtp
    Body tibia_l: mass=3.99529 mass_center=(0 -0.200902 0) inertia=(0.0629102 0.00640691 0.0629102 0 0 0)
        meshes=(l_tibia.vtp l_fibula.vtp)
    Body talus_l: mass=0.1077608 mass_center=(0 0 0) inertia=(0.00125383 0.00125443 0.00125383 0 0 0)
        meshes=l_talus.vtp
    Body calcn_l: mass=1.34709 mass_center=(0.103561 0.0310681 0) inertia=(0.00171489 0.00455581 0.00455581 0 0 0)
        meshes=l_foot.vtp
    Body toes_l: mass=0.2334124 mass_center=(0.0358323 0.00621361 0.0192078)
        inertia=(0.000122489 0.000234612 0.000234612 0 0 0) meshes=l_bofoot.vtp
    Body torso: mass=28.90925 mass_center=(-0.0160598 0.296762 0.00237434) inertia=(1.4729 0.912828 1.4729 0 0 0)
        meshes=(hat_spine.vtp hat_jaw.vtp hat_skull.vtp hat_ribs.vtp scapula_lv1.vtp scapula_rv1.vtp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)
    Body humerus_r: mass=2.190315 mass_center=(0 -0.142409 0) inertia=(0.0096489 0.00332849 0.0108299 0 0 0)
        meshes=humerus_rv.vtp
    Body ulna_r: mass=0.6546621 mass_center=(0 -0.138378 0) inertia=(0.00420817 0.000878001 0.0045647 0 0 0)
        meshes=ulna_rv.vtp
    Body radius_r: mass=0.6546621 mass_center=(0 -0.138378 0) inertia=(0.00420817 0.000878001 0.0045647 0 0 0)
        meshes=radius_rv.vtp
    Body hand_r: mass=0.4930155 mass_center=(0 -0.0781863 0) inertia=(0.00126724 0.000777135 0.00190379 0 0 0)
        meshes=(pisiform_rvs.vtp lunate_rvs.vtp scaphoid_rvs.vtp triquetrum_rvs.vtp hamate_rvs.vtp capitate_rvs.vtp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)
    Body humerus_l: mass=2.190315 mass_center=(0 -0.142409 0) inertia=(0.0096489 0.00332849 0.0108299 0 0 0)
        meshes=humerus_lv.vtp
    Body ulna_l: mass=0.6546621 mass_center=(0 -0.138378 0) inertia=(0.00420817 0.000878001 0.0045647 0 0 0)
        meshes=ulna_lv.vtp
    Body radius_l: mass=0.6546621 mass_center=(0 -0.138378 0) inertia=(0.00420817 0.000878001 0.0045647 0 0 0)
        meshes=radius_lv.vtp
    Body hand_l: mass=0.4930155 mass_center=(0 -0.0781863 0) inertia=(0.00126724 0.000777135 0.00190379 0 0 0)
        meshes=(pisiform_lvs.vtp lunate_lvs.vtp scaphoid_lvs.vtp triquetrum_lvs.vtp hamate_lvs.vtp capitate_lvs.vtp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)
  JointSet:
    CustomJoint ground_pelvis: socket_parent_frame=ground_offset socket_child_frame=pelvis_offset
      Coordinate pelvis_tilt: default_value=0 range=(-1.5708 1.5708) clamped=true
      Coordinate pelvis_list: default_value=0 range=(-1.5708 1.5708) clamped=true
      Coordinate pelvis_rotation: default_value=0 range=(-1.5708 1.5708) clamped=true
      Coordinate pelvis_tx: default_value=0 range=(-20 20) clamped=true
      Coordinate pelvis_ty: default_value=0 range=(-2 4) clamped=true
      Coordinate pelvis_tz: default_value=0 range=(-5 5) clamped=true
      PhysicalOffsetFrame ground_offset: socket_parent=/ground translation=(0 0 0) [meters]
      PhysicalOffsetFrame pelvis_offset: socket_parent=/bodyset/pelvis translation=(0 -1 0)
      SpatialTransform:
        TransformAxis rotation1: coordinates=pelvis_tilt axis=(0 0 1) LinearFunction(coefficients=1 0)
        TransformAxis rotation2: coordinates=pelvis_list axis=(1 0 0) LinearFunction(coefficients=1 0)
        TransformAxis rotation3: coordinates=pelvis_rotation axis=(0 1 0) LinearFunction(coefficients=1 0)
        TransformAxis translation1: coordinates=pelvis_tx axis=(1 0 0)
            MultiplierFunction(scale=1, LinearFunction(coefficients=1 0))
        TransformAxis translation2: coordinates=pelvis_ty axis=(0 1 0)
            MultiplierFunction(scale=1, LinearFunction(coefficients=1 0))
        TransformAxis translation3: coordinates=pelvis_tz axis=(0 0 1)
            MultiplierFunction(scale=1, LinearFunction(coefficients=1 0))
    CustomJoint hip_r: socket_parent_frame=pelvis_offset socket_child_frame=femur_r_offset
      Coordinate hip_flexion_r: default_value=0 range=(-0.69813 1.7453) clamped=true
      Coordinate hip_adduction_r: default_value=0 range=(-0.5236 0.5236) clamped=true
      Coordinate hip_rotation_r: default_value=0 range=(-0.5236 0.5236) clamped=true
      PhysicalOffsetFrame pelvis_offset: socket_parent=/bodyset/pelvis translation=(-0.063848 -0.0596944 0.0895281)
      PhysicalOffsetFrame femur_r_offset: socket_parent=/bodyset/femur_r translation=(0 0 0)
      SpatialTransform: axes_held_at_zero=(translation1 translation2 translation3)
        TransformAxis rotation1: coordinates=hip_flexion_r axis=(0 0 1) LinearFunction(coefficients=1 0)
        TransformAxis rotation2: coordinates=hip_adduction_r axis=(1 0 0) LinearFunction(coefficients=1 0)
        TransformAxis rotation3: coordinates=hip_rotation_r axis=(0 1 0) LinearFunction(coefficients=1 0)
    CustomJoint knee_r: socket_parent_frame=femur_r_offset socket_child_frame=tibia_r_offset
      Coordinate knee_angle_r: default_value=0 range=(-2.7925 0.17453) clamped=true
      PhysicalOffsetFrame femur_r_offset: socket_parent=/bodyset/femur_r translation=(0 0 0)
      PhysicalOffsetFrame tibia_r_offset: socket_parent=/bodyset/tibia_r translation=(0 0 0)
      SpatialTransform: axes_held_at_zero=(rotation2 rotation3 translation3)
        TransformAxis rotation1: coordinates=knee_angle_r axis=(0 0 1) LinearFunction(coefficients=1 0)
        TransformAxis translation1: coordinates=knee_angle_r axis=(1 0 0)
          MultiplierFunction: scale=1.080096
            SimmSpline: x=(-2.0944 -1.7453 -1.3963 -1.0472 -0.69813 -0.34907 -0.17453 0.19734 0.33739 0.49018 1.5215 2.0944)
                y=(-0.0032 0.00179 0.00411 0.0041 0.00212 -0.001 -0.0031 -0.005227 -0.005435 -0.005574 -0.005435 -0.00525)
        TransformAxis translation2: coordinates=knee_angle_r axis=(0 1 0)
          MultiplierFunction: scale=1.080096
            SimmSpline: x=(-2.0944 -1.2217 -0.5236 -0.34907 -0.17453 0.15915 2.0944)
                y=(-0.4226 -0.4082 -0.399 -0.3976 -0.3966 -0.39526 -0.396)
    CustomJoint ankle_r: socket_parent_frame=tibia_r_offset socket_child_frame=talus_r_offset
      Coordinate ankle_angle_r: default_value=0 range=(-1.0472 0.69813) clamped=true
      PhysicalOffsetFrame tibia_r_offset: socket_parent=/bodyset/tibia_r translation=(0 -0.462708 0)
      PhysicalOffsetFrame talus_r_offset: socket_parent=/bodyset/talus_r translation=(0 0 0)
      SpatialTransform: axes_held_at_zero=(rotation2 rotation3 translation1 translation2 translation3)
        TransformAxis rotation1: coordinates=ankle_angle_r axis=(-0.10501 -0.17402 0.97913)
            LinearFunction(coefficients=1 0)
    CustomJoint subtalar_r: socket_parent_frame=talus_r_offset socket_child_frame=calcn_r_offset
      Coordinate subtalar_angle_r: default_value=0 range=(-0.87266 0.87266) clamped=true
      PhysicalOffsetFrame talus_r_offset: socket_parent=/bodyset/talus_r translation=(-0.0524798 -0.0451404 0.00858019)
      PhysicalOffsetFrame calcn_r_offset: socket_parent=/bodyset/calcn_r translation=(0 0 0)
      SpatialTransform: axes_held_at_zero=(rotation2 rotation3 translation1 translation2 translation3)
        TransformAxis rotation1: coordinates=subtalar_angle_r axis=(0.78718 0.60475 -0.12095)
            LinearFunction(coefficients=1 0)
    CustomJoint mtp_r: socket_parent_frame=calcn_r_offset socket_child_frame=toes_r_offset
      Coordinate mtp_angle_r: default_value=0 range=(-1.0472 1.0472) clamped=true
      PhysicalOffsetFrame calcn_r_offset: socket_parent=/bodyset/calcn_r translation=(0.185163 -0.00207117 0.00118541)
      PhysicalOffsetFrame toes_r_offset: socket_parent=/bodyset/toes_r translation=(0 0 0)
      SpatialTransform: axes_held_at_zero=(rotation2 rotation3 translation1 translation2 translation3)
        TransformAxis rotation1: coordinates=mtp_angle_r axis=(-0.58095 0 0.81394) LinearFunction(coefficients=1 0)
    CustomJoint hip_l: socket_parent_frame=pelvis_offset socket_child_frame=femur_l_offset
      Coordinate hip_flexion_l: default_value=0 range=(-0.69813 1.7453) clamped=true
      Coordinate hip_adduction_l: default_value=0 range=(-0.5236 0.5236) clamped=true
      Coordinate hip_rotation_l: default_value=0 range=(-0.5236 0.5236) clamped=true
      PhysicalOffsetFrame pelvis_offset: socket_parent=/bodyset/pelvis translation=(-0.063848 -0.0596944 -0.0895281)
      PhysicalOffsetFrame femur_l_offset: socket_parent=/bodyset/femur_l translation=(0 0 0)
      SpatialTransform: axes_held_at_zero=(translation1 translation2 translation3)
        TransformAxis rotation1: coordinates=hip_flexion_l axis=(0 0 1) LinearFunction(coefficients=1 0)
        TransformAxis rotation2: coordinates=hip_adduction_l axis=(-1 0 0) LinearFunction(coefficients=1 0)
        TransformAxis rotation3: coordinates=hip_rotation_l axis=(0 -1 0) LinearFunction(coefficients=1 0)
    CustomJoint knee_l: socket_parent_frame=femur_l_offset socket_child_frame=tibia_l_offset
      Coordinate knee_angle_l: default_value=0 range=(-2.7925 0.17453) clamped=true
      PhysicalOffsetFrame femur_l_offset: socket_parent=/bodyset/femur_l translation=(0 0 0)
      PhysicalOffsetFrame tibia_l_offset: socket_parent=/bodyset/tibia_l translation=(0 0 0)
      SpatialTransform: axes_held_at_zero=(rotation2 rotation3 translation3)
        TransformAxis rotation1: coordinates=knee_angle_l axis=(0 0 1) LinearFunction(coefficients=1 0)
        TransformAxis translation1: coordinates=knee_angle_l axis=(1 0 0)
          MultiplierFunction: scale=1.080096
            SimmSpline: x=(-2.0944 -1.7453 -1.3963 -1.0472 -0.69813 -0.34907 -0.17453 0.19734 0.33739 0.49018 1.5215 2.0944)
                y=(-0.0032 0.00179 0.00411 0.0041 0.00212 -0.001 -0.0031 -0.005227 -0.005435 -0.005574 -0.005435 -0.00525)
        TransformAxis translation2: coordinates=knee_angle_l axis=(0 1 0)
          MultiplierFunction: scale=1.080096
            SimmSpline: x=(-2.0944 -1.2217 -0.5236 -0.34907 -0.17453 0.15915 2.0944)
                y=(-0.4226 -0.4082 -0.399 -0.3976 -0.3966 -0.39526 -0.396)
    CustomJoint ankle_l: socket_parent_frame=tibia_l_offset socket_child_frame=talus_l_offset
      Coordinate ankle_angle_l: default_value=0 range=(-1.0472 0.69813) clamped=true
      PhysicalOffsetFrame tibia_l_offset: socket_parent=/bodyset/tibia_l translation=(0 -0.462708 0)
      PhysicalOffsetFrame talus_l_offset: socket_parent=/bodyset/talus_l translation=(0 0 0)
      SpatialTransform: axes_held_at_zero=(rotation2 rotation3 translation1 translation2 translation3)
        TransformAxis rotation1: coordinates=ankle_angle_l axis=(0.10501 0.17402 0.97913)
            LinearFunction(coefficients=1 0)
    CustomJoint subtalar_l: socket_parent_frame=talus_l_offset socket_child_frame=calcn_l_offset
      Coordinate subtalar_angle_l: default_value=0 range=(-0.87266 0.87266) clamped=true
      PhysicalOffsetFrame talus_l_offset: socket_parent=/bodyset/talus_l
          translation=(-0.0524798 -0.0451404 -0.00858019)
      PhysicalOffsetFrame calcn_l_offset: socket_parent=/bodyset/calcn_l translation=(0 0 0)
      SpatialTransform: axes_held_at_zero=(rotation2 rotation3 translation1 translation2 translation3)
        TransformAxis rotation1: coordinates=subtalar_angle_l axis=(-0.78718 -0.60475 -0.12095)
            LinearFunction(coefficients=1 0)
    CustomJoint mtp_l: socket_parent_frame=calcn_l_offset socket_child_frame=toes_l_offset
      Coordinate mtp_angle_l: default_value=0 range=(-1.0472 1.0472) clamped=true
      PhysicalOffsetFrame calcn_l_offset: socket_parent=/bodyset/calcn_l translation=(0.185163 -0.00207117 -0.00118541)
      PhysicalOffsetFrame toes_l_offset: socket_parent=/bodyset/toes_l translation=(0 0 0)
      SpatialTransform: axes_held_at_zero=(rotation2 rotation3 translation1 translation2 translation3)
        TransformAxis rotation1: coordinates=mtp_angle_l axis=(0.58095 0 0.81394) LinearFunction(coefficients=1 0)
    CustomJoint back: socket_parent_frame=pelvis_offset socket_child_frame=torso_offset
      Coordinate lumbar_extension: default_value=0 range=(-0.7854 0.17453) clamped=true
      Coordinate lumbar_bending: default_value=0 range=(-0.34907 0.34907) clamped=true
      Coordinate lumbar_rotation: default_value=0 range=(-0.5236 0.5236) clamped=true
      PhysicalOffsetFrame pelvis_offset: socket_parent=/bodyset/pelvis translation=(-0.0909409 0.0736019 0)
      PhysicalOffsetFrame torso_offset: socket_parent=/bodyset/torso translation=(0 0 0)
      SpatialTransform: axes_held_at_zero=(translation1 translation2 translation3)
        TransformAxis rotation1: coordinates=lumbar_extension axis=(0 0 1) LinearFunction(coefficients=1 0)
        TransformAxis rotation2: coordinates=lumbar_bending axis=(1 0 0) LinearFunction(coefficients=1 0)
        TransformAxis rotation3: coordinates=lumbar_rotation axis=(0 1 0) LinearFunction(coefficients=1 0)
    CustomJoint acromial_r: socket_parent_frame=torso_offset socket_child_frame=humerus_r_offset
      Coordinate arm_flex_r: default_value=0 range=(-1.5708 1.5708) clamped=true
      Coordinate arm_add_r: default_value=0 range=(-2.0944 1.5708) clamped=true
      Coordinate arm_rot_r: default_value=0 range=(-1.5708 1.5708) clamped=true
      PhysicalOffsetFrame torso_offset: socket_parent=/bodyset/torso translation=(0.00342821 0.34452 0.175416)
      PhysicalOffsetFrame humerus_r_offset: socket_parent=/bodyset/humerus_r translation=(0 0 0)
      SpatialTransform: axes_held_at_zero=(translation1 translation2 translation3)
        TransformAxis rotation1: coordinates=arm_flex_r axis=(0 0 1) LinearFunction(coefficients=1 0)
        TransformAxis rotation2: coordinates=arm_add_r axis=(1 0 0) LinearFunction(coefficients=1 0)
        TransformAxis rotation3: coordinates=arm_rot_r axis=(0 1 0) LinearFunction(coefficients=1 0)
    CustomJoint elbow_r: socket_parent_frame=humerus_r_offset socket_child_frame=ulna_r_offset
      Coordinate elbow_flex_r: default_value=0 range=(-0.17453 2.618) clamped=true
      PhysicalOffsetFrame humerus_r_offset: socket_parent=/bodyset/humerus_r
          translation=(0.0113795 -0.247831 -0.00830672)
      PhysicalOffsetFrame ulna_r_offset: socket_parent=/bodyset/ulna_r translation=(0 0 0)
      SpatialTransform: axes_held_at_zero=(rotation2 rotation3 translation1 translation2 translation3)
        TransformAxis rotation1: coordinates=elbow_flex_r axis=(0.22605 0.022269 0.97386)
            LinearFunction(coefficients=1 0)
    CustomJoint radioulnar_r: socket_parent_frame=ulna_r_offset socket_child_frame=radius_r_offset
      Coordinate pro_sup_r: default_value=0 range=(0 3.1416) clamped=true
      PhysicalOffsetFrame ulna_r_offset: socket_parent=/bodyset/ulna_r translation=(-0.00772396 -0.0149346 0.0299488)
      PhysicalOffsetFrame radius_r_offset: socket_parent=/bodyset/radius_r translation=(0 0 0)
      SpatialTransform: axes_held_at_zero=(rotation2 rotation3 translation1 translation2 translation3)
        TransformAxis rotation1: coordinates=pro_sup_r axis=(0.056398 0.99841 0.001952)
            LinearFunction(coefficients=1 0)
    CustomJoint radius_hand_r: socket_parent_frame=radius_r_offset socket_child_frame=hand_r_offset
      Coordinate wrist_flex_r: default_value=0 range=(-1.2217 1.2217) clamped=true
      Coordinate wrist_dev_r: default_value=0 range=(-0.43633 0.61087) clamped=true
      PhysicalOffsetFrame radius_r_offset: socket_parent=/bodyset/radius_r translation=(-0.0101008 -0.270791 0.0156266)
      PhysicalOffsetFrame hand_r_offset: socket_parent=/bodyset/hand_r translation=(0 0 0)
      SpatialTransform: axes_held_at_zero=(rotation3 translation1 translation2 translation3)
        TransformAxis rotation1: coordinates=wrist_flex_r axis=(0 0 1) LinearFunction(coefficients=1 0)
        TransformAxis rotation2: coordinates=wrist_dev_r axis=(1 0 0) LinearFunction(coefficients=1 0)
    CustomJoint acromial_l: socket_parent_frame=torso_offset socket_child_frame=humerus_l_offset
      Coordinate arm_flex_l: default_value=0 range=(-1.5708 1.5708) clamped=true
      Coordinate arm_add_l: default_value=0 range=(-2.0944 1.5708) clamped=true
      Coordinate arm_rot_l: default_value=0 range=(-1.5708 1.5708) clamped=true
      PhysicalOffsetFrame torso_offset: socket_parent=/bodyset/torso translation=(0.00342821 0.34452 -0.175416)
      PhysicalOffsetFrame humerus_l_offset: socket_parent=/bodyset/humerus_l translation=(0 0 0)
      SpatialTransform: axes_held_at_zero=(translation1 translation2 translation3)
        TransformAxis rotation1: coordinates=arm_flex_l axis=(0 0 1) LinearFunction(coefficients=1 0)
        TransformAxis rotation2: coordinates=arm_add_l axis=(-1 0 0) LinearFunction(coefficients=1 0)
        TransformAxis rotation3: coordinates=arm_rot_l axis=(0 -1 0) LinearFunction(coefficients=1 0)
    CustomJoint elbow_l: socket_parent_frame=humerus_l_offset socket_child_frame=ulna_l_offset
      Coordinate elbow_flex_l: default_value=0 range=(-0.17453 2.618) clamped=true
      PhysicalOffsetFrame humerus_l_offset: socket_parent=/bodyset/humerus_l
          translation=(0.0113795 -0.247831 0.00830672)
      PhysicalOffsetFrame ulna_l_offset: socket_parent=/bodyset/ulna_l translation=(0 0 0)
      SpatialTransform: axes_held_at_zero=(rotation2 rotation3 translation1 translation2 translation3)
        TransformAxis rotation1: coordinates=elbow_flex_l axis=(-0.22605 -0.022269 0.97386)
            LinearFunction(coefficients=1 0)
    CustomJoint radioulnar_l: socket_parent_frame=ulna_l_offset socket_child_frame=radius_l_offset
      Coordinate pro_sup_l: default_value=0 range=(0 3.1416) clamped=true
      PhysicalOffsetFrame ulna_l_offset: socket_parent=/bodyset/ulna_l translation=(-0.00772396 -0.0149346 -0.0299488)
      PhysicalOffsetFrame radius_l_offset: socket_parent=/bodyset/radius_l translation=(0 0 0)
      SpatialTransform: axes_held_at_zero=(rotation2 rotation3 translation1 translation2 translation3)
        TransformAxis rotation1: coordinates=pro_sup_l axis=(-0.056398 -0.99841 0.001952)
            LinearFunction(coefficients=1 0)
    CustomJoint radius_hand_l: socket_parent_frame=radius_l_offset socket_child_frame=hand_l_offset
      Coordinate wrist_flex_l: default_value=0 range=(-1.2217 1.2217) clamped=true
      Coordinate wrist_dev_l: default_value=0 range=(-0.43633 0.61087) clamped=true
      PhysicalOffsetFrame radius_l_offset: socket_parent=/bodyset/radius_l
          translation=(-0.0101008 -0.270791 -0.0156266)
      PhysicalOffsetFrame hand_l_offset: socket_parent=/bodyset/hand_l translation=(0 0 0)
      SpatialTransform: axes_held_at_zero=(rotation3 translation1 translation2 translation3)
        TransformAxis rotation1: coordinates=wrist_flex_l axis=(0 0 1) LinearFunction(coefficients=1 0)
        TransformAxis rotation2: coordinates=wrist_dev_l axis=(-1 0 0) LinearFunction(coefficients=1 0)
  ForceSet:
    Thelen2003Muscle [values shared by the 92 below unless stated]: FmaxTendonStrain=0.033 KshapeActive=0.55
        KshapePassive=3.3 Af=0.75 Flen=2.4 activation_time_constant=0.01 [seconds]
        deactivation_time_constant=0.04 [seconds]
    Thelen2003Muscle glut_med1_r: max_isometric_force=7371 optimal_fiber_length=0.05098474
        tendon_slack_length=0.07433267 pennation_angle_at_optimal=0.13963 [radians] FmaxMuscleStrain=2
      PathPoint P1: pelvis (-0.0368458 0.0274541 0.129628)
      PathPoint P2: femur_r (-0.0235463 -0.0126371 0.0691714)
    Thelen2003Muscle glut_med2_r: max_isometric_force=5157 optimal_fiber_length=0.08350226
        tendon_slack_length=0.05237461 pennation_angle_at_optimal=0 FmaxMuscleStrain=2
      PathPoint P1: pelvis (-0.0772144 0.0401877 0.0821303)
      PathPoint P2: femur_r (-0.0278664 -0.00626451 0.065681)
    Thelen2003Muscle glut_med3_r: max_isometric_force=5877 optimal_fiber_length=0.0668177
        tendon_slack_length=0.05481959 pennation_angle_at_optimal=0.3578 FmaxMuscleStrain=2
      PathPoint P1: pelvis (-0.110451 0.00948249 0.0694788)
      PathPoint P2: femur_r (-0.0333749 -0.00507639 0.0645597)
    Thelen2003Muscle glut_min1_r: max_isometric_force=2430 optimal_fiber_length=0.06916473
        tendon_slack_length=0.01627405 pennation_angle_at_optimal=0.17453 FmaxMuscleStrain=0.6
      PathPoint P1: pelvis (-0.0421745 -0.00722468 0.113224)
      PathPoint P2: femur_r (-0.00777663 -0.0112325 0.0697944)
    Thelen2003Muscle glut_min2_r: max_isometric_force=2565 optimal_fiber_length=0.06483045
        tendon_slack_length=0.02022678 pennation_angle_at_optimal=0 FmaxMuscleStrain=0.6
      PathPoint P1: pelvis (-0.0571653 -0.00587004 0.106255)
      PathPoint P2: femur_r (-0.0103685 -0.0112325 0.0697944)
    Thelen2003Muscle glut_min3_r: max_isometric_force=2907 optimal_fiber_length=0.04031385
        tendon_slack_length=0.05410613 pennation_angle_at_optimal=0.017453 FmaxMuscleStrain=0.6
      PathPoint P1: pelvis (-0.0753181 -0.00568947 0.0917806)
      PathPoint P2: femur_r (-0.0145815 -0.00896475 0.0685475)
    Thelen2003Muscle semimem_r: max_isometric_force=11592 optimal_fiber_length=0.08741817 tendon_slack_length=0.3759005
        pennation_angle_at_optimal=0.2618 FmaxMuscleStrain=0.6 KshapeActive=0.3
      PathPoint P1: pelvis (-0.107649 -0.0880241 0.0766728)
      ConditionalPathPoint P2: tibia_r (-0.0374466 -0.0378669 -0.0204859)
          socket_coordinate=/jointset/knee_r/knee_angle_r range=(-0.55851 0.17453) [radians]
      PathPoint P3: tibia_r (-0.029054 -0.051339 -0.0212009)
    Thelen2003Muscle semiten_r: max_isometric_force=3690 optimal_fiber_length=0.2202157 tendon_slack_length=0.3018402
        pennation_angle_at_optimal=0.2269 FmaxMuscleStrain=0.6 KshapeActive=0.3
      PathPoint P1: pelvis (-0.114105 -0.099231 0.0647497)
      ConditionalPathPoint P2: tibia_r (-0.045227 -0.0307642 -0.0246684)
          socket_coordinate=/jointset/knee_r/knee_angle_r range=(-0.33161 0.17453)
      PathPoint P3: tibia_r (-0.0357467 -0.0568372 -0.0247873)
      PathPoint P4: tibia_r (-0.0121597 -0.0802743 -0.0265427)
      PathPoint P5: tibia_r (0.0029053 -0.102875 -0.0209089)
    Thelen2003Muscle bifemlh_r: max_isometric_force=8064 optimal_fiber_length=0.1093924 tendon_slack_length=0.3664515
        pennation_angle_at_optimal=0.20246 FmaxMuscleStrain=0.6 KshapeActive=0.3
      PathPoint P1: pelvis (-0.113753 -0.0926304 0.0744531)
      PathPoint P2: tibia_r (-0.0323895 -0.038738 0.0318835)
      PathPoint P3: tibia_r (-0.0251802 -0.0605819 0.0371588)
    Thelen2003Muscle bifemsh_r: max_isometric_force=7236 optimal_fiber_length=0.1189897 tendon_slack_length=0.163653
        pennation_angle_at_optimal=0.21468 FmaxMuscleStrain=0.6
      PathPoint P1: femur_r (0.00540047 -0.228004 0.0291636)
      PathPoint P2: tibia_r (-0.0323895 -0.038738 0.0318835)
      PathPoint P3: tibia_r (-0.0251802 -0.0605819 0.0371588)
    Thelen2003Muscle sar_r: max_isometric_force=1404 optimal_fiber_length=0.427539 tendon_slack_length=0.1485206
        pennation_angle_at_optimal=0.02269 FmaxMuscleStrain=0.6
      PathPoint P1: pelvis (-0.013817 -0.00117407 0.133169)
      PathPoint P2: femur_r (-0.00324028 -0.38538 -0.0524706)
      PathPoint P3: tibia_r (-0.00602595 -0.0450866 -0.0432257)
      PathPoint P4: tibia_r (0.00645631 -0.0633801 -0.0414924)
      PathPoint P5: tibia_r (0.0261484 -0.0903893 -0.0273011)
    Thelen2003Muscle add_long_r: max_isometric_force=5643 optimal_fiber_length=0.1184678 tendon_slack_length=0.153066
        pennation_angle_at_optimal=0.12391 FmaxMuscleStrain=0.6
      PathPoint P1: pelvis (-0.0285375 -0.0754982 0.0181206)
      PathPoint P2: femur_r (0.00540047 -0.228004 0.0291636)
    Thelen2003Muscle add_brev_r: max_isometric_force=3861 optimal_fiber_length=0.1159909 tendon_slack_length=0.05625334
        pennation_angle_at_optimal=0.10647 FmaxMuscleStrain=0.6
      PathPoint P1: pelvis (-0.0530117 -0.0826326 0.0175843)
      PathPoint P2: femur_r (0.000972076 -0.129181 0.0366419)
    Thelen2003Muscle add_mag1_r: max_isometric_force=3429 optimal_fiber_length=0.1012679 tendon_slack_length=0.0349201
        pennation_angle_at_optimal=0.2618 FmaxMuscleStrain=0.6
      PathPoint P1: pelvis (-0.0661064 -0.106022 0.0273409)
      PathPoint P2: femur_r (-0.00486043 -0.130797 0.0422504)
    Thelen2003Muscle add_mag2_r: max_isometric_force=3087 optimal_fiber_length=0.1368393 tendon_slack_length=0.1017778
        pennation_angle_at_optimal=0.2618 FmaxMuscleStrain=0.6
      PathPoint P1: pelvis (-0.0750465 -0.107649 0.0330236)
      PathPoint P2: femur_r (0.0058325 -0.246801 0.0282915)
    Thelen2003Muscle add_mag3_r: max_isometric_force=4392 optimal_fiber_length=0.1443641 tendon_slack_length=0.2743943
        pennation_angle_at_optimal=0.2618 FmaxMuscleStrain=0.6
      PathPoint P1: pelvis (-0.100316 -0.103069 0.0523447)
      PathPoint P2: femur_r (0.00756066 -0.414434 -0.0331525)
    Thelen2003Muscle tfl_r: max_isometric_force=2097 optimal_fiber_length=0.1003457 tendon_slack_length=0.4489118
        pennation_angle_at_optimal=0.05236 FmaxMuscleStrain=0.6
      PathPoint P1: pelvis (-0.0280858 0.0193257 0.133056)
      PathPoint P2: femur_r (0.0317552 -0.107464 0.0744052)
      PathPoint P3: femur_r (0.0058325 -0.437324 0.044494)
      PathPoint P4: tibia_r (0.0103733 -0.0206258 0.0389293)
      PathPoint P5: tibia_r (0.00645631 -0.0524043 0.0321755)
    Thelen2003Muscle pect_r: max_isometric_force=2394 optimal_fiber_length=0.1099331 tendon_slack_length=0.03627929
        pennation_angle_at_optimal=0 FmaxMuscleStrain=0.6
      PathPoint P1: pelvis (-0.0389231 -0.0693577 0.0483567)
      PathPoint P2: femur_r (-0.0131769 -0.0887835 0.0315318)
    Thelen2003Muscle grac_r: max_isometric_force=1458 optimal_fiber_length=0.2506591 tendon_slack_length=0.2753066
        pennation_angle_at_optimal=0.14312 FmaxMuscleStrain=0.6
      PathPoint P1: pelvis (-0.0668372 -0.107202 0.0299577)
      ConditionalPathPoint P2: tibia_r (-0.0285911 -0.0343259 -0.0408861)
          socket_coordinate=/jointset/knee_r/knee_angle_r range=(-0.43633 0.17453)
      PathPoint P3: tibia_r (-0.0209076 -0.0554496 -0.0387843)
      PathPoint P4: tibia_r (0.00645631 -0.0899583 -0.0247007)
    Thelen2003Muscle glut_max1_r: max_isometric_force=5157 optimal_fiber_length=0.1426571 tendon_slack_length=0.10046
        pennation_angle_at_optimal=0.087266 FmaxMuscleStrain=2.5
      PathPoint P1: pelvis (-0.107915 0.0552691 0.0750538)
      PathPoint P2: pelvis (-0.127485 -0.00213125 0.0927242)
      PathPoint P3: femur_r (-0.0832961 0.00427713 0.0298749)
      PathPoint P4: femur_r (-0.0686833 -0.0323159 0.0459518)
      PathPoint P5: femur_r (-0.0299188 -0.0611333 0.0585774)
    Thelen2003Muscle glut_max2_r: max_isometric_force=7371 optimal_fiber_length=0.1509849 tendon_slack_length=0.1098992
        pennation_angle_at_optimal=0 FmaxMuscleStrain=2.5
      PathPoint P1: pelvis (-0.121828 0.0158943 0.0603647)
      PathPoint P2: pelvis (-0.139811 -0.019787 0.0810262)
      PathPoint P3: femur_r (-0.0830375 -0.0210189 0.0188071)
      PathPoint P4: femur_r (-0.0644055 -0.0615325 0.0428115)
      PathPoint P5: femur_r (-0.0168491 -0.109738 0.0522214)
    Thelen2003Muscle glut_max3_r: max_isometric_force=4968 optimal_fiber_length=0.1521348 tendon_slack_length=0.1373498
        pennation_angle_at_optimal=0.523 FmaxMuscleStrain=2.5
      PathPoint P1: pelvis (-0.140524 -0.0283575 0.00621873)
      PathPoint P2: pelvis (-0.139576 -0.0891533 0.0541672)
      ConditionalPathPoint P3: pelvis (-0.0921148 -0.122105 0.0710648) socket_coordinate=/jointset/hip_r/hip_flexion_r
          range=(0.75049 1.7453)
      PathPoint P4: femur_r (-0.0621802 -0.0966244 -0.00181959)
      PathPoint P5: femur_r (-0.0450937 -0.117004 0.0153294)
      PathPoint P6: femur_r (-0.00648058 -0.153263 0.0512237)
    Thelen2003Muscle iliacus_r: max_isometric_force=9657 optimal_fiber_length=0.1021054 tendon_slack_length=0.1348564
        pennation_angle_at_optimal=0.25 FmaxMuscleStrain=0.42
      PathPoint P1: pelvis (-0.0608683 0.0329628 0.0915656)
      PathPoint P2: pelvis (-0.0137904 -0.0607149 0.0869555)
      ConditionalPathPoint P3: pelvis (-0.0164994 -0.0837437 0.0874918) socket_coordinate=/jointset/hip_r/hip_flexion_r
          range=(-1.5708 0.61087)
      PathPoint P4: femur_r (0.0132092 -0.0718585 0.00710403)
      PathPoint P5: femur_r (-0.0208459 -0.0670734 0.0160779)
    Thelen2003Muscle psoas_r: max_isometric_force=10017 optimal_fiber_length=0.1004908 tendon_slack_length=0.1866285
        pennation_angle_at_optimal=0.185 FmaxMuscleStrain=0.42
      PathPoint P1: pelvis (-0.0584298 0.0801046 0.030986)
      PathPoint P2: pelvis (-0.0108736 -0.0626293 0.0813803)
      ConditionalPathPoint P3: pelvis (-0.0153883 -0.0838524 0.0874918) socket_coordinate=/jointset/hip_r/hip_flexion_r
          range=(-1.5708 0.66323)
      PathPoint P4: femur_r (0.0144299 -0.0680991 0.00473605)
      PathPoint P5: femur_r (-0.0203054 -0.0644814 0.0129622)
    Thelen2003Muscle quad_fem_r: max_isometric_force=3429 optimal_fiber_length=0.06178714
        tendon_slack_length=0.02746083 pennation_angle_at_optimal=0 FmaxMuscleStrain=0.6
      PathPoint P1: pelvis (-0.103223 -0.103946 0.0557546)
      PathPoint P2: femur_r (-0.0411513 -0.0387756 0.0456153)
    Thelen2003Muscle gem_r: max_isometric_force=1476 optimal_fiber_length=0.02713695 tendon_slack_length=0.0440978
        pennation_angle_at_optimal=0 FmaxMuscleStrain=0.6
      PathPoint P1: pelvis (-0.10232 -0.0740536 0.0765551)
      PathPoint P2: femur_r (-0.0153373 -0.00356428 0.0552126)
    Thelen2003Muscle peri_r: max_isometric_force=3996 optimal_fiber_length=0.02719093 tendon_slack_length=0.1202706
        pennation_angle_at_optimal=0.17453 FmaxMuscleStrain=5
      PathPoint P1: pelvis (-0.126068 0.000270929 0.0251971)
      PathPoint P2: pelvis (-0.107734 -0.0249249 0.0704438)
      PathPoint P3: femur_r (-0.0159852 -0.00388836 0.054464)
    Thelen2003Muscle rect_fem_r: max_isometric_force=10521 optimal_fiber_length=0.1277992 tendon_slack_length=0.3674228
        pennation_angle_at_optimal=0.2426 FmaxMuscleStrain=0.6
      PathPoint P1: pelvis (-0.0266412 -0.0280858 0.103788)
      ConditionalPathPoint P2: femur_r (0.0328455 -0.434797 0.00255496) socket_coordinate=/jointset/knee_r/knee_angle_r
          range=(-2.7925 -1.46)
      MovingPathPoint P3: tibia_r socket_x_coordinate=/jointset/knee_r/knee_angle_r
          socket_y_coordinate=/jointset/knee_r/knee_angle_r socket_z_coordinate=/jointset/knee_r/knee_angle_r
        x_location: MultiplierFunction: scale=1.076069
          SimmSpline: x=(-2.0944 -2 -1.5708 -1.2882 -0.99101 -0.71974 -0.43723 -0.04248 0.40863 0.62692 0.73297)
              y=(-0.000189 0.002224 0.011737 0.017393 0.022498 0.026714 0.031087 0.034849 0.032975 0.028122 0.021101)
        y_location: MultiplierFunction: scale=1.076069
          SimmSpline: x=(-2.0944 -2 -1.5708 -1.4575 -1.3963 -0.91009 -0.17407 0.36671 0.76781 1.306 2.0944)
              y=(0.022415 0.022765 0.024126 0.024293 0.024329 0.022237 0.017842 0.013652 0.0092854 -0.00023045 -0.06562)
        z_location: MultiplierFunction: scale=1.083363
          SimmSpline: x=(-2.0944 0.1745) y=(0.0014 0.0014)
    Thelen2003Muscle vas_med_r: max_isometric_force=11646 optimal_fiber_length=0.1085154 tendon_slack_length=0.1247948
        pennation_angle_at_optimal=0.51662 FmaxMuscleStrain=5
      PathPoint P1: femur_r (0.0151211 -0.226711 0.0234306)
      PathPoint P2: femur_r (0.0384511 -0.299077 0.00112169)
      ConditionalPathPoint P3: femur_r (0.0370362 -0.435374 -0.0146319) socket_coordinate=/jointset/knee_r/knee_angle_r
          range=(-2.7925 -1.21)
      ConditionalPathPoint P4: femur_r (0.0302644 -0.451694 -0.0166763) socket_coordinate=/jointset/knee_r/knee_angle_r
          range=(-2.7925 -1.7802)
      MovingPathPoint P5: tibia_r socket_x_coordinate=/jointset/knee_r/knee_angle_r
          socket_y_coordinate=/jointset/knee_r/knee_angle_r socket_z_coordinate=/jointset/knee_r/knee_angle_r
        x_location: MultiplierFunction: scale=1.076069
          SimmSpline: x=(-2.0944 -2 -1.5708 -1.2882 -0.99101 -0.71974 -0.43723 -0.04248 0.40863 0.62692 0.73297)
              y=(-0.000189 0.002224 0.011737 0.017393 0.022498 0.026714 0.031087 0.034849 0.032975 0.028122 0.021101)
        y_location: MultiplierFunction: scale=1.076069
          SimmSpline: x=(-2.0944 -2 -1.5708 -1.4575 -1.3963 -0.91009 -0.17407 0.36671 0.76781 1.306 2.0944)
              y=(0.022415 0.022765 0.024126 0.024293 0.024329 0.022237 0.017842 0.013652 0.0092854 -0.00023045 -0.06562)
        z_location: MultiplierFunction: scale=1.083363
          SimmSpline: x=(-2.0944 2.0944) y=(-0.0146 -0.0146)
    Thelen2003Muscle vas_int_r: max_isometric_force=12285 optimal_fiber_length=0.09443013 tendon_slack_length=0.1476166
        pennation_angle_at_optimal=0.07854 FmaxMuscleStrain=5
      PathPoint P1: femur_r (0.0313227 -0.207813 0.0386363)
      PathPoint P2: femur_r (0.0361834 -0.225094 0.0355206)
      ConditionalPathPoint P3: femur_r (0.0335803 -0.434848 0.00143326) socket_coordinate=/jointset/knee_r/knee_angle_r
          range=(-2.7925 -1.3963)
      MovingPathPoint P4: tibia_r socket_x_coordinate=/jointset/knee_r/knee_angle_r
          socket_y_coordinate=/jointset/knee_r/knee_angle_r socket_z_coordinate=/jointset/knee_r/knee_angle_r
        x_location: MultiplierFunction: scale=1.076069
          SimmSpline: x=(-2.0944 -2 -1.5708 -1.2882 -0.99101 -0.71974 -0.43723 -0.04248 0.40863 0.62692 0.73297)
              y=(-0.000189 0.002224 0.011737 0.017393 0.022498 0.026714 0.031087 0.034849 0.032975 0.028122 0.021101)
        y_location: MultiplierFunction: scale=1.076069
          SimmSpline: x=(-2.0944 -2 -1.5708 -1.4575 -1.3963 -0.91009 -0.17407 0.36671 0.76781 1.306 2.0944)
              y=(0.022415 0.022765 0.024126 0.024293 0.024329 0.022237 0.017842 0.013652 0.0092854 -0.00023045 -0.06562)
        z_location: MultiplierFunction: scale=1.083363
          SimmSpline: x=(-2.0944 0.1745) y=(-0.0014 -0.0014)
    Thelen2003Muscle vas_lat_r: max_isometric_force=16839 optimal_fiber_length=0.1088308 tendon_slack_length=0.1534604
        pennation_angle_at_optimal=0.32114 FmaxMuscleStrain=5
      PathPoint P1: femur_r (0.00518442 -0.200244 0.0434963)
      PathPoint P2: femur_r (0.0290548 -0.279848 0.0509746)
      ConditionalPathPoint P3: femur_r (0.0374901 -0.413464 0.0278059) socket_coordinate=/jointset/knee_r/knee_angle_r
          range=(-2.7925 -1.0472)
      ConditionalPathPoint P4: femur_r (0.0313437 -0.448773 0.0223338) socket_coordinate=/jointset/knee_r/knee_angle_r
          range=(-2.7925 -1.5708)
      MovingPathPoint P5: tibia_r socket_x_coordinate=/jointset/knee_r/knee_angle_r
          socket_y_coordinate=/jointset/knee_r/knee_angle_r socket_z_coordinate=/jointset/knee_r/knee_angle_r
        x_location: MultiplierFunction: scale=1.076069
          SimmSpline: x=(-2.0944 -2 -1.5708 -1.2882 -0.99101 -0.71974 -0.43723 -0.04248 0.40863 0.62692 0.73297)
              y=(-0.000189 0.002224 0.011737 0.017393 0.022498 0.026714 0.031087 0.034849 0.032975 0.028122 0.021101)
        y_location: MultiplierFunction: scale=1.076069
          SimmSpline: x=(-2.0944 -2 -1.5708 -1.4575 -1.3963 -0.91009 -0.17407 0.36671 0.76781 1.306 2.0944)
              y=(0.022415 0.022765 0.024126 0.024293 0.024329 0.022237 0.017842 0.013652 0.0092854 -0.00023045 -0.06562)
        z_location: MultiplierFunction: scale=1.083363
          SimmSpline: x=(-2.0944 2.0944) y=(0.0165 0.0165)
    Thelen2003Muscle med_gas_r: max_isometric_force=14022 optimal_fiber_length=0.06477447 tendon_slack_length=0.4339868
        pennation_angle_at_optimal=0.35 FmaxTendonStrain=0.07 FmaxMuscleStrain=1.3
      PathPoint P1: femur_r (-0.00311063 -0.413706 -0.0321175)
      ConditionalPathPoint P2: femur_r (-0.0139326 -0.412888 -0.0312954)
          socket_coordinate=/jointset/knee_r/knee_angle_r range=(-1.6057 0.17453)
      ConditionalPathPoint P3: femur_r (-0.0276936 -0.417062 -0.030385) socket_coordinate=/jointset/knee_r/knee_angle_r
          range=(-1.2217 0.17453)
      ConditionalPathPoint P4: femur_r (-0.0371333 -0.424479 -0.030435) socket_coordinate=/jointset/knee_r/knee_angle_r
          range=(-0.87266 0.17453)
      ConditionalPathPoint P5: femur_r (-0.0398225 -0.434869 -0.0288644)
          socket_coordinate=/jointset/knee_r/knee_angle_r range=(-0.17453 0.17453)
      PathPoint P6: calcn_r (0 0.0321038 -0.0058173)
    Thelen2003Muscle lat_gas_r: max_isometric_force=6147 optimal_fiber_length=0.07015469 tendon_slack_length=0.4274061
        pennation_angle_at_optimal=0.21 FmaxTendonStrain=0.07 FmaxMuscleStrain=1.3
      PathPoint P1: femur_r (-0.00152294 -0.415374 0.0249512)
      ConditionalPathPoint P2: femur_r (-0.0103472 -0.413403 0.0245274) socket_coordinate=/jointset/knee_r/knee_angle_r
          range=(-1.7453 0.17453)
      ConditionalPathPoint P3: femur_r (-0.0240424 -0.414667 0.0238671) socket_coordinate=/jointset/knee_r/knee_angle_r
          range=(-1.3963 0.17453)
      ConditionalPathPoint P4: femur_r (-0.0342927 -0.419903 0.0230068) socket_coordinate=/jointset/knee_r/knee_angle_r
          range=(-1.0472 0.17453)
      ConditionalPathPoint P5: femur_r (-0.0395749 -0.425711 0.023618) socket_coordinate=/jointset/knee_r/knee_angle_r
          range=(-0.69813 0.17453)
      ConditionalPathPoint P6: femur_r (-0.0405572 -0.440355 0.0227331) socket_coordinate=/jointset/knee_r/knee_angle_r
          range=(0 0.17453)
      PathPoint P7: calcn_r (0 0.0321038 -0.0058173)
    Thelen2003Muscle soleus_r: max_isometric_force=31941 optimal_fiber_length=0.05401521 tendon_slack_length=0.2700807
        pennation_angle_at_optimal=0.576 FmaxTendonStrain=0.07 FmaxMuscleStrain=0.6
      PathPoint P1: tibia_r (-0.0025825 -0.164964 0.0076918)
      PathPoint P2: calcn_r (0 0.0321038 -0.0058173)
    Thelen2003Muscle tib_post_r: max_isometric_force=14292 optimal_fiber_length=0.0406091 tendon_slack_length=0.3257303
        pennation_angle_at_optimal=0.24435 FmaxMuscleStrain=0.6
      PathPoint P1: tibia_r (-0.0101149 -0.145053 0.00205836)
      PathPoint P2: tibia_r (-0.0154952 -0.435914 -0.0248084)
      PathPoint P3: calcn_r (0.0431848 0.0345886 -0.0313914)
      PathPoint P4: calcn_r (0.0799483 0.0164664 -0.030843)
    Thelen2003Muscle flex_dig_r: max_isometric_force=2790 optimal_fiber_length=0.04779955 tendon_slack_length=0.4131974
        pennation_angle_at_optimal=0.24435 FmaxMuscleStrain=0.6
      PathPoint P1: tibia_r (-0.00893126 -0.220163 -0.00195009)
      PathPoint P2: tibia_r (-0.0165708 -0.435914 -0.0212342)
      PathPoint P3: calcn_r (0.0451528 0.0326216 -0.0307326)
      PathPoint P4: calcn_r (0.0733204 0.0182267 -0.0288665)
      PathPoint P5: calcn_r (0.171706 -0.00838835 0.0127319)
      PathPoint P6: toes_r (-0.0019677 -0.00807773 0.0161346)
      PathPoint P7: toes_r (0.0295143 -0.00735281 0.0235987)
      PathPoint P8: toes_r (0.0456697 -0.00621361 0.0265616)
    Thelen2003Muscle flex_hal_r: max_isometric_force=2898 optimal_fiber_length=0.05580465 tendon_slack_length=0.3917936
        pennation_angle_at_optimal=0.2967 FmaxMuscleStrain=0.6
      PathPoint P1: tibia_r (-0.00850088 -0.251152 0.0264339)
      PathPoint P2: tibia_r (-0.0200148 -0.438922 -0.0188503)
      PathPoint P3: calcn_r (0.0387317 0.0285831 -0.0264521)
      PathPoint P4: calcn_r (0.107495 0.00704209 -0.0280982)
      PathPoint P5: calcn_r (0.178747 -0.00548869 -0.0295253)
      PathPoint P6: toes_r (0.0160518 -0.0066279 -0.0290864)
      PathPoint P7: toes_r (0.0582008 -0.0105633 -0.0198667)
    Thelen2003Muscle tib_ant_r: max_isometric_force=8145 optimal_fiber_length=0.07496012 tendon_slack_length=0.268781
        pennation_angle_at_optimal=0.17453 FmaxMuscleStrain=0.6
      PathPoint P1: tibia_r (0.0192616 -0.17475 0.0124591)
      PathPoint P2: tibia_r (0.0354026 -0.425148 -0.0191756)
      PathPoint P3: calcn_r (0.120748 0.0184334 -0.0334764)
    Thelen2003Muscle per_brev_r: max_isometric_force=3915 optimal_fiber_length=0.05359904 tendon_slack_length=0.1725944
        pennation_angle_at_optimal=0.2 FmaxMuscleStrain=0.6
      PathPoint P1: tibia_r (-0.00753238 -0.284723 0.035209)
      PathPoint P2: tibia_r (-0.0213064 -0.450226 0.0306588)
      PathPoint P3: tibia_r (-0.0154952 -0.46217 0.0313094)
      PathPoint P4: calcn_r (0.0487769 0.0279608 0.0255743)
      PathPoint P5: calcn_r (0.0701109 0.0226798 0.0376474)
    Thelen2003Muscle per_long_r: max_isometric_force=8487 optimal_fiber_length=0.05247718 tendon_slack_length=0.369483
        pennation_angle_at_optimal=0.2618 FmaxMuscleStrain=0.6
      PathPoint P1: tibia_r (0.000538025 -0.168727 0.0392173)
      PathPoint P2: tibia_r (-0.0222747 -0.452479 0.0309841)
      PathPoint P3: tibia_r (-0.0174326 -0.464754 0.0313094)
      PathPoint P4: calcn_r (0.0453596 0.0238188 0.0242566)
      PathPoint P5: calcn_r (0.0705242 0.0109776 0.0311715)
      PathPoint P6: calcn_r (0.0882332 0.00714566 0.0129518)
      PathPoint P7: calcn_r (0.12458 0.00880264 -0.0201961)
    Thelen2003Muscle per_tert_r: max_isometric_force=1620 optimal_fiber_length=0.08509266 tendon_slack_length=0.1077151
        pennation_angle_at_optimal=0.22689 FmaxMuscleStrain=0.6
      PathPoint P1: tibia_r (0.00107607 -0.301731 0.025026)
      PathPoint P2: tibia_r (0.0246418 -0.437848 0.0172258)
      PathPoint P3: calcn_r (0.0887509 0.0236122 0.0328185)
    Thelen2003Muscle ext_dig_r: max_isometric_force=4608 optimal_fiber_length=0.07448783 tendon_slack_length=0.4011676
        pennation_angle_at_optimal=0.2 FmaxMuscleStrain=0.6
      PathPoint P1: tibia_r (0.00344334 -0.148608 0.0299004)
      PathPoint P2: tibia_r (0.0310979 -0.431172 0.00780017)
      PathPoint P3: calcn_r (0.0954822 0.040182 -0.000109763)
      PathPoint P4: calcn_r (0.167356 0.00569584 0.0142686)
      PathPoint P5: toes_r (0.000310681 0.00486735 0.0167934)
      PathPoint P6: toes_r (0.0458775 -0.000414243 0.0274403)
    Thelen2003Muscle ext_hal_r: max_isometric_force=1458 optimal_fiber_length=0.09030095 tendon_slack_length=0.3516459
        pennation_angle_at_optimal=0.17453 FmaxMuscleStrain=0.6
      PathPoint P1: tibia_r (0.0012913 -0.190136 0.0247007)
      PathPoint P2: tibia_r (0.0350792 -0.428806 -0.00920854)
      PathPoint P3: calcn_r (0.100454 0.0402853 -0.0231598)
      PathPoint P4: calcn_r (0.133903 0.0320005 -0.0282086)
      PathPoint P5: calcn_r (0.179575 0.0143949 -0.0307326)
      PathPoint P6: toes_r (0.0308613 0.00424601 -0.026891)
      PathPoint P7: toes_r (0.0583041 0.00352109 -0.0204151)
    Thelen2003Muscle glut_med1_l: max_isometric_force=7371 optimal_fiber_length=0.05098474
        tendon_slack_length=0.07433267 pennation_angle_at_optimal=0.13963 FmaxMuscleStrain=2
      PathPoint P1: pelvis (-0.0368458 0.0274541 -0.129628)
      PathPoint P2: femur_l (-0.0235463 -0.0126371 -0.0691714)
    Thelen2003Muscle glut_med2_l: max_isometric_force=5157 optimal_fiber_length=0.08350226
        tendon_slack_length=0.05237461 pennation_angle_at_optimal=0 FmaxMuscleStrain=2
      PathPoint P1: pelvis (-0.0772144 0.0401877 -0.0821303)
      PathPoint P2: femur_l (-0.0278664 -0.00626451 -0.065681)
    Thelen2003Muscle glut_med3_l: max_isometric_force=5877 optimal_fiber_length=0.0668177
        tendon_slack_length=0.05481959 pennation_angle_at_optimal=0.3578 FmaxMuscleStrain=2
      PathPoint P1: pelvis (-0.110451 0.00948249 -0.0694788)
      PathPoint P2: femur_l (-0.0333749 -0.00507639 -0.0645597)
    Thelen2003Muscle glut_min1_l: max_isometric_force=2430 optimal_fiber_length=0.06916473
        tendon_slack_length=0.01627405 pennation_angle_at_optimal=0.17453 FmaxMuscleStrain=0.6
      PathPoint P1: pelvis (-0.0421745 -0.00722468 -0.113224)
      PathPoint P2: femur_l (-0.00777663 -0.0112325 -0.0697944)
    Thelen2003Muscle glut_min2_l: max_isometric_force=2565 optimal_fiber_length=0.06483045
        tendon_slack_length=0.02022678 pennation_angle_at_optimal=0 FmaxMuscleStrain=0.6
      PathPoint P1: pelvis (-0.0571653 -0.00587004 -0.106255)
      PathPoint P2: femur_l (-0.0103685 -0.0112325 -0.0697944)
    Thelen2003Muscle glut_min3_l: max_isometric_force=2907 optimal_fiber_length=0.04031385
        tendon_slack_length=0.05410613 pennation_angle_at_optimal=0.017453 FmaxMuscleStrain=0.6
      PathPoint P1: pelvis (-0.0753181 -0.00568947 -0.0917806)
      PathPoint P2: femur_l (-0.0145815 -0.00896475 -0.0685475)
    Thelen2003Muscle semimem_l: max_isometric_force=11592 optimal_fiber_length=0.08741817 tendon_slack_length=0.3759005
        pennation_angle_at_optimal=0.2618 FmaxMuscleStrain=0.6 KshapeActive=0.3
      PathPoint P1: pelvis (-0.107649 -0.0880241 -0.0766728)
      ConditionalPathPoint P2: tibia_l (-0.0374466 -0.0378669 0.0204859)
          socket_coordinate=/jointset/knee_l/knee_angle_l range=(-0.55851 0.17453)
      PathPoint P3: tibia_l (-0.029054 -0.051339 0.0212009)
    Thelen2003Muscle semiten_l: max_isometric_force=3690 optimal_fiber_length=0.2202157 tendon_slack_length=0.3018402
        pennation_angle_at_optimal=0.2269 FmaxMuscleStrain=0.6 KshapeActive=0.3
      PathPoint P1: pelvis (-0.114105 -0.099231 -0.0647497)
      ConditionalPathPoint P2: tibia_l (-0.045227 -0.0307642 0.0246684) socket_coordinate=/jointset/knee_l/knee_angle_l
          range=(-0.33161 0.17453)
      PathPoint P3: tibia_l (-0.0357467 -0.0568372 0.0247873)
      PathPoint P4: tibia_l (-0.0121597 -0.0802743 0.0265427)
      PathPoint P5: tibia_l (0.0029053 -0.102875 0.0209089)
    Thelen2003Muscle bifemlh_l: max_isometric_force=8064 optimal_fiber_length=0.1093924 tendon_slack_length=0.3664515
        pennation_angle_at_optimal=0.20246 FmaxMuscleStrain=0.6 KshapeActive=0.3
      PathPoint P1: pelvis (-0.113753 -0.0926304 -0.0744531)
      PathPoint P2: tibia_l (-0.0323895 -0.038738 -0.0318835)
      PathPoint P3: tibia_l (-0.0251802 -0.0605819 -0.0371588)
    Thelen2003Muscle bifemsh_l: max_isometric_force=7236 optimal_fiber_length=0.1189897 tendon_slack_length=0.163653
        pennation_angle_at_optimal=0.21468 FmaxMuscleStrain=0.6
      PathPoint P1: femur_l (0.00540047 -0.228004 -0.0291636)
      PathPoint P2: tibia_l (-0.0323895 -0.038738 -0.0318835)
      PathPoint P3: tibia_l (-0.0251802 -0.0605819 -0.0371588)
    Thelen2003Muscle sar_l: max_isometric_force=1404 optimal_fiber_length=0.427539 tendon_slack_length=0.1485206
        pennation_angle_at_optimal=0.02269 FmaxMuscleStrain=0.6
      PathPoint P1: pelvis (-0.013817 -0.00117407 -0.133169)
      PathPoint P2: femur_l (-0.00324028 -0.38538 0.0524706)
      PathPoint P3: tibia_l (-0.00602595 -0.0450866 0.0432257)
      PathPoint P4: tibia_l (0.00645631 -0.0633801 0.0414924)
      PathPoint P5: tibia_l (0.0261484 -0.0903893 0.0273011)
    Thelen2003Muscle add_long_l: max_isometric_force=5643 optimal_fiber_length=0.1184678 tendon_slack_length=0.153066
        pennation_angle_at_optimal=0.12391 FmaxMuscleStrain=0.6
      PathPoint P1: pelvis (-0.0285375 -0.0754982 -0.0181206)
      PathPoint P2: femur_l (0.00540047 -0.228004 -0.0291636)
    Thelen2003Muscle add_brev_l: max_isometric_force=3861 optimal_fiber_length=0.1159909 tendon_slack_length=0.05625334
        pennation_angle_at_optimal=0.10647 FmaxMuscleStrain=0.6
      PathPoint P1: pelvis (-0.0530117 -0.0826326 -0.0175843)
      PathPoint P2: femur_l (0.000972076 -0.129181 -0.0366419)
    Thelen2003Muscle add_mag1_l: max_isometric_force=3429 optimal_fiber_length=0.1012679 tendon_slack_length=0.0349201
        pennation_angle_at_optimal=0.2618 FmaxMuscleStrain=0.6
      PathPoint P1: pelvis (-0.0661064 -0.106022 -0.0273409)
      PathPoint P2: femur_l (-0.00486043 -0.130797 -0.0422504)
    Thelen2003Muscle add_mag2_l: max_isometric_force=3087 optimal_fiber_length=0.1368393 tendon_slack_length=0.1017778
        pennation_angle_at_optimal=0.2618 FmaxMuscleStrain=0.6
      PathPoint P1: pelvis (-0.0750465 -0.107649 -0.0330236)
      PathPoint P2: femur_l (0.0058325 -0.246801 -0.0282915)
    Thelen2003Muscle add_mag3_l: max_isometric_force=4392 optimal_fiber_length=0.1443641 tendon_slack_length=0.2743943
        pennation_angle_at_optimal=0.2618 FmaxMuscleStrain=0.6
      PathPoint P1: pelvis (-0.100316 -0.103069 -0.0523447)
      PathPoint P2: femur_l (0.00756066 -0.414434 0.0331525)
    Thelen2003Muscle tfl_l: max_isometric_force=2097 optimal_fiber_length=0.1003467 tendon_slack_length=0.4489218
        pennation_angle_at_optimal=0.05236 FmaxMuscleStrain=0.6
      PathPoint P1: pelvis (-0.0280858 0.0193257 -0.133056)
      PathPoint P2: femur_l (0.0317552 -0.107464 -0.0744052)
      PathPoint P3: femur_l (0.0058325 -0.437324 -0.044494)
      PathPoint P4: tibia_l (0.0103733 -0.0206277 -0.0389253)
      PathPoint P5: tibia_l (0.00645631 -0.0524043 -0.0321755)
    Thelen2003Muscle pect_l: max_isometric_force=2394 optimal_fiber_length=0.1099331 tendon_slack_length=0.03627929
        pennation_angle_at_optimal=0 FmaxMuscleStrain=0.6
      PathPoint P1: pelvis (-0.0389231 -0.0693577 -0.0483567)
      PathPoint P2: femur_l (-0.0131769 -0.0887835 -0.0315318)
    Thelen2003Muscle grac_l: max_isometric_force=1458 optimal_fiber_length=0.2506591 tendon_slack_length=0.2753066
        pennation_angle_at_optimal=0.14312 FmaxMuscleStrain=0.6
      PathPoint P1: pelvis (-0.0668372 -0.107202 -0.0299577)
      ConditionalPathPoint P2: tibia_l (-0.0285911 -0.0343259 0.0408861)
          socket_coordinate=/jointset/knee_l/knee_angle_l range=(-0.43633 0.17453)
      PathPoint P3: tibia_l (-0.0209076 -0.0554496 0.0387843)
      PathPoint P4: tibia_l (0.00645631 -0.0899583 0.0247007)
    Thelen2003Muscle glut_max1_l: max_isometric_force=5157 optimal_fiber_length=0.1426571 tendon_slack_length=0.10046
        pennation_angle_at_optimal=0.087266 FmaxMuscleStrain=2.5
      PathPoint P1: pelvis (-0.107915 0.0552691 -0.0750538)
      PathPoint P2: pelvis (-0.127485 -0.00213125 -0.0927242)
      PathPoint P3: femur_l (-0.0832961 0.00427713 -0.0298749)
      PathPoint P4: femur_l (-0.0686833 -0.0323159 -0.0459518)
      PathPoint P5: femur_l (-0.0299188 -0.0611333 -0.0585774)
    Thelen2003Muscle glut_max2_l: max_isometric_force=7371 optimal_fiber_length=0.1509849 tendon_slack_length=0.1098992
        pennation_angle_at_optimal=0 FmaxMuscleStrain=2.5
      PathPoint P1: pelvis (-0.121828 0.0158943 -0.0603647)
      PathPoint P2: pelvis (-0.139811 -0.019787 -0.0810262)
      PathPoint P3: femur_l (-0.0830375 -0.0210189 -0.0188071)
      PathPoint P4: femur_l (-0.0644055 -0.0615325 -0.0428115)
      PathPoint P5: femur_l (-0.0168491 -0.109738 -0.0522214)
    Thelen2003Muscle glut_max3_l: max_isometric_force=4968 optimal_fiber_length=0.1521348 tendon_slack_length=0.1373498
        pennation_angle_at_optimal=0.523 FmaxMuscleStrain=2.5
      PathPoint P1: pelvis (-0.140524 -0.0283575 -0.00621873)
      PathPoint P2: pelvis (-0.139576 -0.0891533 -0.0541672)
      ConditionalPathPoint P3: pelvis (-0.0921148 -0.122105 -0.0710648) socket_coordinate=/jointset/hip_l/hip_flexion_l
          range=(0.75049 1.7453)
      PathPoint P4: femur_l (-0.0621802 -0.0966244 0.00181959)
      PathPoint P5: femur_l (-0.0450937 -0.117004 -0.0153294)
      PathPoint P6: femur_l (-0.00648058 -0.153263 -0.0512237)
    Thelen2003Muscle iliacus_l: max_isometric_force=9657 optimal_fiber_length=0.1021054 tendon_slack_length=0.1348564
        pennation_angle_at_optimal=0.25 FmaxMuscleStrain=0.42
      PathPoint P1: pelvis (-0.0608683 0.0329628 -0.0915656)
      PathPoint P2: pelvis (-0.0137904 -0.0607149 -0.0869555)
      ConditionalPathPoint P3: pelvis (-0.0164994 -0.0837437 -0.0874918)
          socket_coordinate=/jointset/hip_l/hip_flexion_l range=(-1.5708 0.61087)
      PathPoint P4: femur_l (0.0132092 -0.0718585 -0.00710403)
      PathPoint P5: femur_l (-0.0208459 -0.0670734 -0.0160779)
    Thelen2003Muscle psoas_l: max_isometric_force=10017 optimal_fiber_length=0.1004908 tendon_slack_length=0.1866285
        pennation_angle_at_optimal=0.185 FmaxMuscleStrain=0.42
      PathPoint P1: pelvis (-0.0584298 0.0801046 -0.030986)
      PathPoint P2: pelvis (-0.0108736 -0.0626293 -0.0813803)
      ConditionalPathPoint P3: pelvis (-0.0153883 -0.0838524 -0.0874918)
          socket_coordinate=/jointset/hip_l/hip_flexion_l range=(-1.5708 0.66323)
      PathPoint P4: femur_l (0.0144299 -0.0680991 -0.00473605)
      PathPoint P5: femur_l (-0.0203054 -0.0644814 -0.0129622)
    Thelen2003Muscle quad_fem_l: max_isometric_force=3429 optimal_fiber_length=0.06178714
        tendon_slack_length=0.02746083 pennation_angle_at_optimal=0 FmaxMuscleStrain=0.6
      PathPoint P1: pelvis (-0.103223 -0.103946 -0.0557546)
      PathPoint P2: femur_l (-0.0411513 -0.0387756 -0.0456153)
    Thelen2003Muscle gem_l: max_isometric_force=1476 optimal_fiber_length=0.02713695 tendon_slack_length=0.0440978
        pennation_angle_at_optimal=0 FmaxMuscleStrain=0.6
      PathPoint P1: pelvis (-0.10232 -0.0740536 -0.0765551)
      PathPoint P2: femur_l (-0.0153373 -0.00356428 -0.0552126)
    Thelen2003Muscle peri_l: max_isometric_force=3996 optimal_fiber_length=0.02719093 tendon_slack_length=0.1202706
        pennation_angle_at_optimal=0.17453 FmaxMuscleStrain=5
      PathPoint P1: pelvis (-0.126068 0.000270929 -0.0251971)
      PathPoint P2: pelvis (-0.107734 -0.0249249 -0.0704438)
      PathPoint P3: femur_l (-0.0159852 -0.00388836 -0.054464)
    Thelen2003Muscle rect_fem_l: max_isometric_force=10521 optimal_fiber_length=0.1277992 tendon_slack_length=0.3674228
        pennation_angle_at_optimal=0.2426 FmaxMuscleStrain=0.6
      PathPoint P1: pelvis (-0.0266412 -0.0280858 -0.103788)
      ConditionalPathPoint P2: femur_l (0.0328455 -0.434797 -0.00255496)
          socket_coordinate=/jointset/knee_l/knee_angle_l range=(-2.7925 -1.46)
      MovingPathPoint P3: tibia_l socket_x_coordinate=/jointset/knee_l/knee_angle_l
          socket_y_coordinate=/jointset/knee_l/knee_angle_l socket_z_coordinate=/jointset/knee_l/knee_angle_l
        x_location: MultiplierFunction: scale=1.076069
          SimmSpline: x=(-2.0944 -2 -1.5708 -1.2882 -0.99101 -0.71974 -0.43723 -0.04248 0.40863 0.62692 0.73297)
              y=(-0.000189 0.002224 0.011737 0.017393 0.022498 0.026714 0.031087 0.034849 0.032975 0.028122 0.021101)
        y_location: MultiplierFunction: scale=1.076069
          SimmSpline: x=(-2.0944 -2 -1.5708 -1.4575 -1.3963 -0.91009 -0.17407 0.36671 0.76781 1.306 2.0944)
              y=(0.022415 0.022765 0.024126 0.024293 0.024329 0.022237 0.017842 0.013652 0.0092854 -0.00023045 -0.06562)
        z_location: MultiplierFunction: scale=1.083363
          SimmSpline: x=(-2.0944 0.1745) y=(-0.0014 -0.0014)
    Thelen2003Muscle vas_med_l: max_isometric_force=11646 optimal_fiber_length=0.1085154 tendon_slack_length=0.1247948
        pennation_angle_at_optimal=0.51662 FmaxMuscleStrain=5
      PathPoint P1: femur_l (0.0151211 -0.226711 -0.0234306)
      PathPoint P2: femur_l (0.0384511 -0.299077 -0.00112169)
      ConditionalPathPoint P3: femur_l (0.0370362 -0.435374 0.0146319) socket_coordinate=/jointset/knee_l/knee_angle_l
          range=(-2.7925 -1.21)
      ConditionalPathPoint P4: femur_l (0.0302644 -0.451694 0.0166763) socket_coordinate=/jointset/knee_l/knee_angle_l
          range=(-2.7925 -1.7802)
      MovingPathPoint P5: tibia_l socket_x_coordinate=/jointset/knee_l/knee_angle_l
          socket_y_coordinate=/jointset/knee_l/knee_angle_l socket_z_coordinate=/jointset/knee_l/knee_angle_l
        x_location: MultiplierFunction: scale=1.076069
          SimmSpline: x=(-2.0944 -2 -1.5708 -1.2882 -0.99101 -0.71974 -0.43723 -0.04248 0.40863 0.62692 0.73297)
              y=(-0.000189 0.002224 0.011737 0.017393 0.022498 0.026714 0.031087 0.034849 0.032975 0.028122 0.021101)
        y_location: MultiplierFunction: scale=1.076069
          SimmSpline: x=(-2.0944 -2 -1.5708 -1.4575 -1.3963 -0.91009 -0.17407 0.36671 0.76781 1.306 2.0944)
              y=(0.022415 0.022765 0.024126 0.024293 0.024329 0.022237 0.017842 0.013652 0.0092854 -0.00023045 -0.06562)
        z_location: MultiplierFunction: scale=1.083363
          SimmSpline: x=(-2.0944 2.0944) y=(0.0146 0.0146)
    Thelen2003Muscle vas_int_l: max_isometric_force=12285 optimal_fiber_length=0.09439627 tendon_slack_length=0.147564
        pennation_angle_at_optimal=0.07854 FmaxMuscleStrain=5
      PathPoint P1: femur_l (0.0313227 -0.207813 -0.0386363)
      PathPoint P2: femur_l (0.0361834 -0.225094 -0.0355206)
      ConditionalPathPoint P3: femur_l (0.0335803 -0.434848 -0.00143326)
          socket_coordinate=/jointset/knee_l/knee_angle_l range=(-2.7925 -1.3963)
      MovingPathPoint P4: tibia_l socket_x_coordinate=/jointset/knee_l/knee_angle_l
          socket_y_coordinate=/jointset/knee_l/knee_angle_l socket_z_coordinate=/jointset/knee_l/knee_angle_l
        x_location: MultiplierFunction: scale=1.076069
          SimmSpline: x=(-2.0944 -2 -1.5708 -1.2882 -0.99101 -0.71974 -0.43723 -0.04248 0.40863 0.62692 0.73297)
              y=(-0.000189 0.002224 0.011737 0.017393 0.022498 0.026714 0.031087 0.034849 0.032975 0.028122 0.021101)
        y_location: MultiplierFunction: scale=1.076069
          SimmSpline: x=(-2.0944 -2 -1.5708 -1.4575 -1.3963 -0.91009 -0.17407 0.36671 0.76781 1.306 2.0944)
              y=(0.022415 0.022765 0.024126 0.024293 0.024329 0.022237 0.017842 0.013652 0.0092854 -0.00023045 -0.06562)
        z_location: MultiplierFunction: scale=1.083363
          SimmSpline: x=(-2.0944 0.1745) y=(-0.0014 -0.0014)
    Thelen2003Muscle vas_lat_l: max_isometric_force=16839 optimal_fiber_length=0.1088308 tendon_slack_length=0.1534604
        pennation_angle_at_optimal=0.32114 FmaxMuscleStrain=5
      PathPoint P1: femur_l (0.00518442 -0.200244 -0.0434963)
      PathPoint P2: femur_l (0.0290548 -0.279848 -0.0509746)
      ConditionalPathPoint P3: femur_l (0.0374901 -0.413464 -0.0278059) socket_coordinate=/jointset/knee_l/knee_angle_l
          range=(-2.7925 -1.0472)
      ConditionalPathPoint P4: femur_l (0.0313437 -0.448773 -0.0223338) socket_coordinate=/jointset/knee_l/knee_angle_l
          range=(-2.7925 -1.5708)
      MovingPathPoint P5: tibia_l socket_x_coordinate=/jointset/knee_l/knee_angle_l
          socket_y_coordinate=/jointset/knee_l/knee_angle_l socket_z_coordinate=/jointset/knee_l/knee_angle_l
        x_location: MultiplierFunction: scale=1.076069
          SimmSpline: x=(-2.0944 -2 -1.5708 -1.2882 -0.99101 -0.71974 -0.43723 -0.04248 0.40863 0.62692 0.73297)
              y=(-0.000189 0.002224 0.011737 0.017393 0.022498 0.026714 0.031087 0.034849 0.032975 0.028122 0.021101)
        y_location: MultiplierFunction: scale=1.076069
          SimmSpline: x=(-2.0944 -2 -1.5708 -1.4575 -1.3963 -0.91009 -0.17407 0.36671 0.76781 1.306 2.0944)
              y=(0.022415 0.022765 0.024126 0.024293 0.024329 0.022237 0.017842 0.013652 0.0092854 -0.00023045 -0.06562)
        z_location: MultiplierFunction: scale=1.083363
          SimmSpline: x=(-2.0944 2.0944) y=(-0.0165 -0.0165)
    Thelen2003Muscle med_gas_l: max_isometric_force=14022 optimal_fiber_length=0.06477447 tendon_slack_length=0.4339868
        pennation_angle_at_optimal=0.35 FmaxTendonStrain=0.07 FmaxMuscleStrain=1.3
      PathPoint P1: femur_l (-0.00311063 -0.413706 0.0321175)
      ConditionalPathPoint P2: femur_l (-0.0139326 -0.412888 0.0312954) socket_coordinate=/jointset/knee_l/knee_angle_l
          range=(-1.6057 0.17453)
      ConditionalPathPoint P3: femur_l (-0.0276936 -0.417062 0.030385) socket_coordinate=/jointset/knee_l/knee_angle_l
          range=(-1.2217 0.17453)
      ConditionalPathPoint P4: femur_l (-0.0371333 -0.424479 0.030435) socket_coordinate=/jointset/knee_l/knee_angle_l
          range=(-0.87266 0.17453)
      ConditionalPathPoint P5: femur_l (-0.0398225 -0.434869 0.0288644) socket_coordinate=/jointset/knee_l/knee_angle_l
          range=(-0.17453 0.17453)
      PathPoint P6: calcn_l (0 0.0321038 0.0058173)
    Thelen2003Muscle lat_gas_l: max_isometric_force=6147 optimal_fiber_length=0.07015469 tendon_slack_length=0.4274061
        pennation_angle_at_optimal=0.21 FmaxTendonStrain=0.07 FmaxMuscleStrain=1.3
      PathPoint P1: femur_l (-0.00152294 -0.415374 -0.0249512)
      ConditionalPathPoint P2: femur_l (-0.0103472 -0.413403 -0.0245274)
          socket_coordinate=/jointset/knee_l/knee_angle_l range=(-1.7453 0.17453)
      ConditionalPathPoint P3: femur_l (-0.0240424 -0.414667 -0.0238671)
          socket_coordinate=/jointset/knee_l/knee_angle_l range=(-1.3963 0.17453)
      ConditionalPathPoint P4: femur_l (-0.0342927 -0.419903 -0.0230068)
          socket_coordinate=/jointset/knee_l/knee_angle_l range=(-1.0472 0.17453)
      ConditionalPathPoint P5: femur_l (-0.0395749 -0.425711 -0.023618) socket_coordinate=/jointset/knee_l/knee_angle_l
          range=(-0.69813 0.17453)
      ConditionalPathPoint P6: femur_l (-0.0405572 -0.440355 -0.0227331)
          socket_coordinate=/jointset/knee_l/knee_angle_l range=(0 0.17453)
      PathPoint P7: calcn_l (0 0.0321038 0.0058173)
    Thelen2003Muscle soleus_l: max_isometric_force=31941 optimal_fiber_length=0.05401521 tendon_slack_length=0.2700807
        pennation_angle_at_optimal=0.576 FmaxTendonStrain=0.07 FmaxMuscleStrain=0.6
      PathPoint P1: tibia_l (-0.0025825 -0.164964 -0.0076918)
      PathPoint P2: calcn_l (0 0.0321038 0.0058173)
    Thelen2003Muscle tib_post_l: max_isometric_force=14292 optimal_fiber_length=0.0406091 tendon_slack_length=0.3257303
        pennation_angle_at_optimal=0.24435 FmaxMuscleStrain=0.6
      PathPoint P1: tibia_l (-0.0101149 -0.145053 -0.00205836)
      PathPoint P2: tibia_l (-0.0154952 -0.435914 0.0248084)
      PathPoint P3: calcn_l (0.0431848 0.0345886 0.0313914)
      PathPoint P4: calcn_l (0.0799483 0.0164664 0.030843)
    Thelen2003Muscle flex_dig_l: max_isometric_force=2790 optimal_fiber_length=0.04779955 tendon_slack_length=0.4131974
        pennation_angle_at_optimal=0.24435 FmaxMuscleStrain=0.6
      PathPoint P1: tibia_l (-0.00893126 -0.220163 0.00195009)
      PathPoint P2: tibia_l (-0.0165708 -0.435914 0.0212342)
      PathPoint P3: calcn_l (0.0451528 0.0326216 0.0307326)
      PathPoint P4: calcn_l (0.0733204 0.0182267 0.0288665)
      PathPoint P5: calcn_l (0.171706 -0.00838835 -0.0127319)
      PathPoint P6: toes_l (-0.0019677 -0.00807773 -0.0161346)
      PathPoint P7: toes_l (0.0295143 -0.00735281 -0.0235987)
      PathPoint P8: toes_l (0.0456697 -0.00621361 -0.0265616)
    Thelen2003Muscle flex_hal_l: max_isometric_force=2898 optimal_fiber_length=0.05580465 tendon_slack_length=0.3917936
        pennation_angle_at_optimal=0.2967 FmaxMuscleStrain=0.6
      PathPoint P1: tibia_l (-0.00850088 -0.251152 -0.0264339)
      PathPoint P2: tibia_l (-0.0200148 -0.438922 0.0188503)
      PathPoint P3: calcn_l (0.0387317 0.0285831 0.0264521)
      PathPoint P4: calcn_l (0.107495 0.00704209 0.0280982)
      PathPoint P5: calcn_l (0.178747 -0.00548869 0.0295253)
      PathPoint P6: toes_l (0.0160518 -0.0066279 0.0290864)
      PathPoint P7: toes_l (0.0582008 -0.0105633 0.0198667)
    Thelen2003Muscle tib_ant_l: max_isometric_force=8145 optimal_fiber_length=0.07496012 tendon_slack_length=0.268781
        pennation_angle_at_optimal=0.17453 FmaxMuscleStrain=0.6
      PathPoint P1: tibia_l (0.0192616 -0.17475 -0.0124591)
      PathPoint P2: tibia_l (0.0354026 -0.425148 0.0191756)
      PathPoint P3: calcn_l (0.120748 0.0184334 0.0334764)
    Thelen2003Muscle per_brev_l: max_isometric_force=3915 optimal_fiber_length=0.05359904 tendon_slack_length=0.1725944
        pennation_angle_at_optimal=0.2 FmaxMuscleStrain=0.6
      PathPoint P1: tibia_l (-0.00753238 -0.284723 -0.035209)
      PathPoint P2: tibia_l (-0.0213064 -0.450226 -0.0306588)
      PathPoint P3: tibia_l (-0.0154952 -0.46217 -0.0313094)
      PathPoint P4: calcn_l (0.0487769 0.0279608 -0.0255743)
      PathPoint P5: calcn_l (0.0701109 0.0226798 -0.0376474)
    Thelen2003Muscle per_long_l: max_isometric_force=8487 optimal_fiber_length=0.05247718 tendon_slack_length=0.369483
        pennation_angle_at_optimal=0.2618 FmaxMuscleStrain=0.6
      PathPoint P1: tibia_l (0.000538025 -0.168727 -0.0392173)
      PathPoint P2: tibia_l (-0.0222747 -0.452479 -0.0309841)
      PathPoint P3: tibia_l (-0.0174326 -0.464754 -0.0313094)
      PathPoint P4: calcn_l (0.0453596 0.0238188 -0.0242566)
      PathPoint P5: calcn_l (0.0705242 0.0109776 -0.0311715)
      PathPoint P6: calcn_l (0.0882332 0.00714566 -0.0129518)
      PathPoint P7: calcn_l (0.12458 0.00880264 0.0201961)
    Thelen2003Muscle per_tert_l: max_isometric_force=1620 optimal_fiber_length=0.08509266 tendon_slack_length=0.1077151
        pennation_angle_at_optimal=0.22689 FmaxMuscleStrain=0.6
      PathPoint P1: tibia_l (0.00107607 -0.301731 -0.025026)
      PathPoint P2: tibia_l (0.0246418 -0.437848 -0.0172258)
      PathPoint P3: calcn_l (0.0887509 0.0236122 -0.0328185)
    Thelen2003Muscle ext_dig_l: max_isometric_force=4608 optimal_fiber_length=0.07448783 tendon_slack_length=0.4011676
        pennation_angle_at_optimal=0.2 FmaxMuscleStrain=0.6
      PathPoint P1: tibia_l (0.00344334 -0.148608 -0.0299004)
      PathPoint P2: tibia_l (0.0310979 -0.431172 -0.00780017)
      PathPoint P3: calcn_l (0.0954822 0.040182 0.000109763)
      PathPoint P4: calcn_l (0.167356 0.00569584 -0.0142686)
      PathPoint P5: toes_l (0.000310681 0.00486735 -0.0167934)
      PathPoint P6: toes_l (0.0458775 -0.000414243 -0.0274403)
    Thelen2003Muscle ext_hal_l: max_isometric_force=1458 optimal_fiber_length=0.09030095 tendon_slack_length=0.3516459
        pennation_angle_at_optimal=0.17453 FmaxMuscleStrain=0.6
      PathPoint P1: tibia_l (0.0012913 -0.190136 -0.0247007)
      PathPoint P2: tibia_l (0.0350792 -0.428806 0.00920854)
      PathPoint P3: calcn_l (0.100454 0.0402853 0.0231598)
      PathPoint P4: calcn_l (0.133903 0.0320005 0.0282086)
      PathPoint P5: calcn_l (0.179575 0.0143949 0.0307326)
      PathPoint P6: toes_l (0.0308613 0.00424601 0.026891)
      PathPoint P7: toes_l (0.0583041 0.00352109 0.0204151)
    Thelen2003Muscle ercspn_r: max_isometric_force=22500 optimal_fiber_length=0.1151311 tendon_slack_length=0.06236011
        pennation_angle_at_optimal=0 FmaxMuscleStrain=0.6
      PathPoint P1: pelvis (-0.130926 0.0381828 0.0460396)
      PathPoint P2: torso (-0.0593161 -0.0151992 0.0452991)
      PathPoint P3: torso (-0.0619346 0.0733364 0.0366318)
      PathPoint P4: torso (-0.0522425 0.114229 0.0266944)
    Thelen2003Muscle ercspn_l: max_isometric_force=22500 optimal_fiber_length=0.1151311 tendon_slack_length=0.06236011
        pennation_angle_at_optimal=0 FmaxMuscleStrain=0.6
      PathPoint P1: pelvis (-0.130926 0.0381828 -0.0460396)
      PathPoint P2: torso (-0.0593161 -0.0151992 -0.0452991)
      PathPoint P3: torso (-0.0619346 0.0733364 -0.0366318)
      PathPoint P4: torso (-0.0522425 0.114229 -0.0266944)
    Thelen2003Muscle intobl_r: max_isometric_force=8100 optimal_fiber_length=0.09740367 tendon_slack_length=0.09740367
        pennation_angle_at_optimal=0 FmaxMuscleStrain=3
      PathPoint P1: pelvis (-0.0224332 0.0473668 0.133865)
      PathPoint P2: torso (0.10015 0.14522 0.0159214)
    Thelen2003Muscle intobl_l: max_isometric_force=8100 optimal_fiber_length=0.09740367 tendon_slack_length=0.09740367
        pennation_angle_at_optimal=0 FmaxMuscleStrain=3
      PathPoint P1: pelvis (-0.0224332 0.0473668 -0.133865)
      PathPoint P2: torso (0.10015 0.14522 -0.0159214)
    Thelen2003Muscle extobl_r: max_isometric_force=8100 optimal_fiber_length=0.1099666 tendon_slack_length=0.128296
        pennation_angle_at_optimal=0 FmaxMuscleStrain=3
      PathPoint P1: pelvis (-0.0272282 -0.0681113 0.0565805)
      PathPoint P2: torso (0.0693352 0.100139 0.111422)
    Thelen2003Muscle extobl_l: max_isometric_force=8100 optimal_fiber_length=0.1099666 tendon_slack_length=0.128296
        pennation_angle_at_optimal=0 FmaxMuscleStrain=3
      PathPoint P1: pelvis (-0.0272282 -0.0681113 -0.0565805)
      PathPoint P2: torso (0.0693352 0.100139 -0.111422)
  MarkerSet:
    Marker RSH: torso (-0.0293972 0.422417 0.167179)
    Marker LSH: torso (-0.0373464 0.427452 -0.176062)
    Marker C7: torso (-0.0942327 0.437873 0.00425417)
    Marker RASI: pelvis (0.00823633 0.00576263 0.141709)
    Marker LASI: pelvis (0.016373 0.00272461 -0.132634)
    Marker SACR: pelvis (-0.158913 0.0857934 -0.00406624)
    Marker RTHAP: femur_r (0.112359 -0.221623 0.0339694)
    Marker RTHAD: femur_r (0.0964358 -0.331272 0.0167975)
    Marker RTHLD: femur_r (0.0137865 -0.338051 0.0867562)
    Marker RTHLP: femur_r (0.025673 -0.221623 0.103698)
    Marker RLEPI: femur_r (0.00456165 -0.446197 0.0750171)
    Marker RMEPI: femur_r (-0.00126732 -0.451145 -0.0540005)
    Marker RTIAP: tibia_r (0.0474186 -0.151484 0.00126637)
    Marker RTIAD: tibia_r (0.036826 -0.299981 -0.00421866)
    Marker RTILAT: tibia_r (-0.0298606 -0.219298 0.0861153)
    Marker RLMAL: tibia_r (-0.0140827 -0.45715 0.0408802)
    Marker RMMAL: tibia_r (0.00914968 -0.436716 -0.049111)
    Marker RHEEL: calcn_r (-0.0251151 0.0379616 -0.0118905)
    Marker RMFS: calcn_r (0.141825 0.0507889 -0.0111684)
    Marker RMFL: calcn_r (0.112655 0.0254147 0.0458965)
    Marker RP1MT: calcn_r (0.215308 0.0119575 -0.0396717)
    Marker RP5MT: calcn_r (0.169577 0.00647941 0.0604117)
    Marker RTOE: toes_r (0.0761444 0.00983156 -0.0162931)
    Marker LTHAP: femur_l (0.105537 -0.221374 -0.0283435)
    Marker LTHAD: femur_l (0.0896136 -0.321597 -0.0203357)
    Marker LTHLD: femur_l (0.00515994 -0.324461 -0.0861194)
    Marker LTHLP: femur_l (0.0127655 -0.220572 -0.0991215)
    Marker LLEPI: femur_l (-0.00823954 -0.460236 -0.0664612)
    Marker LMEPI: femur_l (-0.00747004 -0.456623 0.0550391)
    Marker LTIAP: tibia_l (0.035942 -0.167899 0.00398919)
    Marker LTIAD: tibia_l (0.0319645 -0.29617 0.0079452)
    Marker LTILAT: tibia_l (-0.0139884 -0.231837 -0.0796461)
    Marker LLMAL: tibia_l (-0.00699194 -0.455971 -0.042795)
    Marker LMMAL: tibia_l (0.017504 -0.430731 0.0476524)
    Marker LHEEL: calcn_l (-0.019506 0.0361322 0.00591955)
    Marker LMFS: calcn_l (0.140266 0.0463419 0.025401)
    Marker LMFL: calcn_l (0.106457 0.0266885 -0.0466512)
    Marker LP1MT: calcn_l (0.213488 0.00442162 0.0442212)
    Marker LP5MT: calcn_l (0.171525 0.00985011 -0.0686013)
    Marker LTOE: toes_l (0.0803285 0.012842 0.0159337)
    Marker RELB: humerus_r (0.0115511 -0.29201 0.0176398)
    Marker RWR: radius_r (-0.047139 -0.267749 0.0127123)
    Marker LELB: humerus_l (0.00957111 -0.295182 -0.0267376)
    Marker LWR: radius_l (-0.0427683 -0.268886 -0.00762917)
    Marker P1: pelvis (-0.163887 0.0636498 -0.0538348)
    Marker P2: pelvis (-0.166206 0.0659171 0.0487018)
    Marker P3: pelvis (-0.185624 0.00143969 -0.000556254)
