# OpenSim document version 30000
Model exotopology_subject01:
  length_units: meters
  force_units: N
  gravity: 0 -9.80665 0
  credits:
    Rajagopal 2016 model reduced to 18 muscles, using max isometric forces from Carmichael Ong's "gait8dof18musc."
  defaults:
    CoordinateActuator default: optimal_force=300
    Millard2012EquilibriumMuscle default: min_control=0.01 max_control=1 optimal_force=1 max_isometric_force=546
        optimal_fiber_length=0.0535 tendon_slack_length=0.078 pennation_angle_at_optimal=0 [radians]
        max_contraction_velocity=10
  BodySet:
    Body ground: mass=0 mass_center=(0 0 0) inertia_xx=0 inertia_yy=0 inertia_zz=0
    Body pelvis: mass=18.55106 mass_center=(-0.0698559 0 0) inertia_xx=0.1187965 inertia_yy=0.1187965
        inertia_zz=0.05637188 meshes=(r_pelvis.vtp l_pelvis.vtp sacrum.vtp)
      CustomJoint ground_pelvis: parent_body=ground location_in_parent=(0 0 0) location=(0 0 0)
        Coordinate pelvis_tilt: motion_type=rotational default_value=0 range=(-1.570796 1.570796) clamped=true
        Coordinate pelvis_list: motion_type=rotational default_value=0 range=(-1.570796 1.570796) clamped=true
        Coordinate pelvis_rotation: motion_type=rotational default_value=0 range=(-1.570796 1.570796) clamped=true
        Coordinate pelvis_tx: motion_type=translational default_value=0 range=(-5 5) clamped=true
        Coordinate pelvis_ty: motion_type=translational default_value=0.93 range=(-1 2) clamped=true
        Coordinate pelvis_tz: motion_type=translational default_value=0 range=(-3 3) clamped=true
        SpatialTransform:
          TransformAxis rotation1: coordinates=pelvis_tilt axis=(0 0 1) LinearFunction(coefficients=1 0)
          TransformAxis rotation2: coordinates=pelvis_list axis=(1 0 0) LinearFunction(coefficients=1 0)
          TransformAxis rotation3: coordinates=pelvis_rotation axis=(0 1 0) LinearFunction(coefficients=1 0)
          TransformAxis translation1: coordinates=pelvis_tx axis=(1 0 0) LinearFunction(coefficients=1 0)
          TransformAxis translation2: coordinates=pelvis_ty axis=(0 1 0) LinearFunction(coefficients=1 0)
          TransformAxis translation3: coordinates=pelvis_tz axis=(0 0 1) LinearFunction(coefficients=1 0)
      WrapCylinder Gmax1_at_pelvis_r: xyz_body_rotation=(-0.6 0.45 0) translation=(-0.0760807 -0.100896 0.0687168)
          quadrant=-x radius=0.0412681 length=0.1611424
      WrapCylinder Gmax2_at_pelvis_r: xyz_body_rotation=(-0.75 0.39 0) translation=(-0.0790449 -0.0845896 0.0766024)
          quadrant=all radius=0.0414385 length=0.1065431
      WrapCylinder Gmax3_at_pelvis_r: xyz_body_rotation=(-0.1 0 0) translation=(-0.0820091 -0.0896853 0.0766024)
          quadrant=all radius=0.04016676 length=0.1125486
      WrapCylinder Gmax1_at_pelvis_l: xyz_body_rotation=(0.6 -0.45 0) translation=(-0.0760807 -0.100896 -0.0687168)
          quadrant=-x radius=0.0412681 length=0.1611424
      WrapCylinder Gmax2_at_pelvis_l: xyz_body_rotation=(0.75 -0.39 0) translation=(-0.0790449 -0.0845896 -0.0766024)
          quadrant=all radius=0.0414385 length=0.1065431
      WrapCylinder Gmax3_at_pelvis_l: xyz_body_rotation=(0.1 0 0) translation=(-0.0820091 -0.0896853 -0.0766024)
          quadrant=all radius=0.04016676 length=0.1125486
      WrapCylinder PS_at_brim_r: xyz_body_rotation=(-0.25 -0.27 0.1) translation=(-0.0731165 -0.0611491 0.0738987)
          quadrant=-y radius=0.05060135 length=0.1111346
      WrapCylinder PS_at_brim_l: xyz_body_rotation=(0.25 0.27 0.1) translation=(-0.0731165 -0.0611491 -0.0738987)
          quadrant=-y radius=0.05060135 length=0.1111346
      WrapCylinder IL_at_brim_r: xyz_body_rotation=(-0.32 -0.24 0.9) translation=(-0.0701523 -0.0662448 0.0851638)
          quadrant=-y radius=0.05562198 length=0.110949
      WrapCylinder IL_at_brim_l: xyz_body_rotation=(0.32 0.24 0.9) translation=(-0.0701523 -0.0662448 -0.0851638)
          quadrant=-y radius=0.05562198 length=0.110949
    Body femur_r: mass=8.993111 mass_center=(0 -0.188583 0) inertia_xx=0.1593129 inertia_yy=0.04176164
        inertia_zz=0.1679984 meshes=r_femur.vtp
      CustomJoint hip_r: parent_body=pelvis location_in_parent=(-0.05560412 -0.07999318 0.0870338) location=(0 0 0)
        Coordinate hip_flexion_r: motion_type=rotational default_value=0 range=(-0.5235988 2.094395) clamped=true
        Coordinate hip_adduction_r: motion_type=rotational default_value=0 range=(-0.8726646 0.5235988) clamped=true
        Coordinate hip_rotation_r: motion_type=rotational default_value=0 range=(-0.6981317 0.6981317) clamped=true
        SpatialTransform: axes_held_at_zero=(translation1 translation2 translation3)
          TransformAxis rotation1: coordinates=hip_flexion_r axis=(0 0 1) LinearFunction(coefficients=1 0)
          TransformAxis rotation2: coordinates=hip_adduction_r axis=(1 0 0) LinearFunction(coefficients=1 0)
          TransformAxis rotation3: coordinates=hip_rotation_r axis=(0 1 0) LinearFunction(coefficients=1 0)
      WrapCylinder Gastroc_at_condyles_r: translation=(0.00554657 -0.454819 0) quadrant=all radius=0.02773284
          length=0.1109314
      WrapCylinder KnExt_at_fem_r: xyz_body_rotation=(-0.0623366 0.0507601 0)
          translation=(0.00398053 -0.446756 0.0023197) quadrant=all radius=0.02773284 length=0.1109314
      WrapCylinder AB_at_femshaft_r: xyz_body_rotation=(1.66157 0.186644 0) translation=(0.0162441 -0.124903 0.0259191)
          quadrant=all radius=0.01830368 length=0.07765196
      WrapCylinder AL_at_femshaft_r: xyz_body_rotation=(1.77711 0.136489 0) translation=(0.0340922 -0.25726 0.0167658)
          quadrant=all radius=0.02229721 length=0.1109314
      WrapCylinder AMprox_at_femshaft_r: xyz_body_rotation=(1.61126 0.18656 0)
          translation=(0.00574956 -0.0808632 0.0281799) quadrant=all radius=0.02340652 length=0.07765196
      WrapCylinder AMmid_at_femshaft_r: xyz_body_rotation=(1.61139 0.13656 0)
          translation=(0.0255281 -0.178279 0.0228343) quadrant=all radius=0.02373931 length=0.1331176
      WrapCylinder AMdist_at_femshaft_r: xyz_body_rotation=(1.71188 0.186636 0)
          translation=(0.0350615 -0.289238 0.0103883) quadrant=all radius=0.02418304 length=0.2218627
      WrapCylinder AMisch_at_condyles_r: xyz_body_rotation=(1.71115 -0.463363 0)
          translation=(-0.0251272 -0.418024 -0.00349919) quadrant=all radius=0.04437255 length=0.2662353
      WrapCylinder PECT_at_femshaft_r: xyz_body_rotation=(1.81295 0.276344 0)
          translation=(0.00675098 -0.0937402 0.0337681) quadrant=all radius=0.01663971 length=0.05546569
    Body tibia_r: mass=3.584617 mass_center=(0 -0.201095 0) inertia_xx=0.05653333 inertia_yy=0.005720635
        inertia_zz=0.05731852 meshes=(r_tibia.vtp r_fibula.vtp)
      CustomJoint walker_knee_r: parent_body=femur_r location_in_parent=(-0.008974348 -0.4525556 -0.003050613)
          orientation_in_parent=(-1.641568 1.446181 1.570796) location=(-0.008713247 -0.003807335 -0.001599214)
          orientation=(-1.641568 1.446181 1.570796)
        Coordinate knee_angle_r: motion_type=rotational default_value=0 range=(0 2.0944) clamped=false
        SpatialTransform: axes_held_at_zero=translation3
          TransformAxis rotation1: coordinates=knee_angle_r axis=(1 0 0) LinearFunction(coefficients=1 0)
          TransformAxis rotation2: coordinates=knee_angle_r axis=(0 0 1)
            SimmSpline: x=(0 0.174533 0.349066 0.523599 0.698132 0.872665 1.0472 1.22173 1.39626 1.5708 1.74533 1.91986 2.0944)
                y=(0 0.0126809 0.0226969 0.0296054 0.0332049 0.0335354 0.0308779 0.0257548 0.0189295 0.011407 0.00443314 -0.00050475 -0.0016782)
          TransformAxis rotation3: coordinates=knee_angle_r axis=(0 1 0)
            SimmSpline: x=(0 0.174533 0.349066 0.523599 0.698132 0.872665 1.0472 1.22173 1.39626 1.5708 1.74533 1.91986 2.0944)
                y=(0 0.059461 0.109399 0.150618 0.18392 0.210107 0.229983 0.24435 0.254012 0.25977 0.262428 0.262788 0.261654)
          TransformAxis translation1: coordinates=knee_angle_r axis=(0 1 0)
            MultiplierFunction: scale=1.109314
              SimmSpline: x=(0 0.174533 0.349066 0.523599 0.698132 0.872665 1.0472 1.22173 1.39626 1.5708 1.74533 1.91986 2.0944)
                  y=(0 0.000479 0.000835 0.001086 0.001251 0.001346 0.001391 0.001403 0.0014 0.0014 0.001421 0.001481 0.001599)
          TransformAxis translation2: coordinates=knee_angle_r axis=(0 0 1)
            MultiplierFunction: scale=1.109314
              SimmSpline: x=(0 0.174533 0.349066 0.523599 0.698132 0.872665 1.0472 1.22173 1.39626 1.5708 1.74533 1.91986 2.0944)
                  y=(0 0.000988 0.001899 0.002734 0.003492 0.004173 0.004777 0.005305 0.005756 0.00613 0.006427 0.006648 0.006792)
      WrapCylinder GasLat_at_shank_r: xyz_body_rotation=(2.96723 -0.279725 -1.47812)
          translation=(-0.00797054 -0.0797054 -0.00355443) quadrant=-y radius=0.05924053 length=0.10771
      WrapCylinder GasMed_at_shank_r: xyz_body_rotation=(2.96723 0.0279725 -1.47812)
          translation=(-0.00797054 -0.0797054 -0.00355443) quadrant=-y radius=0.05924053 length=0.10771
      WrapCylinder GR_at_condyles_r: xyz_body_rotation=(0 -0.4 0) translation=(-0.0032313 -0.021542 0) quadrant=all
          radius=0.03877562 length=0.10771
      WrapCylinder SM_at_condyles_r: xyz_body_rotation=(0 -0.1 0) translation=(-0.0010771 -0.021542 0) quadrant=all
          radius=0.03791394 length=0.10771
      WrapCylinder ST_at_condyles_r: xyz_body_rotation=(0 -0.2 0) translation=(-0.0021542 -0.0220806 0) quadrant=all
          radius=0.04577677 length=0.10771
      WrapCylinder BF_at_gastroc_r: translation=(-0.0624718 -0.064626 0) quadrant=y radius=0.03231301 length=0.1615651
    Body patella_r: mass=0.08334295 mass_center=(0.0018 0.0264 0) inertia_xx=2.774876e-6 inertia_yy=1.267548e-5
        inertia_zz=1.267548e-5 meshes=r_patella.vtp
      CustomJoint patellofemoral_r: parent_body=femur_r location_in_parent=(-0.008974348 -0.4525556 -0.003050613)
          location=(0 0 0)
        Coordinate knee_angle_r_beta: motion_type=rotational default_value=0 range=(-99999.9 99999.9) clamped=false
        SpatialTransform: axes_held_at_zero=(rotation2 rotation3)
          TransformAxis rotation1: coordinates=knee_angle_r_beta axis=(0 0 1)
            SimmSpline f11: x=(0 0.174533 0.349066 0.523599 0.698132 0.872665 1.0472 1.22173 1.39626 1.5708 1.74533 1.91986 2.0944)
                y=(0.00113686 -0.00629212 -0.105582 -0.253683 -0.414245 -0.579047 -0.747244 -0.91799 -1.09044 -1.26379 -1.43763 -1.61186 -1.78634)
          TransformAxis translation1: coordinates=knee_angle_r_beta axis=(1 0 0)
            MultiplierFunction: scale=1.109314
              SimmSpline f9: x=(0 0.174533 0.349066 0.523599 0.698132 0.872665 1.0472 1.22173 1.39626 1.5708 1.74533 1.91986 2.0944)
                  y=(0.0524 0.0488 0.0437 0.0371 0.0296 0.0216 0.0136 0.0057 -0.0019 -0.0088 -0.0148 -0.0196 -0.0227)
          TransformAxis translation2: coordinates=knee_angle_r_beta axis=(0 1 0)
            MultiplierFunction: scale=1.109314
              SimmSpline f10: x=(0 0.174533 0.349066 0.523599 0.698132 0.872665 1.0472 1.22173 1.39626 1.5708 1.74533 1.91986 2.0944)
                  y=(-0.0108 -0.019 -0.0263 -0.0322 -0.0367 -0.0395 -0.0408 -0.0404 -0.0384 -0.0349 -0.0301 -0.0245 -0.0187)
          TransformAxis translation3: axis=(0 0 1) MultiplierFunction(scale=1.109314, Constant(value=0.00275))
    Body talus_r: mass=0.09668556 mass_center=(0 0 0) inertia_xx=0.001209888 inertia_yy=0.001209888
        inertia_zz=0.001209888 meshes=r_talus.vtp
      PinJoint ankle_r: parent_body=tibia_r location_in_parent=(-0.010771 -0.4308402 0)
          orientation_in_parent=(0.1758952 -0.105208 0.01866219) location=(0 0 0)
          orientation=(0.1758952 -0.105208 0.01866219)
        Coordinate ankle_angle_r: motion_type=rotational default_value=0 range=(-0.6981317 0.5235988) clamped=true
    Body calcn_r: mass=1.208569 mass_center=(0.111864 0.0335593 0) inertia_xx=0.001693843 inertia_yy=0.004718562
        inertia_zz=0.00496054 meshes=r_foot.vtp
      PinJoint subtalar_r: parent_body=talus_r location_in_parent=(-0.05455625 -0.0469271 0.008859657)
          orientation_in_parent=(-1.768191 0.906223 1.819602) location=(0 0 0)
          orientation=(-1.768191 0.906223 1.819602)
        Coordinate subtalar_angle_r: motion_type=rotational default_value=0 range=(-0.3490659 0.3490659) clamped=true
            locked=true
    Body toes_r: mass=0.2094209 mass_center=(0.0387051 0.00671186 -0.0195763) inertia_xx=0.0001209888
        inertia_yy=0.0002419776 inertia_zz=0.001209888 meshes=r_bofoot.vtp
      PinJoint mtp_r: parent_body=calcn_r location_in_parent=(0.2000135 -0.002237287 0.001208135)
          orientation_in_parent=(-3.141593 0.6199005 0) location=(0 0 0) orientation=(-3.141593 0.6199005 0)
        Coordinate mtp_angle_r: motion_type=rotational default_value=0 range=(-0.5235988 0.5235988) clamped=true
            locked=true
    Body femur_l: mass=8.993111 mass_center=(0 -0.188583 0) inertia_xx=0.1593129 inertia_yy=0.04176164
        inertia_zz=0.1679984 meshes=l_femur.vtp
      CustomJoint hip_l: parent_body=pelvis location_in_parent=(-0.05560412 -0.07999318 -0.0870338) location=(0 0 0)
        Coordinate hip_flexion_l: motion_type=rotational default_value=0 range=(-0.5235988 2.094395) clamped=true
        Coordinate hip_adduction_l: motion_type=rotational default_value=0 range=(-0.8726646 0.5235988) clamped=true
        Coordinate hip_rotation_l: motion_type=rotational default_value=0 range=(-0.6981317 0.6981317) clamped=true
        SpatialTransform: axes_held_at_zero=(translation1 translation2 translation3)
          TransformAxis rotation1: coordinates=hip_flexion_l axis=(0 0 1) LinearFunction(coefficients=1 0)
          TransformAxis rotation2: coordinates=hip_adduction_l axis=(1 0 0) LinearFunction(coefficients=-1 0)
          TransformAxis rotation3: coordinates=hip_rotation_l axis=(0 1 0) LinearFunction(coefficients=-1 0)
      WrapCylinder Gastroc_at_condyles_l: translation=(0.00554657 -0.454819 0) quadrant=all radius=0.02773284
          length=0.1109314
      WrapCylinder KnExt_at_fem_l: xyz_body_rotation=(0.0623366 -0.0507601 0)
          translation=(0.00398053 -0.446756 -0.0023197) quadrant=all radius=0.02773284 length=0.1109314
      WrapCylinder AB_at_femshaft_l: xyz_body_rotation=(-1.66157 -0.186644 0)
          translation=(0.0162441 -0.124903 -0.0259191) quadrant=all radius=0.01830368 length=0.07765196
      WrapCylinder AL_at_femshaft_l: xyz_body_rotation=(-1.77711 -0.136489 0)
          translation=(0.0340922 -0.25726 -0.0167658) quadrant=all radius=0.02229721 length=0.1109314
      WrapCylinder AMprox_at_femshaft_l: xyz_body_rotation=(-1.61126 -0.18656 0)
          translation=(0.00574956 -0.0808632 -0.0281799) quadrant=all radius=0.02340652 length=0.07765196
      WrapCylinder AMmid_at_femshaft_l: xyz_body_rotation=(-1.61139 -0.13656 0)
          translation=(0.0255281 -0.178279 -0.0228343) quadrant=all radius=0.02373931 length=0.1331176
      WrapCylinder AMdist_at_femshaft_l: xyz_body_rotation=(-1.71188 -0.186636 0)
          translation=(0.0350615 -0.289238 -0.0103883) quadrant=all radius=0.02418304 length=0.2218627
      WrapCylinder AMisch_at_condyles_l: xyz_body_rotation=(-1.71115 0.463363 0)
          translation=(-0.0251272 -0.418024 0.00349919) quadrant=all radius=0.04437255 length=0.2662353
      WrapCylinder PECT_at_femshaft_l: xyz_body_rotation=(-1.81295 -0.276344 0)
          translation=(0.00675098 -0.0937402 -0.0337681) quadrant=all radius=0.01663971 length=0.05546569
    Body tibia_l: mass=3.584617 mass_center=(0 -0.201095 0) inertia_xx=0.05653333 inertia_yy=0.005720635
        inertia_zz=0.05731852 meshes=(l_tibia.vtp l_fibula.vtp)
      CustomJoint walker_knee_l: parent_body=femur_l location_in_parent=(-0.008974348 -0.4525556 0.003050613)
          orientation_in_parent=(1.641568 -1.446181 1.570796) location=(-0.008713247 -0.003807335 0.001599214)
          orientation=(1.641568 -1.446181 1.570796)
        Coordinate knee_angle_l: motion_type=rotational default_value=0 range=(0 2.0944) clamped=true
        SpatialTransform: axes_held_at_zero=translation3
          TransformAxis rotation1: coordinates=knee_angle_l axis=(-1 0 0) LinearFunction(coefficients=1 0)
          TransformAxis rotation2: coordinates=knee_angle_l axis=(0 0 1)
            SimmSpline: x=(0 0.174533 0.349066 0.523599 0.698132 0.872665 1.0472 1.22173 1.39626 1.5708 1.74533 1.91986 2.0944)
                y=(0 0.0126809 0.0226969 0.0296054 0.0332049 0.0335354 0.0308779 0.0257548 0.0189295 0.011407 0.00443314 -0.00050475 -0.0016782)
          TransformAxis rotation3: coordinates=knee_angle_l axis=(0 1 0)
            SimmSpline: x=(0 0.174533 0.349066 0.523599 0.698132 0.872665 1.0472 1.22173 1.39626 1.5708 1.74533 1.91986 2.0944)
                y=(0 -0.059461 -0.109399 -0.150618 -0.18392 -0.210107 -0.229983 -0.24435 -0.254012 -0.25977 -0.262428 -0.262788 -0.261654)
          TransformAxis translation1: coordinates=knee_angle_l axis=(0 1 0)
            MultiplierFunction: scale=1.109314
              SimmSpline: x=(0 0.174533 0.349066 0.523599 0.698132 0.872665 1.0472 1.22173 1.39626 1.5708 1.74533 1.91986 2.0944)
                  y=(0 0.000479 0.000835 0.001086 0.001251 0.001346 0.001391 0.001403 0.0014 0.0014 0.001421 0.001481 0.001599)
          TransformAxis translation2: coordinates=knee_angle_l axis=(0 0 1)
            MultiplierFunction: scale=1.109314
              SimmSpline: x=(0 0.174533 0.349066 0.523599 0.698132 0.872665 1.0472 1.22173 1.39626 1.5708 1.74533 1.91986 2.0944)
                  y=(0 -0.000988 -0.001899 -0.002734 -0.003492 -0.004173 -0.004777 -0.005305 -0.005756 -0.00613 -0.006427 -0.006648 -0.006792)
      WrapCylinder GasLat_at_shank_l: xyz_body_rotation=(-2.96723 0.279725 -1.47812)
          translation=(-0.00797054 -0.0797054 0.00355443) quadrant=-y radius=0.05924053 length=0.10771
      WrapCylinder GasMed_at_shank_l: xyz_body_rotation=(-2.96723 -0.0279725 -1.47812)
          translation=(-0.00797054 -0.0797054 0.00355443) quadrant=-y radius=0.05924053 length=0.10771
      WrapCylinder GR_at_condyles_l: xyz_body_rotation=(0 0.4 0) translation=(-0.0032313 -0.021542 0) quadrant=all
          radius=0.03877562 length=0.10771
      WrapCylinder SM_at_condyles_l: xyz_body_rotation=(0 0.1 0) translation=(-0.0010771 -0.021542 0) quadrant=all
          radius=0.03791394 length=0.10771
      WrapCylinder ST_at_condyles_l: xyz_body_rotation=(0 0.2 0) translation=(-0.0021542 -0.0220806 0) quadrant=all
          radius=0.04577677 length=0.10771
      WrapCylinder BF_at_gastroc_l: translation=(-0.0624718 -0.064626 0) quadrant=all radius=0.03231301
          length=0.1615651
    Body patella_l: mass=0.08334295 mass_center=(0.0018 0.0264 0) inertia_xx=2.774876e-6 inertia_yy=1.267548e-5
        inertia_zz=1.267548e-5 meshes=l_pat.vtp
      CustomJoint patellofemoral_l: parent_body=femur_l location_in_parent=(-0.008974348 -0.4525556 0.003050613)
          location=(0 0 0)
        Coordinate knee_angle_l_beta: motion_type=rotational default_value=0 range=(-99999.9 99999.9) clamped=false
        SpatialTransform: axes_held_at_zero=(rotation2 rotation3)
          TransformAxis rotation1: coordinates=knee_angle_l_beta axis=(0 0 1)
            SimmSpline f25: x=(0 0.174533 0.349066 0.523599 0.698132 0.872665 1.0472 1.22173 1.39626 1.5708 1.74533 1.91986 2.0944)
                y=(0.00113686 -0.00629212 -0.105582 -0.253683 -0.414245 -0.579047 -0.747244 -0.91799 -1.09044 -1.26379 -1.43763 -1.61186 -1.78634)
          TransformAxis translation1: coordinates=knee_angle_l_beta axis=(1 0 0)
            MultiplierFunction: scale=1.109314
              SimmSpline f23: x=(0 0.174533 0.349066 0.523599 0.698132 0.872665 1.0472 1.22173 1.39626 1.5708 1.74533 1.91986 2.0944)
                  y=(0.0524 0.0488 0.0437 0.0371 0.0296 0.0216 0.0136 0.0057 -0.0019 -0.0088 -0.0148 -0.0196 -0.0227)
          TransformAxis translation2: coordinates=knee_angle_l_beta axis=(0 1 0)
            MultiplierFunction: scale=1.109314
              SimmSpline f24: x=(0 0.174533 0.349066 0.523599 0.698132 0.872665 1.0472 1.22173 1.39626 1.5708 1.74533 1.91986 2.0944)
                  y=(-0.0108 -0.019 -0.0263 -0.0322 -0.0367 -0.0395 -0.0408 -0.0404 -0.0384 -0.0349 -0.0301 -0.0245 -0.0187)
          TransformAxis translation3: axis=(0 0 1) MultiplierFunction(scale=1.109314, Constant(value=-0.00275))
    Body talus_l: mass=0.09668556 mass_center=(0 0 0) inertia_xx=0.001209888 inertia_yy=0.001209888
        inertia_zz=0.001209888 meshes=l_talus.vtp
      PinJoint ankle_l: parent_body=tibia_l location_in_parent=(-0.010771 -0.4308402 0)
          orientation_in_parent=(-0.1758952 0.105208 0.01866219) location=(0 0 0)
          orientation=(-0.1758952 0.105208 0.01866219)
        Coordinate ankle_angle_l: motion_type=rotational default_value=0 range=(-0.6981317 0.5235988) clamped=true
    Body calcn_l: mass=1.208569 mass_center=(0.111864 0.0335593 0) inertia_xx=0.001693843 inertia_yy=0.004718562
        inertia_zz=0.00496054 meshes=l_foot.vtp
      PinJoint subtalar_l: parent_body=talus_l location_in_parent=(-0.05455625 -0.0469271 -0.008859657)
          orientation_in_parent=(1.768191 -0.906223 1.819602) location=(0 0 0)
          orientation=(1.768191 -0.906223 1.819602)
        Coordinate subtalar_angle_l: motion_type=rotational default_value=0 range=(-0.3490659 0.3490659) clamped=true
            locked=true
    Body toes_l: mass=0.2094209 mass_center=(0.0387051 0.00671186 0.0195763) inertia_xx=0.0001209888
        inertia_yy=0.0002419776 inertia_zz=0.001209888 meshes=l_bofoot.vtp
      PinJoint mtp_l: parent_body=calcn_l location_in_parent=(0.2000135 -0.002237287 -0.001208135)
          orientation_in_parent=(-3.141593 -0.6199005 0) location=(0 0 0) orientation=(-3.141593 -0.6199005 0)
        Coordinate mtp_angle_l: motion_type=rotational default_value=0 range=(-0.5235988 0.5235988) clamped=true
            locked=true
    Body torso: mass=25.93745 mass_center=(-0.0297742 0.317591 0) inertia_xx=1.404246 inertia_yy=0.7195033
        inertia_zz=1.363199 meshes=(hat_spine.vtp hat_jaw.vtp hat_skull.vtp hat_ribs_scap.vtp)
      CustomJoint back: parent_body=pelvis location_in_parent=(-0.09949774 0.08306082 0) location=(0 0 0)
        Coordinate lumbar_extension: motion_type=rotational default_value=0 range=(-1.570796 1.570796) clamped=true
        Coordinate lumbar_bending: motion_type=rotational default_value=0 range=(-1.570796 1.570796) clamped=true
        Coordinate lumbar_rotation: motion_type=rotational default_value=0 range=(-1.570796 1.570796) clamped=true
        SpatialTransform: axes_held_at_zero=(translation1 translation2 translation3)
          TransformAxis rotation1: coordinates=lumbar_extension axis=(0 0 1) LinearFunction(coefficients=1 0)
          TransformAxis rotation2: coordinates=lumbar_bending axis=(1 0 0) LinearFunction(coefficients=1 0)
          TransformAxis rotation3: coordinates=lumbar_rotation axis=(0 1 0) LinearFunction(coefficients=1 0)
  ConstraintSet:
    CoordinateCouplerConstraint patellofemoral_knee_angle_r_con: independent_coordinate_names=knee_angle_r
        dependent_coordinate_name=knee_angle_r_beta scale_factor=1
        coupled_coordinates_function=LinearFunction(coefficients=1 0)
    CoordinateCouplerConstraint patellofemoral_knee_angle_l_con: independent_coordinate_names=knee_angle_l
        dependent_coordinate_name=knee_angle_l_beta scale_factor=1
        coupled_coordinates_function=LinearFunction(coefficients=1 0)
  ForceSet:
    Millard2012EquilibriumMuscle [values shared by the 18 below unless stated]: fiber_damping=0.01
        default_activation=0.01 minimum_activation=0.01
      ActiveForceLengthCurve: min_norm_active_fiber_length=0.25 transition_norm_fiber_length=0.77
          max_norm_active_fiber_length=1.9 shallow_ascending_slope=0.75 minimum_value=0
      ForceVelocityCurve: concentric_slope_at_vmax=0 concentric_slope_near_vmax=0.25 isometric_slope=5
          eccentric_slope_at_vmax=0 eccentric_slope_near_vmax=0.15 max_eccentric_velocity_force_multiplier=1.4
      FiberForceLengthCurve: strain_at_zero_force=0 strain_at_one_norm_force=0.7
      TendonForceLengthCurve
    Millard2012EquilibriumMuscle bifemsh_r: max_isometric_force=489.3992 optimal_fiber_length=0.1217287
        tendon_slack_length=0.1167814 pennation_angle_at_optimal=0.2642232
      PathPoint bfsh_r-P1: femur_r (0.00554657 -0.234176 0.0259579)
      PathPoint bfsh_r-P2: tibia_r (-0.0324207 -0.0451305 0.0342518)
      PathWrap: wrap_object=BF_at_gastroc_r method=hybrid
    Millard2012EquilibriumMuscle med_gas_r: max_isometric_force=4208.703 optimal_fiber_length=0.05510411
        tendon_slack_length=0.4308021 pennation_angle_at_optimal=0.1656816
      PathPoint gasmed_r-P1: femur_r (0.00887451 -0.420208 -0.0230737)
      PathPoint gasmed_r-P2: calcn_r (0.00492203 0.034678 -0.00592881)
      PathWrap: wrap_object=GasMed_at_shank_r method=hybrid
      PathWrap: wrap_object=Gastroc_at_condyles_r method=hybrid
    Millard2012EquilibriumMuscle glut_max2_r: max_isometric_force=3042.352 optimal_fiber_length=0.1669777
        tendon_slack_length=0.07220152 pennation_angle_at_optimal=0.3673821
      PathPoint glmax2_r-P1: pelvis (-0.130128 0.00886662 0.0520445)
      PathPoint glmax2_r-P2: pelvis (-0.132795 -0.0620663 0.0915849)
      PathPoint glmax2_r-P3: femur_r (-0.0499191 -0.0647839 0.0279547)
      PathPoint glmax2_r-P4: femur_r (-0.0173053 -0.112706 0.0464802)
      PathWrap: wrap_object=Gmax2_at_pelvis_r method=hybrid
    Millard2012EquilibriumMuscle psoas_r: max_isometric_force=3509.034 optimal_fiber_length=0.1218373
        tendon_slack_length=0.1001804 pennation_angle_at_optimal=0.279914
      PathPoint iliacus_r-P1: pelvis (-0.0597777 0.0314918 0.0949644)
      PathPoint iliacus_r-P2: pelvis (-0.0133388 -0.0567667 0.0851638)
      PathPoint iliacus_r-P3: femur_r (-0.00255142 -0.0626762 0.0154195)
      PathPoint iliacus_r-P4: femur_r (-0.0135336 -0.0706633 0.0217425)
      PathWrap: wrap_object=IL_at_brim_r method=hybrid range=(2 3)
    Millard2012EquilibriumMuscle rect_fem_r: max_isometric_force=1932.815 optimal_fiber_length=0.08344048
        tendon_slack_length=0.4930503 pennation_angle_at_optimal=0.2170149
      PathPoint recfem_r-P1: pelvis (-0.0237135 -0.0395431 0.105103)
      PathPoint recfem_r-P2: patella_r (0.01 0.049 0.0007)
      PathPoint recfem_r-P3: patella_r (0.0121 0.0437 -0.001)
      PathPoint recfem_r-P4: patella_r (0.005 0.00247 3e-5)
      PathPoint recfem_r-P5: tibia_r (0.0351135 -0.0679866 -0.000506237)
      PathWrap: wrap_object=KnExt_at_fem_r method=hybrid
    Millard2012EquilibriumMuscle semimem_r: max_isometric_force=3573.305 optimal_fiber_length=0.10693
        tendon_slack_length=0.3416191 pennation_angle_at_optimal=0.2239
      PathPoint P1: pelvis (-0.0975216 -0.116183 0.0691674)
      PathPoint P2: tibia_r (-0.0312359 -0.0449151 -0.0211112)
      PathWrap: wrap_object=SM_at_condyles_r method=hybrid
    Millard2012EquilibriumMuscle soleus_r: max_isometric_force=7118.39 optimal_fiber_length=0.04749042
        tendon_slack_length=0.2987103 pennation_angle_at_optimal=0.3814289
      PathPoint P1: tibia_r (-0.00818596 -0.0986624 0.0105556)
      PathPoint P2: calcn_r (0.00492203 0.034678 -0.00592881)
    Millard2012EquilibriumMuscle tib_ant_r: max_isometric_force=2391.33 optimal_fiber_length=0.07410933
        tendon_slack_length=0.2609137 pennation_angle_at_optimal=0.1951828
      PathPoint tibant_r-P1: tibia_r (0.0165873 -0.141316 0.017449)
      PathPoint tibant_r-P2: tibia_r (0.0270352 -0.205295 0.0137869)
      PathPoint tibant_r-P3: tibia_r (0.0250964 -0.394111 -0.0142177)
      PathPoint tibant_r-P4: calcn_r (0.130434 0.0199119 -0.0341186)
    Millard2012EquilibriumMuscle vas_int_r: max_isometric_force=8431.318 optimal_fiber_length=0.1095437
        tendon_slack_length=0.2230705 pennation_angle_at_optimal=0.06309973
      PathPoint vasint_r-P1: femur_r (0.0321701 -0.213432 0.0343887)
      PathPoint vasint_r-P2: femur_r (0.037162 -0.231181 0.0316154)
      PathPoint vasint_r-P3: patella_r (0.0058 0.048 -0.0006)
      PathPoint vasint_r-P4: patella_r (0.005 0.00247 -0.00039)
      PathPoint vasint_r-P5: tibia_r (0.0350812 -0.0680727 0.000463153)
      PathWrap: wrap_object=KnExt_at_fem_r method=hybrid
    Millard2012EquilibriumMuscle bifemsh_l: max_isometric_force=489.3992 optimal_fiber_length=0.1217287
        tendon_slack_length=0.1167814 pennation_angle_at_optimal=0.2642232
      PathPoint bfsh_l-P1: femur_l (0.00554657 -0.234176 -0.0259579)
      PathPoint bfsh_l-P2: tibia_l (-0.0324207 -0.0451305 -0.0342518)
      PathWrap: wrap_object=BF_at_gastroc_l method=hybrid
    Millard2012EquilibriumMuscle med_gas_l: max_isometric_force=4208.703 optimal_fiber_length=0.05510411
        tendon_slack_length=0.4308021 pennation_angle_at_optimal=0.1656816
      PathPoint gasmed_l-P1: femur_l (0.00887451 -0.420208 0.0230737)
      PathPoint gasmed_l-P2: calcn_l (0.00492203 0.034678 0.00592881)
      PathWrap: wrap_object=GasMed_at_shank_l method=hybrid
      PathWrap: wrap_object=Gastroc_at_condyles_l method=hybrid
    Millard2012EquilibriumMuscle glut_max2_l: max_isometric_force=3042.352 optimal_fiber_length=0.1669777
        tendon_slack_length=0.07220152 pennation_angle_at_optimal=0.3673821
      PathPoint glmax2_l-P1: pelvis (-0.130128 0.00886662 -0.0520445)
      PathPoint glmax2_l-P2: pelvis (-0.132795 -0.0620663 -0.0915849)
      PathPoint glmax2_l-P3: femur_l (-0.0499191 -0.0647839 -0.0279547)
      PathPoint glmax2_l-P4: femur_l (-0.0173053 -0.112706 -0.0464802)
      PathWrap: wrap_object=Gmax2_at_pelvis_l method=hybrid
    Millard2012EquilibriumMuscle psoas_l: max_isometric_force=3509.034 optimal_fiber_length=0.1218373
        tendon_slack_length=0.1001804 pennation_angle_at_optimal=0.279914
      PathPoint iliacus_l-P1: pelvis (-0.0597777 0.0314918 -0.0949644)
      PathPoint iliacus_l-P2: pelvis (-0.0133388 -0.0567667 -0.0851638)
      PathPoint iliacus_l-P3: femur_l (-0.00255142 -0.0626762 -0.0154195)
      PathPoint iliacus_l-P4: femur_l (-0.0135336 -0.0706633 -0.0217425)
      PathWrap: wrap_object=IL_at_brim_l method=hybrid range=(2 3)
    Millard2012EquilibriumMuscle rect_fem_l: max_isometric_force=1932.815 optimal_fiber_length=0.08344048
        tendon_slack_length=0.4930503 pennation_angle_at_optimal=0.2170149
      PathPoint recfem_l-P1: pelvis (-0.0237135 -0.0395431 -0.105103)
      PathPoint recfem_l-P2: patella_l (0.01 0.049 -0.0007)
      PathPoint recfem_l-P3: patella_l (0.0121 0.0437 0.001)
      PathPoint recfem_l-P4: patella_l (0.005 0.00247 -3e-5)
      PathPoint recfem_l-P5: tibia_l (0.0351135 -0.0679866 0.000506237)
      PathWrap: wrap_object=KnExt_at_fem_l method=hybrid
    Millard2012EquilibriumMuscle semimem_l: max_isometric_force=3573.305 optimal_fiber_length=0.07685594
        tendon_slack_length=0.3871601 pennation_angle_at_optimal=0.2545615
      PathPoint P1: pelvis (-0.0975216 -0.116183 -0.0691674)
      PathPoint P2: tibia_l (-0.0312359 -0.0449151 0.0211112)
      PathWrap: wrap_object=SM_at_condyles_l method=hybrid
    Millard2012EquilibriumMuscle soleus_l: max_isometric_force=7118.39 optimal_fiber_length=0.04749042
        tendon_slack_length=0.2987103 pennation_angle_at_optimal=0.3814289
      PathPoint P1: tibia_l (-0.00818596 -0.0986624 -0.0105556)
      PathPoint P2: calcn_l (0.00492203 0.034678 0.00592881)
    Millard2012EquilibriumMuscle tib_ant_l: max_isometric_force=2391.33 optimal_fiber_length=0.07410933
        tendon_slack_length=0.2609137 pennation_angle_at_optimal=0.1951828
      PathPoint tibant_l-P1: tibia_l (0.0165873 -0.141316 -0.017449)
      PathPoint tibant_l-P2: tibia_l (0.0270352 -0.205295 -0.0137869)
      PathPoint tibant_l-P3: tibia_l (0.0250964 -0.394111 0.0142177)
      PathPoint tibant_l-P4: calcn_l (0.130434 0.0199119 0.0341186)
    Millard2012EquilibriumMuscle vas_int_l: max_isometric_force=8431.318 optimal_fiber_length=0.1095437
        tendon_slack_length=0.2230705 pennation_angle_at_optimal=0.06309973
      PathPoint vasint_l-P1: femur_l (0.0321701 -0.213432 -0.0343887)
      PathPoint vasint_l-P2: femur_l (0.037162 -0.231181 -0.0316154)
      PathPoint vasint_l-P3: patella_l (0.0058 0.048 0.0006)
      PathPoint vasint_l-P4: patella_l (0.005 0.00247 0.00039)
      PathPoint vasint_l-P5: tibia_l (0.0350812 -0.0680727 -0.000463153)
      PathWrap: wrap_object=KnExt_at_fem_l method=hybrid
    CoordinateActuator coordact_pelvis_tx: min_control=-1 max_control=1 coordinate=pelvis_tx optimal_force=75
    CoordinateActuator coordact_pelvis_ty: min_control=-1 max_control=1 coordinate=pelvis_ty optimal_force=125
    CoordinateActuator coordact_pelvis_tz: min_control=-1 max_control=1 coordinate=pelvis_tz optimal_force=75
    CoordinateActuator coordact_pelvis_list: min_control=-1 max_control=1 coordinate=pelvis_list optimal_force=50
    CoordinateActuator coordact_pelvis_tilt: min_control=-1 max_control=1 coordinate=pelvis_tilt optimal_force=75
    CoordinateActuator coordact_pelvis_rotation: min_control=-1 max_control=1 coordinate=pelvis_rotation
        optimal_force=25
    CoordinateActuator lumbar_ext: min_control=-1 max_control=1 coordinate=lumbar_extension optimal_force=20
    CoordinateActuator lumbar_bend: min_control=-1 max_control=1 coordinate=lumbar_bending optimal_force=20
    CoordinateActuator lumbar_rot: min_control=-1 max_control=1 coordinate=lumbar_rotation optimal_force=10
    CoordinateActuator coordact_hip_adduction_r: min_control=-1 max_control=1 coordinate=hip_adduction_r
        optimal_force=75
    CoordinateActuator coordact_hip_rotation_r: min_control=-1 max_control=1 coordinate=hip_rotation_r optimal_force=25
    CoordinateActuator coordact_hip_adduction_l: min_control=-1 max_control=1 coordinate=hip_adduction_l
        optimal_force=75
    CoordinateActuator coordact_hip_rotation_l: min_control=-1 max_control=1 coordinate=hip_rotation_l optimal_force=25
    CoordinateActuator coordact_hip_flexion_r: min_control=-1 max_control=1 coordinate=hip_flexion_r optimal_force=10
    CoordinateActuator coordact_knee_angle_r: min_control=-1 max_control=1 coordinate=knee_angle_r optimal_force=25
    CoordinateActuator coordact_hip_flexion_l: min_control=-1 max_control=1 coordinate=hip_flexion_l optimal_force=10
    CoordinateActuator coordact_knee_angle_l: min_control=-1 max_control=1 coordinate=knee_angle_l optimal_force=25
