# OpenSim document version 30000
Model walk_subject01:
  length_units: meters
  force_units: N
  gravity: 0 -9.80665 0
  credits:
    A planar reduced gait model with 10 degrees of freedom and 18 muscles by Ajay Seth. Closely based on Delp S.L., Loan J.P., Hoy M.G., Zajac F.E., Topp E.L., Rosen J.M., Thelen D.G., Anderson F.C., Seth A. Notes: 3D, 23 DOF gait model created by D.G. Thelen, Univ. of Wisconsin-Madison, and Ajay Seth, Frank C. Anderson, and Scott L. Delp, Stanford University. Lower extremity joint defintions based on Delp et al. (1990). Low back joint and anthropometry based on Anderson and Pandy (1999, 2001). Planar knee model of Yamaguchi and Zajac (1989). Seth replaced tibia translation constraints with a CustomJoint for the knee and removed the patella to eliminate all kinematic constraints; insertions of the quadrucepts are handled with moving points in the tibia frame as defined by Delp 1990. Number of muscles was reduced by Anderson to improve simulation speed for demonstrations and is not intended to be used in research. License: Creative Commons (CCBY 3.0). You are free to distribute, remix, tweak, and build upon this work, even commercially, as long as you credit us for the original creation. http://creativecommons.org/licenses/by/3.0/ More Information: http://simtk-confluence.stanford.edu:8080/display/OpenSim/Gait+2392+and+2354+Models
  publications:
    Delp, S.L., Loan, J.P., Hoy, M.G., Zajac, F.E., Topp E.L., Rosen, J.M.: An interactive graphics-based model of the lower extremity to study orthopaedic surgical procedures, IEEE Transactions on Biomedical Engineering, vol. 37, pp. 757-767, 1990. Yamaguchi G.T., Zajac F.E.: A planar model of the knee joint to characterize the knee extensor mechanism." J . Biomech. vol. 22. pp. 1-10. 1989. Anderson F.C., Pandy M.G.: A dynamic optimization solution for vertical jumping in three dimensions. Computer Methods in Biomechanics and Biomedical Engineering 2:201-231, 1999. Anderson F.C., Pandy M.G.: Dynamic optimization of human walking. Journal of Biomechanical Engineering 123:381-390, 2001.
  BodySet:
    Body ground: mass=0 mass_center=(0 0 0) inertia_xx=0 inertia_yy=0 inertia_zz=0
    Body pelvis: mass=11.37517 mass_center=(-0.0724378 0 0) inertia_xx=0.1042337 inertia_yy=0.08831474
        inertia_zz=0.0587075 meshes=(sacrum.vtp pelvis.vtp l_pelvis.vtp)
      CustomJoint ground_pelvis: parent_body=ground location_in_parent=(0 0 0) location=(0 0 0)
        Coordinate pelvis_tilt: motion_type=rotational default_value=0 range=(-1.570796 1.570796) clamped=false
        Coordinate pelvis_tx: motion_type=translational default_value=0 range=(-5 5) clamped=false
        Coordinate pelvis_ty: motion_type=translational default_value=0 range=(-1 2) clamped=false
        SpatialTransform: axes_held_at_zero=(rotation2 rotation3)
          TransformAxis rotation1: coordinates=pelvis_tilt axis=(0 0 1) LinearFunction(coefficients=1 0)
          TransformAxis translation1: coordinates=pelvis_tx axis=(1 0 0) LinearFunction(coefficients=1 0)
          TransformAxis translation2: coordinates=pelvis_ty axis=(0 1 0) LinearFunction(coefficients=1 0)
          TransformAxis translation3: axis=(0 0 1) MultiplierFunction(scale=1, Constant(value=0.02))
    Body femur_r: mass=8.984038 mass_center=(0 -0.195031 0) inertia_xx=0.1702207 inertia_yy=0.04462096
        inertia_zz=0.1795009 meshes=femur.vtp
      PinJoint hip_r: parent_body=pelvis location_in_parent=(-0.07243781 -0.06772474 0.08555243) location=(0 0 0)
        Coordinate hip_flexion_r: motion_type=rotational default_value=0 range=(-2.094395 2.094395) clamped=false
    Body torso: mass=33.06845 mass_center=(-0.0323916 0.34551 0) inertia_xx=1.660314 inertia_yy=0.850707
        inertia_zz=1.611783 meshes=(hat_spine.vtp hat_jaw.vtp hat_skull.vtp hat_ribs.vtp)
      PinJoint back: parent_body=pelvis location_in_parent=(-0.1031752 0.08350327 0) location=(0 0 0)
        Coordinate lumbar_extension: motion_type=rotational default_value=0 range=(-1.570796 1.570796) clamped=false
  ForceSet:
    CoordinateActuator tau_pelvis_tilt: coordinate=pelvis_tilt optimal_force=1
    CoordinateActuator tau_pelvis_tx: coordinate=pelvis_tx optimal_force=1
    CoordinateActuator tau_pelvis_ty: coordinate=pelvis_ty optimal_force=1
    CoordinateActuator tau_hip_flexion_r: coordinate=hip_flexion_r optimal_force=1
    CoordinateActuator tau_lumbar_extension: coordinate=pelvis_ty optimal_force=1
  MarkerSet:
    Marker Sternum: torso (0.103606 0.312439 1.04318e-6)
    Marker R.Acromium: torso (-0.0248718 0.426445 0.168585)
    Marker L.Acromium: torso (-0.0220089 0.440789 -0.171971)
    Marker Top.Head: torso (0.0595133 0.699598 0.0105017)
    Marker R.ASIS: pelvis (0.0228989 0.0358624 0.130116)
    Marker L.ASIS: pelvis (0.0291329 0.0276591 -0.131894)
    Marker V.Sacral: pelvis (-0.172091 0.0400029 0.00619843)
    Marker R.Thigh.Upper: femur_r (0.0507116 -0.220081 0.0883855)
    Marker R.Thigh.Front: femur_r (0.107902 -0.281747 -0.00690114)
    Marker R.Thigh.Rear: femur_r (0.0395109 -0.340915 0.0789543)
    Marker R.Knee.Lat: femur_r (-0.000586415 -0.426232 0.0605411)
    Marker R.Knee.Med: femur_r (-0.00243031 -0.442908 -0.0607482)
