# OpenSim document version 40000
Model 3DGaitModel_med-lat_knee_Lerner_et_al_Osim4.0:
  gravity: 0 -9.80665 0
  length_units: meters
  force_units: N
  credits:
    Lerner, Z.F., DeMers, M.S., Steele, K.M. Delp S.L., Loan J.P., Hoy M.G., Zajac F.E., Topp E.L., Rosen J.M., Thelen D.G., Anderson F.C., Seth A.
  publications:
    Notes: Knee mechanism for resolving medial and lateral knee joint contact forces added by Zach Lerner, Matt DeMers, Scott Delp, and Ray Browning; "How Tibiofemoral Alignment Affect Predictions of Medial and Lateral Tibiofemoral Contact Forces" J Biomech 2015. 3D, 23 DOF gait model created by D.G. Thelen, Univ. of Wisconsin-Madison, and Matt DeMers, Katherine Steele, Ajay Seth, Frank C. Anderson, and Scott L. Delp, Stanford University. Lower extremity joint defintions based on Delp et al. (1990). Low back joint and anthropometry based on Anderson and Pandy (1999, 2001). Planar knee model of Yamaguchi and Zajac (1989). DeMers and Steele redefined the planar patella kinematics as a planar joint between the patella and femur instead of constraints between the patella and tibia. Quadriceps wrap through the patell to the tibial tuberocity in place of a separate patellar ligament. Delp, S.L., Loan, J.P., Hoy, M.G., Zajac, F.E., Topp E.L., Rosen, J.M.: An interactive graphics-based model of the lower extremity to study orthopaedic surgical procedures, IEEE Transactions on Biomedical Engineering, vol. 37, pp. 757-767, 1990. Yamaguchi G.T., Zajac F.E.: A planar model of the knee joint to characterize the knee extensor mechanism." J . Biomecl7. vol. 21. pp. 1-10. 1989. Anderson F.C., Pandy M.G.: A dynamic optimization solution for vertical jumping in three dimensions. Computer Methods in Biomechanics and Biomedical Engineering 2:201-231, 1999. Anderson F.C., Pandy M.G.: Dynamic optimization of human walking. Journal of Biomechanical Engineering 123:381-390, 2001.
  Ground
  BodySet:
    Body pelvis: mass=11.777 [kg] mass_center=(-0.0707 0 0) inertia=(0.1028 0.0871 0.0579 0 0 0)
        meshes=(sacrum.vtp pelvis.vtp l_pelvis.vtp)
    Body femur_r: mass=9.3014 mass_center=(0 -0.17 0) inertia=(0.1339 0.0351 0.1412 0 0 0) meshes=femur_r.vtp
    Body femoral_cond_r: mass=0 mass_center=(0 0 0) inertia=(0 0 0 0 0 0) meshes=fem_cond.vtp
    Body sagittal_articulation_frame_r: mass=0 mass_center=(0 0 0) inertia=(0 0 0 0 0 0)
    Body med_cond_r: mass=1e-7 mass_center=(0 0 0) inertia=(1e-7 1e-7 1e-7 0 0 0) meshes=sphere.vtp
    Body lat_cond_r: mass=1e-7 mass_center=(0 0 0) inertia=(1e-7 1e-7 1e-7 0 0 0) meshes=sphere.vtp
    Body tibial_plat_r: mass=0 mass_center=(0 0 0) inertia=(0 0 0 0 0 0) meshes=tib_plat.vtp
    Body tibia_r: mass=3.7075 mass_center=(0 -0.1867 0) inertia=(0.0504 0.0051 0.0511 0 0 0)
        meshes=(tibia_r.vtp fibula_r.vtp)
    Body patella_r: mass=0.1 mass_center=(0 0 0) inertia=(0.001 0.001 0.001 0 0 0) meshes=pat.vtp
    Body talus_r: mass=0.1 mass_center=(0 0 0) inertia=(0.001 0.001 0.001 0 0 0) meshes=talus_rv.vtp
    Body calcn_r: mass=1.25 mass_center=(0.1 0.03 0) inertia=(0.0014 0.0039 0.0041 0 0 0) meshes=foot.vtp
    Body toes_r: mass=0.2166 mass_center=(0.0346 0.006 -0.0175) inertia=(0.0001 0.0002 0.001 0 0 0) meshes=bofoot.vtp
    Body femur_l: mass=9.3014 mass_center=(0 -0.17 0) inertia=(0.1339 0.0351 0.1412 0 0 0) meshes=l_femur.vtp
    Body femoral_cond_l: mass=0 mass_center=(0 0 0) inertia=(0 0 0 0 0 0) meshes=fem_cond.vtp
    Body sagittal_articulation_frame_l: mass=0 mass_center=(0 0 0) inertia=(0 0 0 0 0 0)
    Body med_cond_l: mass=0 mass_center=(0 0 0) inertia=(0 0 0 0 0 0) meshes=sphere.vtp
    Body lat_cond_l: mass=1e-7 mass_center=(0 0 0) inertia=(1e-7 1e-7 1e-7 0 0 0) meshes=sphere.vtp
    Body tibial_plat_l: mass=0 mass_center=(0 0 0) inertia=(0 0 0 0 0 0) meshes=tib_plat.vtp
    Body tibia_l: mass=3.7075 mass_center=(0 -0.1867 0) inertia=(0.0504 0.0051 0.0511 0 0 0)
        meshes=(l_tibia.vtp l_fibula.vtp)
    Body patella_l: mass=0.1 mass_center=(0 0 0) inertia=(0.001 0.001 0.001 0 0 0) meshes=l_patella.vtp
    Body talus_l: mass=0.1 mass_center=(0 0 0) inertia=(0.001 0.001 0.001 0 0 0) meshes=talus_lv.vtp
    Body calcn_l: mass=1.25 mass_center=(0.1 0.03 0) inertia=(0.0014 0.0039 0.0041 0 0 0) meshes=l_foot.vtp
    Body toes_l: mass=0.2166 mass_center=(0.0346 0.006 0.0175) inertia=(0.0001 0.0002 0.001 0 0 0) meshes=l_bofoot.vtp
    Body torso: mass=34.2366 mass_center=(-0.03 0.32 0) inertia=(1.4745 0.7555 1.4314 0 0 0)
        meshes=(hat_spine.vtp hat_jaw.vtp hat_skull.vtp hat_ribs.vtp)
  JointSet:
    CustomJoint ground_pelvis: socket_parent_frame=ground_offset socket_child_frame=pelvis_offset
      Coordinate pelvis_tilt: default_value=0 range=(-1.570796 1.570796) clamped=true
      Coordinate pelvis_list: default_value=0 range=(-1.570796 1.570796) clamped=true
      Coordinate pelvis_rotation: default_value=0 range=(-1.570796 1.570796) clamped=true
      Coordinate pelvis_tx: default_value=0.12 range=(-5 5) clamped=true
      Coordinate pelvis_ty: default_value=0.93 range=(-1 2) clamped=true
      Coordinate pelvis_tz: default_value=0 range=(-3 3) clamped=true
      PhysicalOffsetFrame ground_offset: socket_parent=/ground translation=(0 0 0) [meters]
      PhysicalOffsetFrame pelvis_offset: socket_parent=/bodyset/pelvis translation=(0 0 0)
      SpatialTransform:
        TransformAxis rotation1: coordinates=pelvis_tilt axis=(0 0 1) LinearFunction(coefficients=1 0)
        TransformAxis rotation2: coordinates=pelvis_list axis=(1 0 0) LinearFunction(coefficients=1 0)
        TransformAxis rotation3: coordinates=pelvis_rotation axis=(0 1 0) LinearFunction(coefficients=1 0)
        TransformAxis translation1: coordinates=pelvis_tx axis=(1 0 0) LinearFunction(coefficients=1 0)
        TransformAxis translation2: coordinates=pelvis_ty axis=(0 1 0) LinearFunction(coefficients=1 0)
        TransformAxis translation3: coordinates=pelvis_tz axis=(0 0 1) LinearFunction(coefficients=1 0)
    CustomJoint hip_r: socket_parent_frame=pelvis_offset socket_child_frame=femur_r_offset
      Coordinate hip_flexion_r: default_value=0 range=(-2.094395 2.094395) clamped=true
      Coordinate hip_adduction_r: default_value=0 range=(-2.094395 2.094395) clamped=true
      Coordinate hip_rotation_r: default_value=0 range=(-2.094395 2.094395) clamped=true
      PhysicalOffsetFrame pelvis_offset: socket_parent=/bodyset/pelvis translation=(-0.0707 -0.0661 0.0835)
      PhysicalOffsetFrame femur_r_offset: socket_parent=/bodyset/femur_r translation=(0 0 0)
      SpatialTransform: axes_held_at_zero=(translation1 translation2 translation3)
        TransformAxis rotation1: coordinates=hip_flexion_r axis=(0 0 1) LinearFunction(coefficients=1 0)
        TransformAxis rotation2: coordinates=hip_adduction_r axis=(1 0 0) LinearFunction(coefficients=1 0)
        TransformAxis rotation3: coordinates=hip_rotation_r axis=(0 1 0) LinearFunction(coefficients=1 0)
    WeldJoint femur_weld_r: socket_parent_frame=femur_r_offset socket_child_frame=femoral_cond_r_offset
      PhysicalOffsetFrame femur_r_offset: socket_parent=/bodyset/femur_r translation=(0 -0.404 0)
      PhysicalOffsetFrame femoral_cond_r_offset: socket_parent=/bodyset/femoral_cond_r translation=(0 0 0)
    CustomJoint knee_r: socket_parent_frame=femoral_cond_r_offset
        socket_child_frame=sagittal_articulation_frame_r_offset
      Coordinate knee_angle_r: default_value=0 range=(-2.094395 0.1745329) clamped=true
      PhysicalOffsetFrame femoral_cond_r_offset: socket_parent=/bodyset/femoral_cond_r translation=(0 0 0)
      PhysicalOffsetFrame sagittal_articulation_frame_r_offset: socket_parent=/bodyset/sagittal_articulation_frame_r
          translation=(0 0 0)
      SpatialTransform: axes_held_at_zero=(rotation2 rotation3 translation3)
        TransformAxis rotation1: coordinates=knee_angle_r axis=(0 0 1) LinearFunction(coefficients=1 0)
        TransformAxis translation1: coordinates=knee_angle_r axis=(1 0 0)
          SimmSpline: x=(-2.0944 -1.74533 -1.39626 -1.0472 -0.698132 -0.349066 -0.174533 0.197344 0.337395 0.490178 1.52146 2.0944)
              y=(-0.0032 0.00179 0.00411 0.0041 0.00212 -0.001 -0.0031 -0.005227 -0.005435 -0.005574 -0.005435 -0.00525)
        TransformAxis translation2: coordinates=knee_angle_r axis=(0 1 0)
          SimmSpline: x=(-2.0944 -1.22173 -0.523599 -0.349066 -0.174533 0.159149 2.0944)
              y=(-0.0186 -0.0042 0.005 0.0064 0.0074 0.0087 0.008)
    CustomJoint med_cond_joint_r: socket_parent_frame=sagittal_articulation_frame_r_offset
        socket_child_frame=med_cond_r_offset
      Coordinate med_cond_adduction_r: default_value=0 range=(-2.094395 2.094395) clamped=true
          is_free_to_satisfy_constraints=true
      PhysicalOffsetFrame sagittal_articulation_frame_r_offset: socket_parent=/bodyset/sagittal_articulation_frame_r
          translation=(0 -0.035 -0.02)
      PhysicalOffsetFrame med_cond_r_offset: socket_parent=/bodyset/med_cond_r translation=(0 0 0)
      SpatialTransform: axes_held_at_zero=(rotation2 rotation3 translation1 translation2 translation3)
        TransformAxis rotation1: coordinates=med_cond_adduction_r axis=(1 0 0) LinearFunction(coefficients=1 0)
    CustomJoint lat_cond_joint_r: socket_parent_frame=sagittal_articulation_frame_r_offset
        socket_child_frame=lat_cond_r_offset
      Coordinate lat_cond_adduction_r: default_value=0 range=(-2.094395 2.094395) clamped=true
          is_free_to_satisfy_constraints=true
      PhysicalOffsetFrame sagittal_articulation_frame_r_offset: socket_parent=/bodyset/sagittal_articulation_frame_r
          translation=(0 -0.035 0.02)
      PhysicalOffsetFrame lat_cond_r_offset: socket_parent=/bodyset/lat_cond_r translation=(0 0 0)
      SpatialTransform: axes_held_at_zero=(rotation2 rotation3 translation1 translation2 translation3)
        TransformAxis rotation1: coordinates=lat_cond_adduction_r axis=(1 0 0) LinearFunction(coefficients=1 0)
    WeldJoint med_cond_weld_r: socket_parent_frame=med_cond_r_offset socket_child_frame=tibial_plat_r_offset
      PhysicalOffsetFrame med_cond_r_offset: socket_parent=/bodyset/med_cond_r translation=(0 0.035 0.02)
      PhysicalOffsetFrame tibial_plat_r_offset: socket_parent=/bodyset/tibial_plat_r translation=(0 0 0)
    WeldJoint tibial_plat_weld_r: socket_parent_frame=tibial_plat_r_offset socket_child_frame=tibia_r_offset
      PhysicalOffsetFrame tibial_plat_r_offset: socket_parent=/bodyset/tibial_plat_r translation=(0 0 0)
      PhysicalOffsetFrame tibia_r_offset: socket_parent=/bodyset/tibia_r translation=(0 0 0)
    CustomJoint fem_pat_r: socket_parent_frame=femoral_cond_r_offset socket_child_frame=patella_r_offset
      Coordinate patella_r_constrained_knee_angle: default_value=0 range=(-999999.9 999999.9) clamped=true
      PhysicalOffsetFrame femoral_cond_r_offset: socket_parent=/bodyset/femoral_cond_r translation=(0 0 0.0024)
      PhysicalOffsetFrame patella_r_offset: socket_parent=/bodyset/patella_r translation=(0 0 0)
      SpatialTransform: axes_held_at_zero=(rotation2 rotation3 translation3)
        TransformAxis rotation1: coordinates=patella_r_constrained_knee_angle axis=(0 0 1)
          SimmSpline: x=(-2.0944 -1.45752 -0.526391 0 0.0523599 0.174533)
              y=(-1.68636 -1.09112 -0.256161 -0.0012 -0.0187016 -0.1054)
        TransformAxis translation1: coordinates=patella_r_constrained_knee_angle axis=(1 0 0)
          SimmSpline: x=(-2.0944 -1.91986 -1.5708 -1.39626 -1.0472 -0.698132 -0.349066 -0.174533 0 0.0872665 0.174533 2.0944)
              y=(-0.03082 -0.02767 -0.01694 -0.00996 0.00548 0.0215 0.03599 0.04069 0.0451 0.04648 0.04761 0.04648)
        TransformAxis translation2: coordinates=patella_r_constrained_knee_angle axis=(0 1 0)
          SimmSpline: x=(-2.0944 -1.91986 -1.5708 -1.39626 -1.0472 -0.698132 -0.349066 -0.174533 0 0.0872665 0.174533 2.0944)
              y=(-0.02263 -0.02892 -0.0391 -0.0424 -0.0447 -0.0406 -0.0297 -0.023 -0.0145 -0.0098 -0.005 -0.0098)
    CustomJoint ankle_r: socket_parent_frame=tibia_r_offset socket_child_frame=talus_r_offset
      Coordinate ankle_angle_r: default_value=0 range=(-1.570796 1.570796) clamped=true
      PhysicalOffsetFrame tibia_r_offset: socket_parent=/bodyset/tibia_r translation=(0 -0.43 0)
      PhysicalOffsetFrame talus_r_offset: socket_parent=/bodyset/talus_r translation=(0 0 0)
      SpatialTransform: axes_held_at_zero=(rotation2 rotation3 translation1 translation2 translation3)
        TransformAxis rotation1: coordinates=ankle_angle_r axis=(-0.1050135 -0.1740224 0.9791263)
            LinearFunction(coefficients=1 0)
    CustomJoint subtalar_r: socket_parent_frame=talus_r_offset socket_child_frame=calcn_r_offset
      Coordinate subtalar_angle_r: default_value=0 range=(-1.570796 1.570796) clamped=true
      PhysicalOffsetFrame talus_r_offset: socket_parent=/bodyset/talus_r translation=(-0.04877 -0.04195 0.00792)
      PhysicalOffsetFrame calcn_r_offset: socket_parent=/bodyset/calcn_r translation=(0 0 0)
      SpatialTransform: axes_held_at_zero=(rotation2 rotation3 translation1 translation2 translation3)
        TransformAxis rotation1: coordinates=subtalar_angle_r axis=(0.7871796 0.6047475 -0.1209495)
            LinearFunction(coefficients=1 0)
    CustomJoint mtp_r: socket_parent_frame=calcn_r_offset socket_child_frame=toes_r_offset
      Coordinate mtp_angle_r: default_value=0 range=(-1.570796 1.570796) clamped=true
      PhysicalOffsetFrame calcn_r_offset: socket_parent=/bodyset/calcn_r translation=(0.1788 -0.002 0.00108)
      PhysicalOffsetFrame toes_r_offset: socket_parent=/bodyset/toes_r translation=(0 0 0)
      SpatialTransform: axes_held_at_zero=(rotation2 rotation3 translation1 translation2 translation3)
        TransformAxis rotation1: coordinates=mtp_angle_r axis=(-0.5809544 0 0.8139361) LinearFunction(coefficients=1 0)
    CustomJoint hip_l: socket_parent_frame=pelvis_offset socket_child_frame=femur_l_offset
      Coordinate hip_flexion_l: default_value=0 range=(-2.094395 2.094395) clamped=true
      Coordinate hip_adduction_l: default_value=0 range=(-2.094395 2.094395) clamped=true
      Coordinate hip_rotation_l: default_value=0 range=(-2.094395 2.094395) clamped=true
      PhysicalOffsetFrame pelvis_offset: socket_parent=/bodyset/pelvis translation=(-0.0707 -0.0661 -0.0835)
      PhysicalOffsetFrame femur_l_offset: socket_parent=/bodyset/femur_l translation=(0 0 0)
      SpatialTransform: axes_held_at_zero=(translation1 translation2 translation3)
        TransformAxis rotation1: coordinates=hip_flexion_l axis=(0 0 1) LinearFunction(coefficients=1 0)
        TransformAxis rotation2: coordinates=hip_adduction_l axis=(-1 0 0) LinearFunction(coefficients=1 0)
        TransformAxis rotation3: coordinates=hip_rotation_l axis=(0 -1 0) LinearFunction(coefficients=1 0)
    WeldJoint femur_weld_l: socket_parent_frame=femur_l_offset socket_child_frame=femoral_cond_l_offset
      PhysicalOffsetFrame femur_l_offset: socket_parent=/bodyset/femur_l translation=(0 -0.404 0)
      PhysicalOffsetFrame femoral_cond_l_offset: socket_parent=/bodyset/femoral_cond_l translation=(0 0 0)
    CustomJoint knee_l: socket_parent_frame=femoral_cond_l_offset
        socket_child_frame=sagittal_articulation_frame_l_offset
      Coordinate knee_angle_l: default_value=0 range=(-2.094395 0.1745329) clamped=true
      PhysicalOffsetFrame femoral_cond_l_offset: socket_parent=/bodyset/femoral_cond_l translation=(0 0 0)
      PhysicalOffsetFrame sagittal_articulation_frame_l_offset: socket_parent=/bodyset/sagittal_articulation_frame_l
          translation=(0 0 0)
      SpatialTransform: axes_held_at_zero=(rotation2 rotation3 translation3)
        TransformAxis rotation1: coordinates=knee_angle_l axis=(0 0 1) LinearFunction(coefficients=1 0)
        TransformAxis translation1: coordinates=knee_angle_l axis=(1 0 0)
          SimmSpline: x=(-2.0944 -1.74533 -1.39626 -1.0472 -0.698132 -0.349066 -0.174533 0.197344 0.337395 0.490178 1.52146 2.0944)
              y=(-0.0032 0.00179 0.00411 0.0041 0.00212 -0.001 -0.0031 -0.005227 -0.005435 -0.005574 -0.005435 -0.00525)
        TransformAxis translation2: coordinates=knee_angle_l axis=(0 1 0)
          SimmSpline: x=(-2.0944 -1.22173 -0.523599 -0.349066 -0.174533 0.159149 2.0944)
              y=(-0.0186 -0.0042 0.005 0.0064 0.0074 0.0087 0.008)
    CustomJoint med_cond_joint_l: socket_parent_frame=sagittal_articulation_frame_l_offset
        socket_child_frame=med_cond_l_offset
      Coordinate med_cond_adduction_l: default_value=0 range=(-2.094395 2.094395) clamped=true
          is_free_to_satisfy_constraints=true
      PhysicalOffsetFrame sagittal_articulation_frame_l_offset: socket_parent=/bodyset/sagittal_articulation_frame_l
          translation=(0 -0.035 0.02)
      PhysicalOffsetFrame med_cond_l_offset: socket_parent=/bodyset/med_cond_l translation=(0 0 0)
      SpatialTransform: axes_held_at_zero=(rotation2 rotation3 translation1 translation2 translation3)
        TransformAxis rotation1: coordinates=med_cond_adduction_l axis=(1 0 0) LinearFunction(coefficients=1 0)
    CustomJoint lat_cond_joint_l: socket_parent_frame=sagittal_articulation_frame_l_offset
        socket_child_frame=lat_cond_l_offset
      Coordinate lat_cond_adduction_l: default_value=0 range=(-2.094395 2.094395) clamped=true
          is_free_to_satisfy_constraints=true
      PhysicalOffsetFrame sagittal_articulation_frame_l_offset: socket_parent=/bodyset/sagittal_articulation_frame_l
          translation=(0 -0.035 -0.02)
      PhysicalOffsetFrame lat_cond_l_offset: socket_parent=/bodyset/lat_cond_l translation=(0 0 0)
      SpatialTransform: axes_held_at_zero=(rotation2 rotation3 translation1 translation2 translation3)
        TransformAxis rotation1: coordinates=lat_cond_adduction_l axis=(1 0 0) LinearFunction(coefficients=1 0)
    WeldJoint med_cond_weld_l: socket_parent_frame=med_cond_l_offset socket_child_frame=tibial_plat_l_offset
      PhysicalOffsetFrame med_cond_l_offset: socket_parent=/bodyset/med_cond_l translation=(0 0.035 -0.02)
      PhysicalOffsetFrame tibial_plat_l_offset: socket_parent=/bodyset/tibial_plat_l translation=(0 0 0)
    WeldJoint tibial_plat_weld_l: socket_parent_frame=tibial_plat_l_offset socket_child_frame=tibia_l_offset
      PhysicalOffsetFrame tibial_plat_l_offset: socket_parent=/bodyset/tibial_plat_l translation=(0 0 0)
      PhysicalOffsetFrame tibia_l_offset: socket_parent=/bodyset/tibia_l translation=(0 0 0)
    CustomJoint fem_pat_l: socket_parent_frame=femoral_cond_l_offset socket_child_frame=patella_l_offset
      Coordinate patella_l_constrained_knee_angle: default_value=0 range=(-999999.9 999999.9) clamped=true
      PhysicalOffsetFrame femoral_cond_l_offset: socket_parent=/bodyset/femoral_cond_l translation=(0 0 -0.0024)
      PhysicalOffsetFrame patella_l_offset: socket_parent=/bodyset/patella_l translation=(0 0 0)
      SpatialTransform: axes_held_at_zero=(rotation2 rotation3 translation3)
        TransformAxis rotation1: coordinates=patella_l_constrained_knee_angle axis=(0 0 1)
          SimmSpline: x=(-2.0944 -1.45752 -0.526391 0 0.0523599 0.174533)
              y=(-1.68636 -1.09112 -0.256161 -0.0012 -0.0187016 -0.1054)
        TransformAxis translation1: coordinates=patella_l_constrained_knee_angle axis=(1 0 0)
          SimmSpline: x=(-2.0944 -1.91986 -1.5708 -1.39626 -1.0472 -0.698132 -0.349066 -0.174533 0 0.0872665 0.174533 2.0944)
              y=(-0.03082 -0.02767 -0.01694 -0.00996 0.00548 0.0215 0.03599 0.04069 0.0451 0.04648 0.04761 0.04648)
        TransformAxis translation2: coordinates=patella_l_constrained_knee_angle axis=(0 1 0)
          SimmSpline: x=(-2.0944 -1.91986 -1.5708 -1.39626 -1.0472 -0.698132 -0.349066 -0.174533 0 0.0872665 0.174533 2.0944)
              y=(-0.02263 -0.02892 -0.0391 -0.0424 -0.0447 -0.0406 -0.0297 -0.023 -0.0145 -0.0098 -0.005 -0.0098)
    CustomJoint ankle_l: socket_parent_frame=tibia_l_offset socket_child_frame=talus_l_offset
      Coordinate ankle_angle_l: default_value=0 range=(-1.047198 1.047198) clamped=true
      PhysicalOffsetFrame tibia_l_offset: socket_parent=/bodyset/tibia_l translation=(0 -0.43 0)
      PhysicalOffsetFrame talus_l_offset: socket_parent=/bodyset/talus_l translation=(0 0 0)
      SpatialTransform: axes_held_at_zero=(rotation2 rotation3 translation1 translation2 translation3)
        TransformAxis rotation1: coordinates=ankle_angle_l axis=(0.1050135 -0.1740224 0.9791263)
            LinearFunction(coefficients=1 0)
    CustomJoint subtalar_l: socket_parent_frame=talus_l_offset socket_child_frame=calcn_l_offset
      Coordinate subtalar_angle_l: default_value=0 range=(-1.570796 1.570796) clamped=true
      PhysicalOffsetFrame talus_l_offset: socket_parent=/bodyset/talus_l translation=(-0.04877 -0.04195 -0.00792)
      PhysicalOffsetFrame calcn_l_offset: socket_parent=/bodyset/calcn_l translation=(0 0 0)
      SpatialTransform: axes_held_at_zero=(rotation2 rotation3 translation1 translation2 translation3)
        TransformAxis rotation1: coordinates=subtalar_angle_l axis=(-0.7871796 -0.6047475 -0.1209495)
            LinearFunction(coefficients=1 0)
    CustomJoint mtp_l: socket_parent_frame=calcn_l_offset socket_child_frame=toes_l_offset
      Coordinate mtp_angle_l: default_value=0 range=(-1.047198 1.047198) clamped=true
      PhysicalOffsetFrame calcn_l_offset: socket_parent=/bodyset/calcn_l translation=(0.1788 -0.002 -0.00108)
      PhysicalOffsetFrame toes_l_offset: socket_parent=/bodyset/toes_l translation=(0 0 0)
      SpatialTransform: axes_held_at_zero=(rotation2 rotation3 translation1 translation2 translation3)
        TransformAxis rotation1: coordinates=mtp_angle_l axis=(0.5809544 0 0.8139361) LinearFunction(coefficients=1 0)
    CustomJoint back: socket_parent_frame=pelvis_offset socket_child_frame=torso_offset
      Coordinate lumbar_extension: default_value=0 range=(-1.570796 1.570796) clamped=true
      Coordinate lumbar_bending: default_value=0 range=(-1.570796 1.570796) clamped=true
      Coordinate lumbar_rotation: default_value=0 range=(-1.570796 1.570796) clamped=true
      PhysicalOffsetFrame pelvis_offset: socket_parent=/bodyset/pelvis translation=(-0.1007 0.0815 0)
      PhysicalOffsetFrame torso_offset: socket_parent=/bodyset/torso translation=(0 0 0)
      SpatialTransform: axes_held_at_zero=(translation1 translation2 translation3)
        TransformAxis rotation1: coordinates=lumbar_extension axis=(0 0 1) LinearFunction(coefficients=1 0)
        TransformAxis rotation2: coordinates=lumbar_bending axis=(1 0 0) LinearFunction(coefficients=1 0)
        TransformAxis rotation3: coordinates=lumbar_rotation axis=(0 1 0) LinearFunction(coefficients=1 0)
  ConstraintSet:
    WeldConstraint Lat_Cond_r_Constraint: socket_frame1=lat_cond_r_offset socket_frame2=/bodyset/tibial_plat_r
      PhysicalOffsetFrame lat_cond_r_offset: socket_parent=/bodyset/lat_cond_r translation=(0 0.035 -0.02)
    WeldConstraint Lat_Cond_l_Constraint: socket_frame1=lat_cond_l_offset socket_frame2=/bodyset/tibial_plat_l
      PhysicalOffsetFrame lat_cond_l_offset: socket_parent=/bodyset/lat_cond_l translation=(0 0.035 0.02)
    CoordinateCouplerConstraint: independent_coordinate_names=knee_angle_r
        dependent_coordinate_name=patella_r_constrained_knee_angle scale_factor=1
      coupled_coordinates_function: SimmSpline: x=(-2.0944 -1.45752 -0.526391 0 0.0523599 0.174533)
          y=(-2.0944 -1.45752 -0.526391 0 0.0523599 0.174533)
    CoordinateCouplerConstraint coordinatecouplerconstraint_0: independent_coordinate_names=knee_angle_l
        dependent_coordinate_name=patella_l_constrained_knee_angle scale_factor=1
      coupled_coordinates_function: SimmSpline: x=(-2.0944 -1.99997 -1.45752 -0.526391 0.0279253 0.174533)
          y=(-2.0944 -1.99997 -1.45752 -0.526391 0.0279253 0.174533)
  ForceSet:
    Thelen2003Muscle tib_post_r: optimal_force=1 max_isometric_force=1588 optimal_fiber_length=0.031
        tendon_slack_length=0.31 pennation_angle_at_optimal=0.2094395 [radians] max_contraction_velocity=10
        FmaxTendonStrain=0.033 FmaxMuscleStrain=0.6 KshapeActive=0.5 KshapePassive=4 Af=0.3 Flen=1.8
        activation_time_constant=0.01 [seconds] deactivation_time_constant=0.04 [seconds]
      PathPoint P1: tibia_r (-0.0094 -0.1348 0.0019)
      PathPoint P2: tibia_r (-0.0144 -0.4051 -0.0229)
      PathPoint P3: calcn_r (0.0417 0.0334 -0.0286)
      PathPoint P4: calcn_r (0.0772 0.0159 -0.0281)
