# OpenSim document version 10600
Model block_hanging_from_muscle:
  credits: Model authors names..
  publications: List of publications related to model...
  length_units: meters
  force_units: N
  defaults: Thelen2003Muscle default: muscle_model=9 max_isometric_force=1000 optimal_fiber_length=0.1
      tendon_slack_length=0.2 pennation_angle=0 activation_time_constant=0.01 deactivation_time_constant=0.04 Vmax=10
      Vmax0=5 FmaxTendonStrain=0.033 FmaxMuscleStrain=0.6 KshapeActive=0.5 KshapePassive=4 damping=0.05 Af=0.3 Flen=1.8
  DynamicsEngine:
    SimbodyEngine default: gravity=(0 -9.80665 0)
      BodySet:
        Body ground: mass=0 mass_center=(0 0 0) inertia_xx=0 inertia_yy=0 inertia_zz=0
        Body block: mass=100 mass_center=(0 0 0) inertia_xx=0.01666667 inertia_yy=0.01666667 inertia_zz=0.01666667
            meshes=small_block.vtp
          CustomJoint ground_block: parent_body=ground location_in_parent=(0 0 0) location=(0 0 0)
            Coordinate block_ty: default_value=-0.4246201 initial_value=-0.4246201 tolerance=0 stiffness=0
                range=(-1 -0.1) keys=p_key clamped=true restraint_active=false
            TransformAxis ty: coordinate=block_ty is_rotation=false axis=(0 1 0)
  ActuatorSet:
    Thelen2003Muscle muscle: muscle_model=9 max_isometric_force=10000 optimal_fiber_length=0.1 tendon_slack_length=0.2
        pennation_angle=0 activation_time_constant=0.01 deactivation_time_constant=0.04 Vmax=10 Vmax0=5
        FmaxTendonStrain=0.033 FmaxMuscleStrain=0.6 KshapeActive=0.5 KshapePassive=4 damping=0.05 Af=0.3 Flen=1.8
      MusclePoint P1: ground (0 0 0)
      MusclePoint P2: block (0 0.1 0)
