# OpenSim document version 10600
CMCTool block_hanging_from_muscle:
  model_file: block_hanging_from_muscle.osim
  replace_actuator_set: false
  results_directory: CMCResultsDYNAMIC
  output_precision: 20
  initial_time: 0
  final_time: 5
  maximum_number_of_integrator_steps: 30000
  maximum_integrator_step_size: 0.001
  minimum_integrator_step_size: 0.0000000001
  integrator_error_tolerance: 1e-6
  integrator_fine_tolerance: 1e-8
  states_file: block_hanging_from_muscle_InitialStates.sto
  desired_kinematics_file: ForwardResultsDYNAMIC/block_hanging_from_muscle_Kinematics_q.mot
  lowpass_cutoff_frequency: -1
  task_set_file: block_hanging_from_muscle_CMC_Tasks.xml
  use_fast_optimization_target: true
  optimizer_derivative_dx: 1
  optimizer_convergence_criterion: 0.001
  optimizer_max_iterations: 2000
  optimizer_print_level: 0
  optimizer_algorithm: ipopt
  cmc_time_window: 0.04
  use_curvature_filter: true
  use_verbose_printing: false
  AnalysisSet Analyses:
    Kinematics: step_interval=15 in_degrees=true
    Actuation: step_interval=15 in_degrees=true
    BodyKinematics: step_interval=15 in_degrees=true
    MuscleAnalysis: step_interval=15 in_degrees=true
