# OpenSim document version 10600
ForwardTool block_hanging_from_muscle:
  model_file: block_hanging_from_muscle.osim
  replace_actuator_set: false
  replace_contact_force_set: true
  results_directory: ForwardResultsDYNAMIC
  output_precision: 20
  initial_time: 0
  final_time: 5
  solve_for_equilibrium_for_auxiliary_states: false
  maximum_number_of_integrator_steps: 30000
  maximum_integrator_step_size: 0.001
  minimum_integrator_step_size: 0.0000000001
  integrator_error_tolerance: 1e-6
  integrator_fine_tolerance: 1e-8
  controls_file: block_hanging_from_muscle_Controls_Dynamic.xml
  states_file: block_hanging_from_muscle_InitialStates.sto
  use_specified_dt: false
  output_detailed_results: false
  AnalysisSet Analyses:
    Kinematics: step_interval=15 in_degrees=true
    Actuation: step_interval=15 in_degrees=true
    BodyKinematics: step_interval=15 in_degrees=true
    MuscleAnalysis: step_interval=15 in_degrees=true
