# OpenSim document version 10905
ForceSet:
  datafile: subject01_walk1_grf.mot
  PrescribedForce RightForce: body=calcn_r pointIsGlobal=false forceIsGlobal=true
    FunctionSet forceFunctions:
      NaturalCubicSpline ground_force_vx
      NaturalCubicSpline ground_force_vy
      NaturalCubicSpline ground_force_vz
    FunctionSet pointFunctions:
      NaturalCubicSpline ground_force_px
      NaturalCubicSpline ground_force_py
      NaturalCubicSpline ground_force_pz
    FunctionSet torqueFunctions:
      NaturalCubicSpline ground_torque_x
      NaturalCubicSpline ground_torque_y
      NaturalCubicSpline ground_torque_z
  PrescribedForce LeftForce: body=calcn_l pointIsGlobal=false forceIsGlobal=true
    FunctionSet forceFunctions:
      NaturalCubicSpline l_ground_force_vx
      NaturalCubicSpline l_ground_force_vy
      NaturalCubicSpline l_ground_force_vz
    FunctionSet pointFunctions:
      NaturalCubicSpline l_ground_force_px
      NaturalCubicSpline l_ground_force_py
      NaturalCubicSpline l_ground_force_pz
    FunctionSet torqueFunctions:
      NaturalCubicSpline l_ground_torque_x
      NaturalCubicSpline l_ground_torque_y
      NaturalCubicSpline l_ground_torque_z
