# OpenSim document version 20200
ForwardTool twoMusclesOnBlock_forward:
  model_file: twoMusclesOnBlock.osim
  replace_force_set: false
  results_directory: twoMusclesOnBlock_ForwardResults
  output_precision: 20
  initial_time: 0
  final_time: 1
  solve_for_equilibrium_for_auxiliary_states: true
  maximum_number_of_integrator_steps: 30000
  maximum_integrator_step_size: 0.1
  minimum_integrator_step_size: 0.0000000001
  integrator_error_tolerance: 1e-6
  use_specified_dt: false
  output_detailed_results: false
  ControllerSet Controllers:
    PrescribedController MuscleController: actuator_list=all enable_controller=true
      FunctionSet ControlFunctions:
        NaturalCubicSpline muscle1: x=(-0.4 -0.2 0 0.1 0.25 0.4 0.5 0.7 1)
            y=(0.01 0.015 0.02 0.2 0.5 0.2 0.075 0.015 0.01)
        NaturalCubicSpline muscle2: x=(-0.4 -0.2 0 0.3 0.5 0.6 0.75 0.9 1)
            y=(0.01 0.01 0.01 0.015 0.075 0.2 0.5 0.2 0.02)
