# OpenSim document version 10600
Model pendulum:
  credits: Model authors names..
  publications: List of publications related to model...
  DynamicsEngine:
    SimbodyEngine default: gravity=(0 -9.80665 0)
      BodySet:
        Body ground: mass=0 mass_center=(0 0 0) inertia_xx=0 inertia_yy=0 inertia_zz=0
        Body Pendulum: mass=50 mass_center=(0 0 0) inertia_xx=0.0001 inertia_yy=0.0001 inertia_zz=0.0001
          CustomJoint GroundJoint: parent_body=ground location_in_parent=(40 0 0) location=(0 0.5 0)
            Coordinate Pendulum_r1: default_value=0 initial_value=0 tolerance=0.00000001 stiffness=0
                range=(-999999.9 999999.9) clamped=true restraint_active=false
            Coordinate Pendulum_r2: default_value=0 initial_value=0 tolerance=0.00000001 stiffness=0
                range=(-999999.9 999999.9) clamped=true restraint_active=false
            Coordinate Pendulum_r3: default_value=0 initial_value=0 tolerance=0.00000001 stiffness=0
                range=(-999999.9 999999.9) clamped=true restraint_active=false
            TransformAxis r1: coordinate=Pendulum_r1 axis=(1 0 0)
            TransformAxis r2: coordinate=Pendulum_r2 axis=(0 1 0)
            TransformAxis r3: coordinate=Pendulum_r3 axis=(0 0 1)
