# OpenSim document version 20302
ForwardTool pendulum_ext_gravity:
  model_file: pendulum_no_gravity.osim
  replace_force_set: false
  results_directory: Results
  output_precision: 8
  initial_time: 0
  final_time: 1
  solve_for_equilibrium_for_auxiliary_states: false
  maximum_number_of_integrator_steps: 10000
  maximum_integrator_step_size: 1
  minimum_integrator_step_size: 0.00000001
  integrator_error_tolerance: 0.00001
  external_loads_file: pendulum_external_load.xml
  use_specified_dt: false
  AnalysisSet Analyses:
    PointKinematics: start_time=-infinity end_time=infinity step_interval=1 in_degrees=true body_name=pendulum
        relative_to_body_name=ground point_name=CoM point=(0 0 0)
