# OpenSim document version 20302
Model pendulum_no_gravity:
  credits: Model authors names..
  publications: List of publications related to model...
  length_units: m
  force_units: N
  gravity: 0 0 0
  BodySet:
    Body ground: mass=0 mass_center=(0 0 0) inertia_xx=0 inertia_yy=0 inertia_zz=0
    Body pendulum: mass=10 mass_center=(0 0 0) inertia_xx=0 inertia_yy=0 inertia_zz=0
      PinJoint GroundJoint: parent_body=ground location_in_parent=(0 0 0) location=(0 0.5 0)
        Coordinate Pendulum_r1: motion_type=rotational default_value=-0.1570796 range=(-3.141593 3.141593)
            clamped=false
