# OpenSim document version 20200
AnalyzeTool subject221:
  model_file: subject221.osim
  replace_force_set: true
  results_directory: Results
  output_precision: 20
  initial_time: 0.4
  final_time: 1.6
  solve_for_equilibrium_for_auxiliary_states: false
  maximum_number_of_integrator_steps: 20000
  maximum_integrator_step_size: 1
  minimum_integrator_step_size: 0.00000001
  integrator_error_tolerance: 0.001
  coordinates_file: subject221_walk1_ik.mot
  lowpass_cutoff_frequency_for_coordinates: 6
  external_loads_file: subject221_walk1_grf.xml
  external_loads_model_kinematics_file: subject221_walk1_ik.mot
  lowpass_cutoff_frequency_for_load_kinematics: 6
  AnalysisSet Analyses:
    InverseDynamics: start_time=0.4 end_time=1.6 step_interval=1 in_degrees=true use_model_force_set=false
