# OpenSim document version 20200
ExternalLoads:
  datafile: subject221_walk1_grf.mot
  external_loads_model_kinematics_file: subject221_walk1_ik.mot
  lowpass_cutoff_frequency_for_load_kinematics: 6
  PrescribedForce ExternalForce_1: body=calcn_r pointIsGlobal=false forceIsGlobal=true
    FunctionSet forceFunctions:
      GCVSpline #1: half_order=0 error_variance=0
      GCVSpline #2: half_order=0 error_variance=0
      GCVSpline #3: half_order=0 error_variance=0
    FunctionSet pointFunctions:
      GCVSpline #4: half_order=0 error_variance=0
      GCVSpline #5: half_order=0 error_variance=0
      GCVSpline #6: half_order=0 error_variance=0
    FunctionSet torqueFunctions:
      GCVSpline #13: half_order=0 error_variance=0
      GCVSpline #14: half_order=0 error_variance=0
      GCVSpline #15: half_order=0 error_variance=0
  PrescribedForce ExternalForce_2: body=calcn_l pointIsGlobal=false forceIsGlobal=true
    FunctionSet forceFunctions:
      GCVSpline #7: half_order=0 error_variance=0
      GCVSpline #8: half_order=0 error_variance=0
      GCVSpline #9: half_order=0 error_variance=0
    FunctionSet pointFunctions:
      GCVSpline #10: half_order=0 error_variance=0
      GCVSpline #11: half_order=0 error_variance=0
      GCVSpline #12: half_order=0 error_variance=0
    FunctionSet torqueFunctions:
      GCVSpline #16: half_order=0 error_variance=0
      GCVSpline #17: half_order=0 error_variance=0
      GCVSpline #18: half_order=0 error_variance=0
