# OpenSim document version 20300
InverseKinematicsTool:
  results_directory: ./
  model_file: uwdynamic_ikOnly.osim
  constraint_weight: 10
  accuracy: 0.001
  marker_file: uw_running.trc
  time_range: -infinity infinity
  report_errors: false
  output_motion_file: uwdynamic_ik_new.mot
  IKTaskSet:
    IKMarkerTask S2: apply=true weight=5
    IKMarkerTask R.ASIS: apply=true weight=5
    IKMarkerTask R.PSIS: apply=true weight=1
    IKMarkerTask L.ASIS: apply=true weight=5
    IKMarkerTask L.PSIS: apply=true weight=1
    IKMarkerTask R.Clavicle: apply=true weight=1
    IKMarkerTask L.Clavicle: apply=true weight=1
    IKMarkerTask L.Scapula: apply=true weight=1
    IKMarkerTask R.Shoulder: apply=true weight=1
    IKMarkerTask L.Shoulder: apply=true weight=1
    IKMarkerTask R.Bicep: apply=true weight=1
    IKMarkerTask R.Elbow: apply=true weight=1
    IKMarkerTask R.MElbow: apply=false weight=1
    IKMarkerTask R.Forearm: apply=true weight=1
    IKMarkerTask R.Wrist: apply=true weight=1
    IKMarkerTask L.Bicep: apply=true weight=1
    IKMarkerTask L.Elbow: apply=true weight=1
    IKMarkerTask L.MElbow: apply=false weight=1
    IKMarkerTask L.Forearm: apply=true weight=1
    IKMarkerTask L.Wrist: apply=true weight=1
    IKMarkerTask R.Knee: apply=true weight=5
    IKMarkerTask R.MKnee: apply=false weight=1
    IKMarkerTask R.TH1: apply=true weight=1
    IKMarkerTask R.TH2: apply=true weight=1
    IKMarkerTask R.TH3: apply=true weight=1
    IKMarkerTask R.Ankle: apply=true weight=5
    IKMarkerTask R.MAnkle: apply=false weight=1
    IKMarkerTask R.SH1: apply=true weight=1
    IKMarkerTask R.SH2: apply=true weight=1
    IKMarkerTask R.SH3: apply=true weight=1
    IKMarkerTask R.SH4: apply=true weight=1
    IKMarkerTask R.MT1: apply=true weight=1
    IKMarkerTask R.MT5: apply=true weight=1
    IKMarkerTask R.Heel: apply=true weight=1
    IKMarkerTask L.Knee: apply=true weight=5
    IKMarkerTask L.MKnee: apply=false weight=1
    IKMarkerTask L.TH1: apply=true weight=1
    IKMarkerTask L.TH2: apply=true weight=1
    IKMarkerTask L.TH3: apply=true weight=1
    IKMarkerTask L.TH4: apply=true weight=1
    IKMarkerTask L.Ankle: apply=true weight=5
    IKMarkerTask L.MAnkle: apply=false weight=1
    IKMarkerTask L.SH1: apply=true weight=1
    IKMarkerTask L.SH2: apply=true weight=1
    IKMarkerTask L.SH3: apply=true weight=1
    IKMarkerTask L.Heel: apply=true weight=1
    IKMarkerTask L.MT1: apply=true weight=1
    IKMarkerTask L.MT5: apply=true weight=1
