SimmModel 3D Gait Model:
  gravity: 0 -9.80665 0
  force_units: N
  length_units: m
  SimmMuscleSet:
    SimmMuscle [values shared by the 92 below unless stated]:
      tendon_force_length_curves: natCubicSpline: x=(-10 -0.002 -0.001 0 0.00131 0.00281 0.00431 0.00581 0.00731 0.00881 0.0103 0.0118 0.0123 9.2 9.201 9.202 20)
          y=(0 0 0 0 0.0108 0.0257 0.0435 0.0652 0.0915 0.123 0.161 0.208 0.227 345 345 345 345)
      active_force_length_curves: natCubicSpline: x=(-5.307692 -4.307692 -1.923077 -0.884615 -0.269231 0.230769 0.461538 0.52725 0.62875 0.71875 0.86125 1.045 1.2175 1.43875 1.5 1.615385 2 2.961538 3.692308 5.461538 9.901902)
          y=(0.012188 0.021899 0.036466 0.052493 0.075312 0.114158 0.157859 0.226667 0.636667 0.856667 0.95 0.993333 0.77 0.246667 0.193821 0.133252 0.072683 0.044417 0.036341 0.021899 0.007332)
      passive_force_length_curves: natCubicSpline: x=(-5 0.998 0.999 1 1.1 1.2 1.3 1.4 1.5 1.6 1.601 1.602 5)
          y=(0 0 0 0 0.035 0.12 0.26 0.55 1.17 2 2 2 2)
      force_velocity_curves: natCubicSpline: x=(-1 -0.95 -0.9 -0.85 -0.8 -0.75 -0.7 -0.65 -0.6 -0.55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)
          y=(0 0.010417 0.021739 0.034091 0.047619 0.0625 0.078947 0.097222 0.117647 0.140625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)
    SimmMuscle glut_med1_r: max_isometric_force=819 optimal_fiber_length=0.0535 tendon_slack_length=0.078
        pennation_angle=8 max_contraction_velocity=10 groups=(R_hip_abd R_hip_flex R_hip_inrot)
      SimmMusclePointSet:
        SimmMusclePoint: location=(-0.03797055 0.02829179 0.1125157) body=pelvis
        SimmMusclePoint: location=(-0.02275313 -0.01221154 0.05792655) body=femur_r
    SimmMuscle glut_med2_r: max_isometric_force=573 optimal_fiber_length=0.0845 tendon_slack_length=0.053
        pennation_angle=0 max_contraction_velocity=10 groups=R_hip_abd
      SimmMusclePointSet:
        SimmMusclePoint: location=(-0.07957065 0.04141396 0.07128785) body=pelvis
        SimmMusclePoint: location=(-0.02692802 -0.00605359 0.05500413) body=femur_r
    SimmMuscle glut_med3_r: max_isometric_force=653 optimal_fiber_length=0.0646 tendon_slack_length=0.053
        pennation_angle=19 max_contraction_velocity=10 groups=(R_hip_abd R_hip_exrot R_hip_ext)
      SimmMusclePointSet:
        SimmMusclePoint: location=(-0.1138186 0.00977183 0.06030617) body=pelvis
        SimmMusclePoint: location=(-0.032251 -0.00490549 0.05406478) body=femur_r
    SimmMuscle glut_min1_r: max_isometric_force=270 optimal_fiber_length=0.068 tendon_slack_length=0.016
        pennation_angle=10 max_contraction_velocity=10 groups=(R_hip_abd R_hip_flex R_hip_inrot)
      SimmMusclePointSet:
        SimmMusclePoint: location=(-0.04346139 -0.00744521 0.09827673) body=pelvis
        SimmMusclePoint: location=(-0.0075148 -0.01085471 0.05844841) body=femur_r
    SimmMuscle glut_min2_r: max_isometric_force=285 optimal_fiber_length=0.056 tendon_slack_length=0.026
        pennation_angle=0 max_contraction_velocity=10 groups=R_hip_abd
      SimmMusclePointSet:
        SimmMusclePoint: location=(-0.0589102 -0.00604923 0.0922275) body=pelvis
        SimmMusclePoint: location=(-0.01001973 -0.01085471 0.05844841) body=femur_r
    SimmMuscle glut_min3_r: max_isometric_force=323 optimal_fiber_length=0.038 tendon_slack_length=0.051
        pennation_angle=1 max_contraction_velocity=10 groups=(R_hip_abd R_hip_exrot R_hip_ext)
      SimmMusclePointSet:
        SimmMusclePoint: location=(-0.07761628 -0.0058631 0.07966371) body=pelvis
        SimmMusclePoint: location=(-0.01409024 -0.00866289 0.05740469) body=femur_r
    SimmMuscle semimem_r: max_isometric_force=1288 optimal_fiber_length=0.08 tendon_slack_length=0.359
        pennation_angle=15 max_contraction_velocity=10 groups=(R_hip_ext R_hip_add R_knee_bend)
      SimmMusclePointSet:
        SimmMusclePoint: location=(-0.1109336 -0.09071054 0.06655084) body=pelvis
        SimmMuscleViaPoint: location=(-0.03255698 -0.03292184 -0.01769116) body=tibia_r coordinate=knee_angle_r
            range=(-32 10)
        SimmMusclePoint: location=(-0.02525972 -0.04463486 -0.01830862) body=tibia_r
    SimmMuscle semiten_r: max_isometric_force=410 optimal_fiber_length=0.201 tendon_slack_length=0.2555
        pennation_angle=5 max_contraction_velocity=10 groups=(R_hip_ext R_hip_add R_knee_bend)
      SimmMusclePointSet:
        SimmMusclePoint: location=(-0.1175877 -0.1022599 0.056202) body=pelvis
        SimmMuscleViaPoint: location=(-0.03932097 -0.02674724 -0.02130237) body=tibia_r coordinate=knee_angle_r
            range=(-19 10)
        SimmMusclePoint: location=(-0.03107881 -0.0494155 -0.02140528) body=tibia_r
        SimmMusclePoint: location=(-0.01057166 -0.06979168 -0.02292086) body=tibia_r
        SimmMusclePoint: location=(0.00252597 -0.08943813 -0.01805602) body=tibia_r
    SimmMuscle bifemlh_r: max_isometric_force=896 optimal_fiber_length=0.109 tendon_slack_length=0.326
        pennation_angle=0 max_contraction_velocity=10 groups=(R_hip_ext R_hip_add R_knee_bend)
      SimmMusclePointSet:
        SimmMusclePoint: location=(-0.1172248 -0.09545686 0.06462439) body=pelvis
        SimmMusclePoint: location=(-0.02815991 -0.03367963 0.0275331) body=tibia_r
        SimmMusclePoint: location=(-0.02189176 -0.0526712 0.0320892) body=tibia_r
    SimmMuscle bifemsh_r: max_isometric_force=804 optimal_fiber_length=0.173 tendon_slack_length=0.089
        pennation_angle=23 max_contraction_velocity=10 groups=R_knee_bend
      SimmMusclePointSet:
        SimmMusclePoint: location=(0.00521861 -0.2203296 0.02442309) body=femur_r
        SimmMusclePoint: location=(-0.02815991 -0.03367963 0.0275331) body=tibia_r
        SimmMusclePoint: location=(-0.02189176 -0.0526712 0.0320892) body=tibia_r
    SimmMuscle sar_r: max_isometric_force=156 optimal_fiber_length=0.52 tendon_slack_length=0.1 pennation_angle=0
        max_contraction_velocity=10 groups=(R_hip_flex R_hip_abd R_knee_bend)
      SimmMusclePointSet:
        SimmMusclePoint: location=(-0.01423896 -0.00120985 0.1155868) body=pelvis
        SimmMusclePoint: location=(-0.00313116 -0.3723999 -0.04394068) body=femur_r
        SimmMusclePoint: location=(-0.00523905 -0.03919935 -0.03732826) body=tibia_r
        SimmMusclePoint: location=(0.00561327 -0.05510362 -0.03583138) body=tibia_r
        SimmMusclePoint: location=(0.02273375 -0.0785858 -0.02357574) body=tibia_r
    SimmMuscle add_long_r: max_isometric_force=627 optimal_fiber_length=0.138 tendon_slack_length=0.11
        pennation_angle=6 max_contraction_velocity=10 groups=(R_hip_add R_hip_ext R_hip_flex)
      SimmMusclePointSet:
        SimmMusclePoint: location=(-0.02940857 -0.07780241 0.015728) body=pelvis
        SimmMusclePoint: location=(0.00521861 -0.2203296 0.02442309) body=femur_r
    SimmMuscle add_brev_r: max_isometric_force=429 optimal_fiber_length=0.133 tendon_slack_length=0.02
        pennation_angle=0 max_contraction_velocity=10 groups=(R_hip_add R_hip_flex)
      SimmMusclePointSet:
        SimmMusclePoint: location=(-0.0546292 -0.08515455 0.01526267) body=pelvis
        SimmMusclePoint: location=(0.00093935 -0.1248291 0.03068542) body=femur_r
    SimmMuscle add_mag1_r: max_isometric_force=381 optimal_fiber_length=0.087 tendon_slack_length=0.06
        pennation_angle=5 max_contraction_velocity=10 groups=(R_hip_ext R_hip_add)
      SimmMusclePointSet:
        SimmMusclePoint: location=(-0.06812364 -0.1092584 0.0237316) body=pelvis
        SimmMusclePoint: location=(-0.00469675 -0.1263947 0.03538216) body=femur_r
    SimmMuscle add_mag2_r: max_isometric_force=343 optimal_fiber_length=0.121 tendon_slack_length=0.12
        pennation_angle=3 max_contraction_velocity=10 groups=(R_hip_ext R_hip_add)
      SimmMusclePointSet:
        SimmMusclePoint: location=(-0.07733708 -0.1109336 0.02866405) body=pelvis
        SimmMusclePoint: location=(0.0056361 -0.2384904 0.02369248) body=femur_r
    SimmMuscle add_mag3_r: max_isometric_force=488 optimal_fiber_length=0.131 tendon_slack_length=0.249
        pennation_angle=5 max_contraction_velocity=10 groups=(R_hip_ext R_hip_add)
      SimmMusclePointSet:
        SimmMusclePoint: location=(-0.1033767 -0.1062152 0.04543437) body=pelvis
        SimmMusclePoint: location=(0.00730605 -0.400476 -0.027763) body=femur_r
    SimmMuscle tfl_r: max_isometric_force=233 optimal_fiber_length=0.095 tendon_slack_length=0.425 pennation_angle=3
        max_contraction_velocity=10 groups=(R_hip_abd R_hip_flex R_hip_inrot)
      SimmMusclePointSet:
        SimmMusclePoint: location=(-0.02894324 0.01991593 0.1154938) body=pelvis
        SimmMusclePoint: location=(0.03068542 -0.1038503 0.06231018) body=femur_r
        SimmMusclePoint: location=(0.0056361 -0.4226029 0.03726086) body=femur_r
        SimmMusclePoint: location=(0.00561327 -0.04556105 0.02778569) body=tibia_r
    SimmMuscle pect_r: max_isometric_force=266 optimal_fiber_length=0.1 tendon_slack_length=0.033 pennation_angle=0
        max_contraction_velocity=10 groups=(R_hip_add R_hip_flex)
      SimmMusclePointSet:
        SimmMusclePoint: location=(-0.04011105 -0.07147398 0.04197235) body=pelvis
        SimmMusclePoint: location=(-0.0127334 -0.08579392 0.02640616) body=femur_r
    SimmMuscle grac_r: max_isometric_force=162 optimal_fiber_length=0.352 tendon_slack_length=0.126 pennation_angle=3
        max_contraction_velocity=10 groups=(R_hip_add R_knee_bend R_hip_flex)
      SimmMusclePointSet:
        SimmMusclePoint: location=(-0.06887747 -0.1104683 0.02600238) body=pelvis
        SimmMuscleViaPoint: location=(-0.02485744 -0.02984389 -0.03530748) body=tibia_r coordinate=knee_angle_r
            range=(-25 10)
        SimmMusclePoint: location=(-0.01817764 -0.04820865 -0.03349252) body=tibia_r
        SimmMusclePoint: location=(0.00561327 -0.07821158 -0.02133043) body=tibia_r
    SimmMuscle glut_max1_r: max_isometric_force=573 optimal_fiber_length=0.142 tendon_slack_length=0.125
        pennation_angle=5 max_contraction_velocity=10 groups=(R_hip_ext R_hip_abd)
      SimmMusclePointSet:
        SimmMusclePoint: location=(-0.1112128 0.05695583 0.06514556) body=pelvis
        SimmMusclePoint: location=(-0.120147 0.00111678 0.08245566) body=pelvis
        SimmMusclePoint: location=(-0.04769808 -0.0258843 0.04091389) body=femur_r
        SimmMusclePoint: location=(-0.02891109 -0.05907465 0.04905492) body=femur_r
    SimmMuscle glut_max2_r: max_isometric_force=819 optimal_fiber_length=0.147 tendon_slack_length=0.127
        pennation_angle=0 max_contraction_velocity=10 groups=R_hip_ext
      SimmMusclePointSet:
        SimmMusclePoint: location=(-0.1255448 0.01637945 0.05239564) body=pelvis
        SimmMusclePoint: location=(-0.1280575 -0.04839384 0.08506149) body=pelvis
        SimmMusclePoint: location=(-0.04446254 -0.05531725 0.03058104) body=femur_r
        SimmMusclePoint: location=(-0.01628206 -0.1060421 0.04373194) body=femur_r
    SimmMuscle glut_max3_r: max_isometric_force=552 optimal_fiber_length=0.144 tendon_slack_length=0.145
        pennation_angle=5 max_contraction_velocity=10 groups=R_hip_ext
      SimmMusclePointSet:
        SimmMusclePoint: location=(-0.1448093 -0.02922244 0.00539777) body=pelvis
        SimmMusclePoint: location=(-0.1422965 -0.09790447 0.03750523) body=pelvis
        SimmMusclePoint: location=(-0.03120728 -0.1086514 0.01409024) body=femur_r
        SimmMusclePoint: location=(-0.00626233 -0.1481041 0.04289696) body=femur_r
    SimmMuscle iliacus_r: max_isometric_force=1073 optimal_fiber_length=0.1 tendon_slack_length=0.1 pennation_angle=7
        max_contraction_velocity=10 groups=(R_hip_flex R_hip_inrot)
      SimmMusclePointSet:
        SimmMusclePoint: location=(-0.06272587 0.03396876 0.07947758) body=pelvis
        SimmMusclePoint: location=(-0.02401079 -0.0511858 0.07547578) body=pelvis
        SimmMuscleViaPoint: location=(-0.02680274 -0.07491739 0.07594111) body=pelvis coordinate=hip_flexion_r
            range=(-90 45)
        SimmMusclePoint: location=(0.00177433 -0.05667409 0.00594921) body=femur_r
        SimmMusclePoint: location=(-0.02014383 -0.06481511 0.01346401) body=femur_r
    SimmMuscle psoas_r: max_isometric_force=1113 optimal_fiber_length=0.1 tendon_slack_length=0.16 pennation_angle=8
        max_contraction_velocity=10 groups=(R_hip_flex R_hip_inrot)
      SimmMusclePointSet:
        SimmMusclePoint: location=(-0.06021311 0.08254873 0.02689581) body=pelvis
        SimmMusclePoint: location=(-0.02214949 -0.0530471 0.0706364) body=pelvis
        SimmMuscleViaPoint: location=(-0.02680274 -0.07491739 0.07594111) body=pelvis coordinate=hip_flexion_r
            range=(-90 45)
        SimmMusclePoint: location=(0.00166995 -0.05291669 0.00396614) body=femur_r
        SimmMusclePoint: location=(-0.01962197 -0.06231018 0.01085471) body=femur_r
    SimmMuscle quad_fem_r: max_isometric_force=381 optimal_fiber_length=0.054 tendon_slack_length=0.024
        pennation_angle=0 max_contraction_velocity=10 groups=R_hip_exrot
      SimmMusclePointSet:
        SimmMusclePoint: location=(-0.1063734 -0.1071179 0.04839384) body=pelvis
        SimmMusclePoint: location=(-0.03976579 -0.03746961 0.03820021) body=femur_r
    SimmMuscle gem_r: max_isometric_force=164 optimal_fiber_length=0.024 tendon_slack_length=0.039 pennation_angle=0
        max_contraction_velocity=10 groups=R_hip_exrot
      SimmMusclePointSet:
        SimmMusclePoint: location=(-0.1054427 -0.07631337 0.06644847) body=pelvis
        SimmMusclePoint: location=(-0.01482085 -0.00344428 0.04623687) body=femur_r
    SimmMuscle peri_r: max_isometric_force=444 optimal_fiber_length=0.026 tendon_slack_length=0.115 pennation_angle=10
        max_contraction_velocity=10 groups=(R_hip_exrot R_hip_abd)
      SimmMusclePointSet:
        SimmMusclePoint: location=(-0.1299189 0.0002792 0.02187029) body=pelvis
        SimmMusclePoint: location=(-0.1110266 -0.02568596 0.06114376) body=pelvis
        SimmMusclePoint: location=(-0.01544708 -0.0037574 0.04561064) body=femur_r
    SimmMuscle rect_fem_r: max_isometric_force=1169 optimal_fiber_length=0.114 tendon_slack_length=0.31
        pennation_angle=5 max_contraction_velocity=10 groups=(R_hip_flex R_knee_ext)
      SimmMusclePointSet:
        SimmMusclePoint: location=(-0.0274542 -0.02894324 0.090087) body=pelvis
        SimmMuscleViaPoint: location=(0.0348603 -0.4206198 0.00198307) body=femur_r coordinate=knee_angle_r
            range=(-150 -83.65)
        SimmMusclePoint: location=(0.01262903 0.04561064 -0.00104372) body=patella_r
    SimmMuscle vas_med_r: max_isometric_force=1294 optimal_fiber_length=0.089 tendon_slack_length=0.126
        pennation_angle=5 max_contraction_velocity=10 groups=R_knee_ext
      SimmMusclePointSet:
        SimmMusclePoint: location=(0.0146121 -0.2190772 0.01962197) body=femur_r
        SimmMusclePoint: location=(0.03715649 -0.2890065 0.00093935) body=femur_r
        SimmMuscleViaPoint: location=(0.0386177 -0.4224985 -0.01304652) body=femur_r coordinate=knee_angle_r
            range=(-150 -69.33)
        SimmMuscleViaPoint: location=(0.02859797 -0.4441036 -0.01367275) body=femur_r coordinate=knee_angle_r
            range=(-150 -101.99)
        SimmMusclePoint: location=(0.00657545 0.04644561 -0.01774327) body=patella_r
    SimmMuscle vas_int_r: max_isometric_force=1365 optimal_fiber_length=0.087 tendon_slack_length=0.136
        pennation_angle=3 max_contraction_velocity=10 groups=R_knee_ext
      SimmMusclePointSet:
        SimmMusclePoint: location=(0.03026793 -0.200812 0.03235537) body=femur_r
        SimmMusclePoint: location=(0.03496468 -0.2175116 0.02974607) body=femur_r
        SimmMuscleViaPoint: location=(0.03579965 -0.4206198 0.00574047) body=femur_r coordinate=knee_angle_r
            range=(-150 -81.36)
        SimmMusclePoint: location=(0.00605359 0.05009864 -0.00062623) body=patella_r
    SimmMuscle vas_lat_r: max_isometric_force=1871 optimal_fiber_length=0.084 tendon_slack_length=0.157
        pennation_angle=5 max_contraction_velocity=10 groups=R_knee_ext
      SimmMusclePointSet:
        SimmMusclePoint: location=(0.00500986 -0.193506 0.03642589) body=femur_r
        SimmMusclePoint: location=(0.02807611 -0.2704283 0.04268822) body=femur_r
        SimmMuscleViaPoint: location=(0.03767835 -0.4206198 0.02139629) body=femur_r coordinate=knee_angle_r
            range=(-150 -69.33)
        SimmMuscleViaPoint: location=(0.02640616 -0.4428511 0.01920448) body=femur_r coordinate=knee_angle_r
            range=(-150 -110.01)
        SimmMusclePoint: location=(0.01075033 0.04414943 0.01471648) body=patella_r
    SimmMuscle med_gas_r: max_isometric_force=1558 optimal_fiber_length=0.06 tendon_slack_length=0.39
        pennation_angle=17 max_contraction_velocity=10 groups=(R_knee_bend R_ankle_pf)
      SimmMusclePointSet:
        SimmMusclePoint: location=(-0.01983071 -0.4100782 -0.02452746) body=femur_r
        SimmMuscleViaPoint: location=(-0.03131165 -0.4197848 -0.02692802) body=femur_r coordinate=knee_angle_r
            range=(-45 10)
        SimmMusclePoint: location=(0 0.03225119 -0.00551391) body=calcn_r
    SimmMuscle lat_gas_r: max_isometric_force=683 optimal_fiber_length=0.064 tendon_slack_length=0.38 pennation_angle=8
        max_contraction_velocity=10 groups=(R_knee_bend R_ankle_pf)
      SimmMusclePointSet:
        SimmMusclePoint: location=(-0.02296188 -0.4118526 0.02838923) body=femur_r
        SimmMuscleViaPoint: location=(-0.03131165 -0.4193674 0.02859797) body=femur_r coordinate=knee_angle_r
            range=(-45 10)
        SimmMusclePoint: location=(0 0.03225119 -0.00551391) body=calcn_r
    SimmMuscle soleus_r: max_isometric_force=3549 optimal_fiber_length=0.05 tendon_slack_length=0.25 pennation_angle=25
        max_contraction_velocity=10 groups=R_ankle_pf
      SimmMusclePointSet:
        SimmMusclePoint: location=(-0.00224531 -0.1434191 0.00664237) body=tibia_r
        SimmMusclePoint: location=(0 0.03225119 -0.00551391) body=calcn_r
    SimmMuscle tib_post_r: max_isometric_force=1588 optimal_fiber_length=0.031 tendon_slack_length=0.31
        pennation_angle=12 max_contraction_velocity=10 groups=(R_ankle_pf R_inverter)
      SimmMusclePointSet:
        SimmMusclePoint: location=(-0.00879413 -0.1261115 0.00177754) body=tibia_r
        SimmMusclePoint: location=(-0.01347185 -0.3789894 -0.02142399) body=tibia_r
        SimmMusclePoint: location=(0.04338306 0.03474806 -0.02975433) body=calcn_r
        SimmMusclePoint: location=(0.08031587 0.01654174 -0.02923415) body=calcn_r
    SimmMuscle flex_dig_r: max_isometric_force=310 optimal_fiber_length=0.034 tendon_slack_length=0.4 pennation_angle=7
        max_contraction_velocity=10 groups=(R_ankle_pf R_inverter)
      SimmMusclePointSet:
        SimmMusclePoint: location=(-0.00776503 -0.1914126 -0.00168398) body=tibia_r
        SimmMusclePoint: location=(-0.0144074 -0.3789894 -0.01833669) body=tibia_r
        SimmMusclePoint: location=(0.04535974 0.03277137 -0.02913011) body=calcn_r
        SimmMusclePoint: location=(0.07365756 0.01831035 -0.0273615) body=calcn_r
        SimmMusclePoint: location=(0.1724919 -0.00842692 0.01206819) body=calcn_r
        SimmMusclePoint: location=(-0.00197669 -0.00811482 0.01529331) body=toes_r
        SimmMusclePoint: location=(0.02965029 -0.00738656 0.02236776) body=toes_r
        SimmMusclePoint: location=(0.04587992 -0.00624217 0.02517674) body=toes_r
    SimmMuscle flex_hal_r: max_isometric_force=322 optimal_fiber_length=0.043 tendon_slack_length=0.38
        pennation_angle=10 max_contraction_velocity=10 groups=(R_ankle_pf R_inverter)
      SimmMusclePointSet:
        SimmMusclePoint: location=(-0.00739081 -0.2183563 0.0228273) body=tibia_r
        SimmMusclePoint: location=(-0.01740114 -0.3816089 -0.01627849) body=tibia_r
        SimmMusclePoint: location=(0.0389095 0.02871397 -0.0250727) body=calcn_r
        SimmMusclePoint: location=(0.1079895 0.00707446 -0.02663324) body=calcn_r
        SimmMusclePoint: location=(0.1795663 -0.00551391 -0.02798571) body=calcn_r
        SimmMusclePoint: location=(0.0161256 -0.00665831 -0.02756957) body=toes_r
        SimmMusclePoint: location=(0.05846829 -0.01061168 -0.01883054) body=toes_r
    SimmMuscle tib_ant_r: max_isometric_force=905 optimal_fiber_length=0.098 tendon_slack_length=0.223
        pennation_angle=5 max_contraction_velocity=10 groups=(R_ankle_df R_inverter)
      SimmMusclePointSet:
        SimmMusclePoint: location=(0.01674626 -0.1519325 0.01075877) body=tibia_r
        SimmMusclePoint: location=(0.03077944 -0.3696339 -0.01655915) body=tibia_r
        SimmMusclePoint: location=(0.1213061 0.01851843 -0.03173101) body=calcn_r
    SimmMuscle per_brev_r: max_isometric_force=435 optimal_fiber_length=0.05 tendon_slack_length=0.161
        pennation_angle=5 max_contraction_velocity=10 groups=(R_ankle_pf R_everter)
      SimmMusclePointSet:
        SimmMusclePoint: location=(-0.00654882 -0.2475453 0.03040522) body=tibia_r
        SimmMusclePoint: location=(-0.0185238 -0.3914321 0.02647593) body=tibia_r
        SimmMusclePoint: location=(-0.01347185 -0.4018167 0.02703726) body=tibia_r
        SimmMusclePoint: location=(0.04900101 0.02808975 0.02424041) body=calcn_r
        SimmMusclePoint: location=(0.07043244 0.02278391 0.03568438) body=calcn_r
    SimmMuscle per_long_r: max_isometric_force=943 optimal_fiber_length=0.049 tendon_slack_length=0.345
        pennation_angle=10 max_contraction_velocity=10 groups=(R_ankle_pf R_everter)
      SimmMusclePointSet:
        SimmMusclePoint: location=(0.00046777 -0.1466935 0.03386674) body=tibia_r
        SimmMusclePoint: location=(-0.01936579 -0.3933968 0.02675659) body=tibia_r
        SimmMusclePoint: location=(-0.01515583 -0.404062 0.02703726) body=tibia_r
        SimmMusclePoint: location=(0.04556781 0.0239283 0.02299198) body=calcn_r
        SimmMusclePoint: location=(0.07084859 0.01102783 0.02954625) body=calcn_r
        SimmMusclePoint: location=(0.08863876 0.00717849 0.01227626) body=calcn_r
        SimmMusclePoint: location=(0.1251554 0.00884307 -0.01914264) body=calcn_r
    SimmMuscle per_tert_r: max_isometric_force=180 optimal_fiber_length=0.079 tendon_slack_length=0.1
        pennation_angle=13 max_contraction_velocity=10 groups=(R_ankle_df R_everter)
      SimmMusclePointSet:
        SimmMusclePoint: location=(0.00093555 -0.2623269 0.0216111) body=tibia_r
        SimmMusclePoint: location=(0.02142399 -0.3806734 0.01487517) body=tibia_r
        SimmMusclePoint: location=(0.08915894 0.02372023 0.0311068) body=calcn_r
    SimmMuscle ext_dig_r: max_isometric_force=512 optimal_fiber_length=0.102 tendon_slack_length=0.345
        pennation_angle=8 max_contraction_velocity=10 groups=(R_ankle_df R_everter)
      SimmMusclePointSet:
        SimmMusclePoint: location=(0.00299374 -0.1291988 0.02582105) body=tibia_r
        SimmMusclePoint: location=(0.02703726 -0.374873 0.00673593) body=tibia_r
        SimmMusclePoint: location=(0.09592129 0.04036601 -0.00010404) body=calcn_r
        SimmMusclePoint: location=(0.1681224 0.00572199 0.01352469) body=calcn_r
        SimmMusclePoint: location=(0.00031211 0.0048897 0.01591752) body=toes_r
        SimmMusclePoint: location=(0.046088 -0.00041614 0.02600903) body=toes_r
    SimmMuscle ext_hal_r: max_isometric_force=162 optimal_fiber_length=0.111 tendon_slack_length=0.305
        pennation_angle=6 max_contraction_velocity=10 groups=(R_ankle_df R_inverter)
      SimmMusclePointSet:
        SimmMusclePoint: location=(0.00112265 -0.1653109 0.02133043) body=tibia_r
        SimmMusclePoint: location=(0.03049878 -0.3728148 -0.00795213) body=tibia_r
        SimmMusclePoint: location=(0.100915 0.04047005 -0.02195162) body=calcn_r
        SimmMusclePoint: location=(0.1345187 0.03214716 -0.02673728) body=calcn_r
        SimmMusclePoint: location=(0.1803986 0.01446102 -0.02913011) body=calcn_r
        SimmMusclePoint: location=(0.03100276 0.00426548 -0.02548885) body=toes_r
        SimmMusclePoint: location=(0.05857233 0.00353723 -0.01935072) body=toes_r
    SimmMuscle glut_med1_l: max_isometric_force=819 optimal_fiber_length=0.0535 tendon_slack_length=0.078
        pennation_angle=8 max_contraction_velocity=10 groups=(L_hip_abd L_hip_flex L_hip_inrot)
      SimmMusclePointSet:
        SimmMusclePoint: location=(-0.03797055 0.02829179 -0.1125157) body=pelvis
        SimmMusclePoint: location=(-0.02275313 -0.01221154 -0.05792655) body=femur_l
    SimmMuscle glut_med2_l: max_isometric_force=573 optimal_fiber_length=0.0845 tendon_slack_length=0.053
        pennation_angle=0 max_contraction_velocity=10 groups=L_hip_abd
      SimmMusclePointSet:
        SimmMusclePoint: location=(-0.07957065 0.04141396 -0.07128785) body=pelvis
        SimmMusclePoint: location=(-0.02692802 -0.00605359 -0.05500413) body=femur_l
    SimmMuscle glut_med3_l: max_isometric_force=653 optimal_fiber_length=0.0646 tendon_slack_length=0.053
        pennation_angle=19 max_contraction_velocity=10 groups=(L_hip_abd L_hip_exrot L_hip_ext)
      SimmMusclePointSet:
        SimmMusclePoint: location=(-0.1138186 0.00977183 -0.06030617) body=pelvis
        SimmMusclePoint: location=(-0.032251 -0.00490549 -0.05406478) body=femur_l
    SimmMuscle glut_min1_l: max_isometric_force=270 optimal_fiber_length=0.068 tendon_slack_length=0.016
        pennation_angle=10 max_contraction_velocity=10 groups=(L_hip_abd L_hip_flex L_hip_inrot)
      SimmMusclePointSet:
        SimmMusclePoint: location=(-0.04346139 -0.00744521 -0.09827673) body=pelvis
        SimmMusclePoint: location=(-0.0075148 -0.01085471 -0.05844841) body=femur_l
    SimmMuscle glut_min2_l: max_isometric_force=285 optimal_fiber_length=0.056 tendon_slack_length=0.026
        pennation_angle=0 max_contraction_velocity=10 groups=L_hip_abd
      SimmMusclePointSet:
        SimmMusclePoint: location=(-0.0589102 -0.00604923 -0.0922275) body=pelvis
        SimmMusclePoint: location=(-0.01001973 -0.01085471 -0.05844841) body=femur_l
    SimmMuscle glut_min3_l: max_isometric_force=323 optimal_fiber_length=0.038 tendon_slack_length=0.051
        pennation_angle=1 max_contraction_velocity=10 groups=(L_hip_abd L_hip_exrot L_hip_ext)
      SimmMusclePointSet:
        SimmMusclePoint: location=(-0.07761628 -0.0058631 -0.07966371) body=pelvis
        SimmMusclePoint: location=(-0.01409024 -0.00866289 -0.05740469) body=femur_l
    SimmMuscle semimem_l: max_isometric_force=1288 optimal_fiber_length=0.08 tendon_slack_length=0.359
        pennation_angle=15 max_contraction_velocity=10 groups=(L_hip_ext L_hip_add L_knee_bend)
      SimmMusclePointSet:
        SimmMusclePoint: location=(-0.1109336 -0.09071054 -0.06655084) body=pelvis
        SimmMuscleViaPoint: location=(-0.03255698 -0.03292184 0.01769116) body=tibia_l coordinate=knee_angle_l
            range=(-32 10)
        SimmMusclePoint: location=(-0.02525972 -0.04463486 0.01830862) body=tibia_l
    SimmMuscle semiten_l: max_isometric_force=410 optimal_fiber_length=0.201 tendon_slack_length=0.2555
        pennation_angle=5 max_contraction_velocity=10 groups=(L_hip_ext L_hip_add L_knee_bend)
      SimmMusclePointSet:
        SimmMusclePoint: location=(-0.1175877 -0.1022599 -0.056202) body=pelvis
        SimmMuscleViaPoint: location=(-0.03932097 -0.02674724 0.02130237) body=tibia_l coordinate=knee_angle_l
            range=(-19 10)
        SimmMusclePoint: location=(-0.03107881 -0.0494155 0.02140528) body=tibia_l
        SimmMusclePoint: location=(-0.01057166 -0.06979168 0.02292086) body=tibia_l
        SimmMusclePoint: location=(0.00252597 -0.08943813 0.01805602) body=tibia_l
    SimmMuscle bifemlh_l: max_isometric_force=896 optimal_fiber_length=0.109 tendon_slack_length=0.326
        pennation_angle=0 max_contraction_velocity=10 groups=(L_hip_ext L_hip_add L_knee_bend)
      SimmMusclePointSet:
        SimmMusclePoint: location=(-0.1172248 -0.09545686 -0.06462439) body=pelvis
        SimmMusclePoint: location=(-0.02815991 -0.03367963 -0.0275331) body=tibia_l
        SimmMusclePoint: location=(-0.02189176 -0.0526712 -0.0320892) body=tibia_l
    SimmMuscle bifemsh_l: max_isometric_force=804 optimal_fiber_length=0.173 tendon_slack_length=0.089
        pennation_angle=23 max_contraction_velocity=10 groups=L_knee_bend
      SimmMusclePointSet:
        SimmMusclePoint: location=(0.00521861 -0.2203296 -0.02442309) body=femur_l
        SimmMusclePoint: location=(-0.02815991 -0.03367963 -0.0275331) body=tibia_l
        SimmMusclePoint: location=(-0.02189176 -0.0526712 -0.0320892) body=tibia_l
    SimmMuscle sar_l: max_isometric_force=156 optimal_fiber_length=0.52 tendon_slack_length=0.1 pennation_angle=0
        max_contraction_velocity=10 groups=(L_hip_flex L_hip_abd L_knee_bend)
      SimmMusclePointSet:
        SimmMusclePoint: location=(-0.01423896 -0.00120985 -0.1155868) body=pelvis
        SimmMusclePoint: location=(-0.00313116 -0.3723999 0.04394068) body=femur_l
        SimmMusclePoint: location=(-0.00523905 -0.03919935 0.03732826) body=tibia_l
        SimmMusclePoint: location=(0.00561327 -0.05510362 0.03583138) body=tibia_l
        SimmMusclePoint: location=(0.02273375 -0.0785858 0.02357574) body=tibia_l
    SimmMuscle add_long_l: max_isometric_force=627 optimal_fiber_length=0.138 tendon_slack_length=0.11
        pennation_angle=6 max_contraction_velocity=10 groups=(L_hip_add L_hip_ext L_hip_flex)
      SimmMusclePointSet:
        SimmMusclePoint: location=(-0.02940857 -0.07780241 -0.015728) body=pelvis
        SimmMusclePoint: location=(0.00521861 -0.2203296 -0.02442309) body=femur_l
    SimmMuscle add_brev_l: max_isometric_force=429 optimal_fiber_length=0.133 tendon_slack_length=0.02
        pennation_angle=0 max_contraction_velocity=10 groups=(L_hip_add L_hip_flex)
      SimmMusclePointSet:
        SimmMusclePoint: location=(-0.0546292 -0.08515455 -0.01526267) body=pelvis
        SimmMusclePoint: location=(0.00093935 -0.1248291 -0.03068542) body=femur_l
    SimmMuscle add_mag1_l: max_isometric_force=381 optimal_fiber_length=0.087 tendon_slack_length=0.06
        pennation_angle=5 max_contraction_velocity=10 groups=(L_hip_ext L_hip_add)
      SimmMusclePointSet:
        SimmMusclePoint: location=(-0.06812364 -0.1092584 -0.0237316) body=pelvis
        SimmMusclePoint: location=(-0.00469675 -0.1263947 -0.03538216) body=femur_l
    SimmMuscle add_mag2_l: max_isometric_force=343 optimal_fiber_length=0.121 tendon_slack_length=0.12
        pennation_angle=3 max_contraction_velocity=10 groups=(L_hip_ext L_hip_add)
      SimmMusclePointSet:
        SimmMusclePoint: location=(-0.07733708 -0.1109336 -0.02866405) body=pelvis
        SimmMusclePoint: location=(0.0056361 -0.2384904 -0.02369248) body=femur_l
    SimmMuscle add_mag3_l: max_isometric_force=488 optimal_fiber_length=0.131 tendon_slack_length=0.249
        pennation_angle=5 max_contraction_velocity=10 groups=(L_hip_ext L_hip_add)
      SimmMusclePointSet:
        SimmMusclePoint: location=(-0.1033767 -0.1062152 -0.04543437) body=pelvis
        SimmMusclePoint: location=(0.00730605 -0.400476 0.027763) body=femur_l
    SimmMuscle tfl_l: max_isometric_force=233 optimal_fiber_length=0.095 tendon_slack_length=0.425 pennation_angle=3
        max_contraction_velocity=10 groups=(L_hip_abd L_hip_flex L_hip_inrot)
      SimmMusclePointSet:
        SimmMusclePoint: location=(-0.02894324 0.01991593 -0.1154938) body=pelvis
        SimmMusclePoint: location=(0.03068542 -0.1038503 -0.06231018) body=femur_l
        SimmMusclePoint: location=(0.0056361 -0.4226029 -0.03726086) body=femur_l
        SimmMusclePoint: location=(0.00561327 -0.04556105 -0.02778569) body=tibia_l
    SimmMuscle pect_l: max_isometric_force=266 optimal_fiber_length=0.1 tendon_slack_length=0.033 pennation_angle=0
        max_contraction_velocity=10 groups=(L_hip_add L_hip_flex)
      SimmMusclePointSet:
        SimmMusclePoint: location=(-0.04011105 -0.07147398 -0.04197235) body=pelvis
        SimmMusclePoint: location=(-0.0127334 -0.08579392 -0.02640616) body=femur_l
    SimmMuscle grac_l: max_isometric_force=162 optimal_fiber_length=0.352 tendon_slack_length=0.126 pennation_angle=3
        max_contraction_velocity=10 groups=(L_hip_add L_knee_bend L_hip_flex)
      SimmMusclePointSet:
        SimmMusclePoint: location=(-0.06887747 -0.1104683 -0.02600238) body=pelvis
        SimmMuscleViaPoint: location=(-0.02485744 -0.02984389 0.03530748) body=tibia_l coordinate=knee_angle_l
            range=(-25 10)
        SimmMusclePoint: location=(-0.01817764 -0.04820865 0.03349252) body=tibia_l
        SimmMusclePoint: location=(0.00561327 -0.07821158 0.02133043) body=tibia_l
    SimmMuscle glut_max1_l: max_isometric_force=573 optimal_fiber_length=0.142 tendon_slack_length=0.125
        pennation_angle=5 max_contraction_velocity=10 groups=(L_hip_ext L_hip_abd)
      SimmMusclePointSet:
        SimmMusclePoint: location=(-0.1112128 0.05695583 -0.06514556) body=pelvis
        SimmMusclePoint: location=(-0.120147 0.00111678 -0.08245566) body=pelvis
        SimmMusclePoint: location=(-0.04769808 -0.0258843 -0.04091389) body=femur_l
        SimmMusclePoint: location=(-0.02891109 -0.05907465 -0.04905492) body=femur_l
    SimmMuscle glut_max2_l: max_isometric_force=819 optimal_fiber_length=0.147 tendon_slack_length=0.127
        pennation_angle=0 max_contraction_velocity=10 groups=L_hip_ext
      SimmMusclePointSet:
        SimmMusclePoint: location=(-0.1255448 0.01637945 -0.05239564) body=pelvis
        SimmMusclePoint: location=(-0.1280575 -0.04839384 -0.08506149) body=pelvis
        SimmMusclePoint: location=(-0.04446254 -0.05531725 -0.03058104) body=femur_l
        SimmMusclePoint: location=(-0.01628206 -0.1060421 -0.04373194) body=femur_l
    SimmMuscle glut_max3_l: max_isometric_force=552 optimal_fiber_length=0.144 tendon_slack_length=0.145
        pennation_angle=5 max_contraction_velocity=10 groups=L_hip_ext
      SimmMusclePointSet:
        SimmMusclePoint: location=(-0.1448093 -0.02922244 -0.00539777) body=pelvis
        SimmMusclePoint: location=(-0.1422965 -0.09790447 -0.03750523) body=pelvis
        SimmMusclePoint: location=(-0.03120728 -0.1086514 -0.01409024) body=femur_l
        SimmMusclePoint: location=(-0.00626233 -0.1481041 -0.04289696) body=femur_l
    SimmMuscle iliacus_l: max_isometric_force=1073 optimal_fiber_length=0.1 tendon_slack_length=0.1 pennation_angle=7
        max_contraction_velocity=10 groups=(L_hip_flex L_hip_inrot)
      SimmMusclePointSet:
        SimmMusclePoint: location=(-0.06272587 0.03396876 -0.07947758) body=pelvis
        SimmMusclePoint: location=(-0.02401079 -0.0511858 -0.07547578) body=pelvis
        SimmMuscleViaPoint: location=(-0.02680274 -0.07491739 -0.07594111) body=pelvis coordinate=hip_flexion_l
            range=(-90 45)
        SimmMusclePoint: location=(0.00177433 -0.05667409 -0.00594921) body=femur_l
        SimmMusclePoint: location=(-0.02014383 -0.06481511 -0.01346401) body=femur_l
    SimmMuscle psoas_l: max_isometric_force=1113 optimal_fiber_length=0.1 tendon_slack_length=0.16 pennation_angle=8
        max_contraction_velocity=10 groups=(L_hip_flex L_hip_inrot)
      SimmMusclePointSet:
        SimmMusclePoint: location=(-0.06021311 0.08254873 -0.02689581) body=pelvis
        SimmMusclePoint: location=(-0.02214949 -0.0530471 -0.0706364) body=pelvis
        SimmMuscleViaPoint: location=(-0.02680274 -0.07491739 -0.07594111) body=pelvis coordinate=hip_flexion_l
            range=(-90 45)
        SimmMusclePoint: location=(0.00166995 -0.05291669 -0.00396614) body=femur_l
        SimmMusclePoint: location=(-0.01962197 -0.06231018 -0.01085471) body=femur_l
    SimmMuscle quad_fem_l: max_isometric_force=381 optimal_fiber_length=0.054 tendon_slack_length=0.024
        pennation_angle=0 max_contraction_velocity=10 groups=L_hip_exrot
      SimmMusclePointSet:
        SimmMusclePoint: location=(-0.1063734 -0.1071179 -0.04839384) body=pelvis
        SimmMusclePoint: location=(-0.03976579 -0.03746961 -0.03820021) body=femur_l
    SimmMuscle gem_l: max_isometric_force=164 optimal_fiber_length=0.024 tendon_slack_length=0.039 pennation_angle=0
        max_contraction_velocity=10 groups=L_hip_exrot
      SimmMusclePointSet:
        SimmMusclePoint: location=(-0.1054427 -0.07631337 -0.06644847) body=pelvis
        SimmMusclePoint: location=(-0.01482085 -0.00344428 -0.04623687) body=femur_l
    SimmMuscle peri_l: max_isometric_force=444 optimal_fiber_length=0.026 tendon_slack_length=0.115 pennation_angle=10
        max_contraction_velocity=10 groups=(L_hip_exrot L_hip_abd)
      SimmMusclePointSet:
        SimmMusclePoint: location=(-0.1299189 0.0002792 -0.02187029) body=pelvis
        SimmMusclePoint: location=(-0.1110266 -0.02568596 -0.06114376) body=pelvis
        SimmMusclePoint: location=(-0.01544708 -0.0037574 -0.04561064) body=femur_l
    SimmMuscle rect_fem_l: max_isometric_force=1169 optimal_fiber_length=0.114 tendon_slack_length=0.31
        pennation_angle=5 max_contraction_velocity=10 groups=(L_hip_flex L_knee_ext)
      SimmMusclePointSet:
        SimmMusclePoint: location=(-0.0274542 -0.02894324 -0.090087) body=pelvis
        SimmMuscleViaPoint: location=(0.0348603 -0.4206198 -0.00198307) body=femur_l coordinate=knee_angle_l
            range=(-150 -83.65)
        SimmMusclePoint: location=(0.01262903 0.04561064 0.00104372) body=patella_l
    SimmMuscle vas_med_l: max_isometric_force=1294 optimal_fiber_length=0.089 tendon_slack_length=0.126
        pennation_angle=5 max_contraction_velocity=10 groups=L_knee_ext
      SimmMusclePointSet:
        SimmMusclePoint: location=(0.0146121 -0.2190772 -0.01962197) body=femur_l
        SimmMusclePoint: location=(0.03715649 -0.2890065 -0.00093935) body=femur_l
        SimmMuscleViaPoint: location=(0.0386177 -0.4224985 0.01304652) body=femur_l coordinate=knee_angle_l
            range=(-150 -69.33)
        SimmMuscleViaPoint: location=(0.02859797 -0.4441036 0.01367275) body=femur_l coordinate=knee_angle_l
            range=(-150 -101.99)
        SimmMusclePoint: location=(0.00657545 0.04644561 0.01774327) body=patella_l
    SimmMuscle vas_int_l: max_isometric_force=1365 optimal_fiber_length=0.087 tendon_slack_length=0.136
        pennation_angle=3 max_contraction_velocity=10 groups=L_knee_ext
      SimmMusclePointSet:
        SimmMusclePoint: location=(0.03026793 -0.200812 -0.03235537) body=femur_l
        SimmMusclePoint: location=(0.03496468 -0.2175116 -0.02974607) body=femur_l
        SimmMuscleViaPoint: location=(0.03579965 -0.4206198 -0.00574047) body=femur_l coordinate=knee_angle_l
            range=(-150 -81.36)
        SimmMusclePoint: location=(0.00605359 0.05009864 0.00062623) body=patella_l
    SimmMuscle vas_lat_l: max_isometric_force=1871 optimal_fiber_length=0.084 tendon_slack_length=0.157
        pennation_angle=5 max_contraction_velocity=10 groups=L_knee_ext
      SimmMusclePointSet:
        SimmMusclePoint: location=(0.00500986 -0.193506 -0.03642589) body=femur_l
        SimmMusclePoint: location=(0.02807611 -0.2704283 -0.04268822) body=femur_l
        SimmMuscleViaPoint: location=(0.03767835 -0.4206198 -0.02139629) body=femur_l coordinate=knee_angle_l
            range=(-150 -69.33)
        SimmMuscleViaPoint: location=(0.02640616 -0.4428511 -0.01920448) body=femur_l coordinate=knee_angle_l
            range=(-150 -110.01)
        SimmMusclePoint: location=(0.01075033 0.04414943 -0.01471648) body=patella_l
    SimmMuscle med_gas_l: max_isometric_force=1558 optimal_fiber_length=0.06 tendon_slack_length=0.39
        pennation_angle=17 max_contraction_velocity=10 groups=(L_knee_bend L_ankle_pf)
      SimmMusclePointSet:
        SimmMusclePoint: location=(-0.01983071 -0.4100782 0.02452746) body=femur_l
        SimmMuscleViaPoint: location=(-0.03131165 -0.4197848 0.02692802) body=femur_l coordinate=knee_angle_l
            range=(-45 10)
        SimmMusclePoint: location=(0 0.03225119 0.00551391) body=calcn_l
    SimmMuscle lat_gas_l: max_isometric_force=683 optimal_fiber_length=0.064 tendon_slack_length=0.38 pennation_angle=8
        max_contraction_velocity=10 groups=(L_knee_bend L_ankle_pf)
      SimmMusclePointSet:
        SimmMusclePoint: location=(-0.02296188 -0.4118526 -0.02838923) body=femur_l
        SimmMuscleViaPoint: location=(-0.03131165 -0.4193674 -0.02859797) body=femur_l coordinate=knee_angle_l
            range=(-45 10)
        SimmMusclePoint: location=(0 0.03225119 0.00551391) body=calcn_l
    SimmMuscle soleus_l: max_isometric_force=3549 optimal_fiber_length=0.05 tendon_slack_length=0.25 pennation_angle=25
        max_contraction_velocity=10 groups=L_ankle_pf
      SimmMusclePointSet:
        SimmMusclePoint: location=(-0.00224531 -0.1434191 -0.00664237) body=tibia_l
        SimmMusclePoint: location=(0 0.03225119 0.00551391) body=calcn_l
    SimmMuscle tib_post_l: max_isometric_force=1588 optimal_fiber_length=0.031 tendon_slack_length=0.31
        pennation_angle=12 max_contraction_velocity=10 groups=(L_ankle_pf L_inverter)
      SimmMusclePointSet:
        SimmMusclePoint: location=(-0.00879413 -0.1261115 -0.00177754) body=tibia_l
        SimmMusclePoint: location=(-0.01347185 -0.3789894 0.02142399) body=tibia_l
        SimmMusclePoint: location=(0.04338306 0.03474806 0.02975433) body=calcn_l
        SimmMusclePoint: location=(0.08031587 0.01654174 0.02923415) body=calcn_l
    SimmMuscle flex_dig_l: max_isometric_force=310 optimal_fiber_length=0.034 tendon_slack_length=0.4 pennation_angle=7
        max_contraction_velocity=10 groups=(L_ankle_pf L_inverter)
      SimmMusclePointSet:
        SimmMusclePoint: location=(-0.00776503 -0.1914126 0.00168398) body=tibia_l
        SimmMusclePoint: location=(-0.0144074 -0.3789894 0.01833669) body=tibia_l
        SimmMusclePoint: location=(0.04535974 0.03277137 0.02913011) body=calcn_l
        SimmMusclePoint: location=(0.07365756 0.01831035 0.0273615) body=calcn_l
        SimmMusclePoint: location=(0.1724919 -0.00842692 -0.01206819) body=calcn_l
        SimmMusclePoint: location=(-0.00197669 -0.00811482 -0.01529331) body=toes_l
        SimmMusclePoint: location=(0.02965029 -0.00738656 -0.02236776) body=toes_l
        SimmMusclePoint: location=(0.04587992 -0.00624217 -0.02517674) body=toes_l
    SimmMuscle flex_hal_l: max_isometric_force=322 optimal_fiber_length=0.043 tendon_slack_length=0.38
        pennation_angle=10 max_contraction_velocity=10 groups=(L_ankle_pf L_inverter)
      SimmMusclePointSet:
        SimmMusclePoint: location=(-0.00739081 -0.2183563 -0.0228273) body=tibia_l
        SimmMusclePoint: location=(-0.01740114 -0.3816089 0.01627849) body=tibia_l
        SimmMusclePoint: location=(0.0389095 0.02871397 0.0250727) body=calcn_l
        SimmMusclePoint: location=(0.1079895 0.00707446 0.02663324) body=calcn_l
        SimmMusclePoint: location=(0.1795663 -0.00551391 0.02798571) body=calcn_l
        SimmMusclePoint: location=(0.0161256 -0.00665831 0.02756957) body=toes_l
        SimmMusclePoint: location=(0.05846829 -0.01061168 0.01883054) body=toes_l
    SimmMuscle tib_ant_l: max_isometric_force=905 optimal_fiber_length=0.098 tendon_slack_length=0.223
        pennation_angle=5 max_contraction_velocity=10 groups=(L_ankle_df L_inverter)
      SimmMusclePointSet:
        SimmMusclePoint: location=(0.01674626 -0.1519325 -0.01075877) body=tibia_l
        SimmMusclePoint: location=(0.03077944 -0.3696339 0.01655915) body=tibia_l
        SimmMusclePoint: location=(0.1213061 0.01851843 0.03173101) body=calcn_l
    SimmMuscle per_brev_l: max_isometric_force=435 optimal_fiber_length=0.05 tendon_slack_length=0.161
        pennation_angle=5 max_contraction_velocity=10 groups=(L_ankle_pf L_everter)
      SimmMusclePointSet:
        SimmMusclePoint: location=(-0.00654882 -0.2475453 -0.03040522) body=tibia_l
        SimmMusclePoint: location=(-0.0185238 -0.3914321 -0.02647593) body=tibia_l
        SimmMusclePoint: location=(-0.01347185 -0.4018167 -0.02703726) body=tibia_l
        SimmMusclePoint: location=(0.04900101 0.02808975 -0.02424041) body=calcn_l
        SimmMusclePoint: location=(0.07043244 0.02278391 -0.03568438) body=calcn_l
    SimmMuscle per_long_l: max_isometric_force=943 optimal_fiber_length=0.049 tendon_slack_length=0.345
        pennation_angle=10 max_contraction_velocity=10 groups=(L_ankle_pf L_everter)
      SimmMusclePointSet:
        SimmMusclePoint: location=(0.00046777 -0.1466935 -0.03386674) body=tibia_l
        SimmMusclePoint: location=(-0.01936579 -0.3933968 -0.02675659) body=tibia_l
        SimmMusclePoint: location=(-0.01515583 -0.404062 -0.02703726) body=tibia_l
        SimmMusclePoint: location=(0.04556781 0.0239283 -0.02299198) body=calcn_l
        SimmMusclePoint: location=(0.07084859 0.01102783 -0.02954625) body=calcn_l
        SimmMusclePoint: location=(0.08863876 0.00717849 -0.01227626) body=calcn_l
        SimmMusclePoint: location=(0.1251554 0.00884307 0.01914264) body=calcn_l
    SimmMuscle per_tert_l: max_isometric_force=180 optimal_fiber_length=0.079 tendon_slack_length=0.1
        pennation_angle=13 max_contraction_velocity=10 groups=(L_ankle_df L_everter)
      SimmMusclePointSet:
        SimmMusclePoint: location=(0.00093555 -0.2623269 -0.0216111) body=tibia_l
        SimmMusclePoint: location=(0.02142399 -0.3806734 -0.01487517) body=tibia_l
        SimmMusclePoint: location=(0.08915894 0.02372023 -0.0311068) body=calcn_l
    SimmMuscle ext_dig_l: max_isometric_force=512 optimal_fiber_length=0.102 tendon_slack_length=0.345
        pennation_angle=8 max_contraction_velocity=10 groups=(L_ankle_df L_everter)
      SimmMusclePointSet:
        SimmMusclePoint: location=(0.00299374 -0.1291988 -0.02582105) body=tibia_l
        SimmMusclePoint: location=(0.02703726 -0.374873 -0.00673593) body=tibia_l
        SimmMusclePoint: location=(0.09592129 0.04036601 0.00010404) body=calcn_l
        SimmMusclePoint: location=(0.1681224 0.00572199 -0.01352469) body=calcn_l
        SimmMusclePoint: location=(0.00031211 0.0048897 -0.01591752) body=toes_l
        SimmMusclePoint: location=(0.046088 -0.00041614 -0.02600903) body=toes_l
    SimmMuscle ext_hal_l: max_isometric_force=162 optimal_fiber_length=0.111 tendon_slack_length=0.305
        pennation_angle=6 max_contraction_velocity=10 groups=(L_ankle_df L_inverter)
      SimmMusclePointSet:
        SimmMusclePoint: location=(0.00112265 -0.1653109 -0.02133043) body=tibia_l
        SimmMusclePoint: location=(0.03049878 -0.3728148 0.00795213) body=tibia_l
        SimmMusclePoint: location=(0.100915 0.04047005 0.02195162) body=calcn_l
        SimmMusclePoint: location=(0.1345187 0.03214716 0.02673728) body=calcn_l
        SimmMusclePoint: location=(0.1803986 0.01446102 0.02913011) body=calcn_l
        SimmMusclePoint: location=(0.03100276 0.00426548 0.02548885) body=toes_l
        SimmMusclePoint: location=(0.05857233 0.00353723 0.01935072) body=toes_l
    SimmMuscle ercspn_r: max_isometric_force=2500 optimal_fiber_length=0.12 tendon_slack_length=0.03 pennation_angle=0
        max_contraction_velocity=10 groups=(back_ext back_rlb back_introt)
      SimmMusclePointSet:
        SimmMusclePoint: location=(-0.1302911 0.04085557 0.04057638) body=pelvis
        SimmMusclePoint: location=(-0.0524261 0.1048522 0.02297216) body=torso
    SimmMuscle ercspn_l: max_isometric_force=2500 optimal_fiber_length=0.12 tendon_slack_length=0.03 pennation_angle=0
        max_contraction_velocity=10 groups=(back_ext back_llb back_extrot)
      SimmMusclePointSet:
        SimmMusclePoint: location=(-0.1302911 0.04085557 -0.04057638) body=pelvis
        SimmMusclePoint: location=(-0.0524261 0.1048522 -0.02297216) body=torso
    SimmMuscle intobl_r: max_isometric_force=900 optimal_fiber_length=0.1 tendon_slack_length=0.1 pennation_angle=0
        max_contraction_velocity=10 groups=(back_introt back_flex back_rlb)
      SimmMusclePointSet:
        SimmMusclePoint: location=(-0.03722603 0.06514556 0.1076763) body=pelvis
        SimmMusclePoint: location=(0.06672413 0.1525123 0.01429803) body=torso
    SimmMuscle intobl_l: max_isometric_force=900 optimal_fiber_length=0.1 tendon_slack_length=0.1 pennation_angle=0
        max_contraction_velocity=10 groups=(back_extrot back_flex back_llb)
      SimmMusclePointSet:
        SimmMusclePoint: location=(-0.03722603 0.06514556 -0.1076763) body=pelvis
        SimmMusclePoint: location=(0.06672413 0.1525123 -0.01429803) body=torso
    SimmMuscle extobl_r: max_isometric_force=900 optimal_fiber_length=0.12 tendon_slack_length=0.14 pennation_angle=0
        max_contraction_velocity=10 groups=(back_extrot back_flex back_rlb)
      SimmMusclePointSet:
        SimmMusclePoint: location=(-0.02791952 -0.05918939 0.00930651) body=pelvis
        SimmMusclePoint: location=(0.06195812 0.1048522 0.1048522) body=torso
    SimmMuscle extobl_l: max_isometric_force=900 optimal_fiber_length=0.12 tendon_slack_length=0.14 pennation_angle=0
        max_contraction_velocity=10 groups=(back_introt back_flex back_llb)
      SimmMusclePointSet:
        SimmMusclePoint: location=(-0.02791952 -0.05918939 -0.00930651) body=pelvis
        SimmMusclePoint: location=(0.06195812 0.1048522 -0.1048522) body=torso
  DynamicsEngine:
    SimmKinematicsEngine:
      SimmBodySet:
        SimmBody ground: mass=0 mass_center=(0 0 0) inertia=(0 0 0 0 0 0 0 0 0)
          Bones
        SimmBody pelvis: mass=10.31335 mass_center=(-0.06579701 0 0)
            inertia=(0.0940957 0 0 0 0.07972506 0 0 0 0.05299748)
          SimmMarkerSet:
            SimmMarker asis_r: location=(0.02306912 0.00885847 0.1186927) weight=1
            SimmMarker asis_l: location=(0.023617 0.02569386 -0.1189577) weight=1
            SimmMarker midasis: location=(0.02334306 0.01727616 -0.00013249) weight=10
            SimmMarker psis_r: location=(-0.1543237 0.09034052 0.03691492) weight=1
            SimmMarker psis_l: location=(-0.1502215 0.09244658 -0.04882485) weight=1
            SimmMarker sacralwand: location=(-0.1861302 0.04653254 0) weight=1
            SimmMarker hip_r: location=(-0.07787865 -0.05716596 0.06976586) weight=1
            SimmMarker hip_l: location=(-0.07753212 -0.0465369 -0.0802845) weight=1
            SimmMarker midhip: location=(-0.07770542 -0.05185145 -0.00525931) weight=10
          Bones:
            SimmBone sacrum2: geometry_files=sacrum2.vtp
            SimmBone pelvis: geometry_files=pelvis.vtp
            SimmBone l_pelvis: geometry_files=l_pelvis.vtp
        SimmBody femur_r: mass=8.145417 mass_center=(0 -0.1774327 0)
            inertia=(0.1225624 0 0 0 0.03212801 0 0 0 0.1292443)
          SimmMarkerSet:
            SimmMarker epicondLat_r: location=(-0.01439989 -0.4065873 0.07191424) weight=1
            SimmMarker epicondMed_r: location=(-0.00600111 -0.4014807 -0.04039277) weight=1
            SimmMarker thighwand_r: location=(0.00608161 -0.2903307 0.152867) weight=1
            SimmMarker upperleg1_r: location=(0.03689351 -0.2251945 0.08959254) weight=1
            SimmMarker upperleg2_r: location=(0.04171093 -0.3125295 0.07039679) weight=1
          Bones:
            SimmBone femur: geometry_files=femur.vtp
        SimmBody tibia_r: mass=3.24673 mass_center=(0 -0.1746663 0)
            inertia=(0.04613252 0 0 0 0.00466817 0 0 0 0.04677325)
          SimmMarkerSet:
            SimmMarker malleolusLat_r: location=(-0.02179077 -0.4004454 0.02950267) weight=1
            SimmMarker malleolusMedv_r: location=(0.02000812 -0.3825366 -0.02662852) weight=1
            SimmMarker shankwand_r: location=(-0.03530492 -0.2694855 0.121988) weight=1
            SimmMarker lowerleg1_r: location=(-0.02153754 -0.2996407 0.04829173) weight=1
            SimmMarker knee_r: location=(-0.00067302 0.00298207 0.01422934) weight=10
            SimmMarker ankle_r: location=(0.00332057 -0.3989711 -0.00159751) weight=10
          Bones:
            SimmBone tibia: geometry_files=tibia.vtp
            SimmBone fibula: geometry_files=fibula.vtp
        SimmBody patella_r: mass=0.08757195 mass_center=(0 0 0) inertia=(0.00091533 0 0 0 0.00091533 0 0 0 0.00091533)
          Bones:
            SimmBone pat: geometry_files=pat.vtp
        SimmBody talus_r: mass=0.08757195 mass_center=(0 0 0) inertia=(0.00091533 0 0 0 0.00091533 0 0 0 0.00091533)
          Bones:
            SimmBone talus: geometry_files=talus.vtp
        SimmBody calcn_r: mass=1.094649 mass_center=(0.1040361 0.03121083 0)
            inertia=(0.00128146 0 0 0 0.00356978 0 0 0 0.00375284)
          SimmMarkerSet:
            SimmMarker toe_r: location=(0.172584 0.01404567 -0.00763058) weight=10
            SimmMarker heel_r: location=(-0.01356522 0.02691909 -0.03296098) weight=10
          Bones:
            SimmBone foot: geometry_files=foot.vtp
        SimmBody calcn_rp: mass=0.00087572 mass_center=(0.1040361 0.03121083 0)
            inertia=(0.00000009 0 0 0 0.00000009 0 0 0 0.00000009)
          Bones:
            SimmBone foot: geometry_files=foot.vtp
        SimmBody toes_r: mass=0.1896808 mass_center=(0.03599649 0.00624217 -0.01820632)
            inertia=(0.00009153 0 0 0 0.00018307 0 0 0 0.00091533)
          Bones:
            SimmBone bofoot: geometry_files=bofoot.vtp
        SimmBody femur_l: mass=8.145417 mass_center=(0 -0.1774327 0)
            inertia=(0.1225624 0 0 0 0.03212801 0 0 0 0.1292443)
          SimmMarkerSet:
            SimmMarker epicondLat_l: location=(-0.04095327 -0.4127193 -0.05543805) weight=1
            SimmMarker epicondMed_l: location=(0.02600919 -0.406927 0.03359882) weight=1
            SimmMarker thighwand_l: location=(0.1072292 -0.2996214 -0.1049913) weight=1
            SimmMarker upperleg1_l: location=(0.02756626 -0.2448254 -0.0891359) weight=1
            SimmMarker upperleg2_l: location=(0.01739499 -0.3306265 -0.07900481) weight=1
          Bones:
            SimmBone l_femur: geometry_files=l_femur.vtp
        SimmBody tibia_l: mass=3.24673 mass_center=(0 -0.1746663 0)
            inertia=(0.04613252 0 0 0 0.00466817 0 0 0 0.04677325)
          SimmMarkerSet:
            SimmMarker malleolusLat_l: location=(-0.0306269 -0.3943695 -0.01632882) weight=1
            SimmMarker malleolusMedv_l: location=(0.02977081 -0.3785971 0.01157093) weight=1
            SimmMarker shankwand_l: location=(-0.07389379 -0.2566812 -0.09476132) weight=1
            SimmMarker lowerleg1_l: location=(-0.03641153 -0.2936287 -0.03269407) weight=1
            SimmMarker knee_l: location=(-0.00217515 -0.00073821 -0.00851712) weight=10
            SimmMarker ankle_l: location=(0.0062311 -0.3934219 -0.00361737) weight=10
          Bones:
            SimmBone l_tibia: geometry_files=l_tibia.vtp
            SimmBone l_fibula: geometry_files=l_fibula.vtp
        SimmBody patella_l: mass=0.08757195 mass_center=(0 0 0) inertia=(0.00091533 0 0 0 0.00091533 0 0 0 0.00091533)
          Bones:
            SimmBone l_patella: geometry_files=l_patella.vtp
        SimmBody talus_l: mass=0.08757195 mass_center=(0 0 0) inertia=(0.00091533 0 0 0 0.00091533 0 0 0 0.00091533)
          Bones:
            SimmBone l_talus: geometry_files=l_talus.vtp
        SimmBody calcn_l: mass=1.094649 mass_center=(0.1040361 0.03121083 0)
            inertia=(0.00128146 0 0 0 0.00356978 0 0 0 0.00375284)
          SimmMarkerSet:
            SimmMarker toe_l: location=(0.1732743 -0.00563258 0.00509974) weight=10
            SimmMarker heel_l: location=(-0.00370406 0.05602251 0.0337892) weight=10
          Bones:
            SimmBone l_foot: geometry_files=l_foot.vtp
        SimmBody calcn_lp: mass=0.00087572 mass_center=(0.1040361 0.03121083 0)
            inertia=(0.00000009 0 0 0 0.00000009 0 0 0 0.00000009)
          Bones:
            SimmBone l_foot: geometry_files=l_foot.vtp
        SimmBody toes_l: mass=0.1896808 mass_center=(0.03599649 0.00624217 0.01820632)
            inertia=(0.00009153 0 0 0 0.00018307 0 0 0 0.00091533)
          Bones:
            SimmBone l_bofoot: geometry_files=l_bofoot.vtp
        SimmBody torso: mass=29.98166 mass_center=(-0.02859606 0.3050246 0)
            inertia=(1.349651 0 0 0 0.6915302 0 0 0 1.3102)
          SimmMarkerSet:
            SimmMarker subclavicle_r: location=(0.03302959 0.3569293 0.05422748) weight=1
            SimmMarker subclavicle_l: location=(0.04119451 0.3591899 -0.05373314) weight=1
            SimmMarker neck: location=(-0.09704377 0.423951 0.00085337) weight=1
            SimmMarker sternalnotch: location=(0.02044475 0.3651467 0.00205637) weight=1
            SimmMarker xyphoidprocess: location=(0.1125016 0.2066623 -0.00608143) weight=1
          Bones:
            SimmBone hat_spine: geometry_files=hat_spine.vtp
            SimmBone hat_jaw: geometry_files=hat_jaw.vtp
            SimmBone hat_skull: geometry_files=hat_skull.vtp
            SimmBone hat_ribs: geometry_files=hat_ribs.vtp
      SimmCoordinateSet:
        SimmCoordinate [values shared by the 35 below unless stated]: default_value=0 tolerance=0 stiffness=0
            clamped=true restraint_active=false
          RestraintFunctions
          MinRestraintFunctions
          MaxRestraintFunctions
        SimmCoordinate calcn_r_tx: range=(-5 5) keys=p_key
        SimmCoordinate calcn_r_ty: range=(-1 2) default_value=0.01 keys=q_key
        SimmCoordinate calcn_r_tz: range=(-3 3) default_value=0.09142 keys=q_key
        SimmCoordinate calcn_r_r1: range=(-360 360) keys=q_key
        SimmCoordinate calcn_r_r2: range=(-360 360) keys=q_key
        SimmCoordinate calcn_r_r3: range=(-360 360) keys=q_key
        SimmCoordinate calcn_l_tx: range=(-5 5) keys=p_key
        SimmCoordinate calcn_l_ty: range=(-1 2) default_value=0.01 keys=q_key
        SimmCoordinate calcn_l_tz: range=(-3 3) default_value=-0.09142 keys=q_key
        SimmCoordinate calcn_l_r1: range=(-360 360) keys=q_key
        SimmCoordinate calcn_l_r2: range=(-360 360) keys=q_key
        SimmCoordinate calcn_l_r3: range=(-360 360) keys=q_key
        SimmCoordinate pelvis_tx: range=(-5 5) default_value=0.12 keys=p_key
        SimmCoordinate pelvis_ty: range=(-1 2) default_value=0.93 keys=q_key
        SimmCoordinate pelvis_tz: range=(-3 3) keys=q_key
        SimmCoordinate pelvis_list: range=(-90 90) keys=q_key
        SimmCoordinate pelvis_rotation: range=(-90 90) keys=q_key
        SimmCoordinate pelvis_tilt: range=(-90 90) keys=q_key
        SimmCoordinate hip_flexion_r: range=(-120 120) keys=(h_key leftmouse_button)
        SimmCoordinate hip_adduction_r: range=(-120 120) keys=(h_key leftmouse_button)
        SimmCoordinate hip_rotation_r: range=(-120 120) keys=(h_key leftmouse_button)
        SimmCoordinate knee_angle_r: range=(-120 10) keys=k_key
        SimmCoordinate ankle_angle_r: range=(-90 90) keys=a_key
        SimmCoordinate subtalar_angle_r: range=(-90 90) keys=a_key
        SimmCoordinate mtp_angle_r: range=(-90 90) keys=t_key
        SimmCoordinate hip_flexion_l: range=(-120 120) keys=(h_key leftmouse_button)
        SimmCoordinate hip_adduction_l: range=(-120 120) keys=(h_key leftmouse_button)
        SimmCoordinate hip_rotation_l: range=(-120 120) keys=(h_key leftmouse_button)
        SimmCoordinate knee_angle_l: range=(-120 10) keys=k_key
        SimmCoordinate ankle_angle_l: range=(-60 60) keys=a_key
        SimmCoordinate subtalar_angle_l: range=(-90 90) keys=a_key
        SimmCoordinate mtp_angle_l: range=(-60 60) keys=t_key
        SimmCoordinate lumbar_extension: range=(-90 90) keys=q_key
        SimmCoordinate lumbar_bending: range=(-90 90) keys=q_key
        SimmCoordinate lumbar_rotation: range=(-90 90) keys=q_key
      SimmJointSet:
        SimmJoint ground_calcn_rp: Bodies=(ground calcn_rp)
          SimmDofSet:
            SimmTranslationDof tx: DOF_coordinate=calcn_r_tx
              Value:
                natCubicSpline: x=(-360 360) y=(-360 360)
            SimmTranslationDof ty: DOF_coordinate=calcn_r_ty
              Value:
                natCubicSpline: x=(-360 360) y=(-360 360)
            SimmTranslationDof tz: DOF_coordinate=calcn_r_tz
              Value:
                natCubicSpline: x=(-360 360) y=(-360 360)
            SimmRotationDof r1: axis=(1 0 0) DOF_coordinate=calcn_r_r1
              Value:
                natCubicSpline: x=(-360 360) y=(-360 360)
            SimmRotationDof r2: axis=(0 1 0) DOF_coordinate=calcn_r_r2
              Value:
                natCubicSpline: x=(-360 360) y=(-360 360)
            SimmRotationDof r3: axis=(0 0 1) DOF_coordinate=calcn_r_r3
              Value:
                natCubicSpline: x=(-360 360) y=(-360 360)
        SimmJoint ground_calcn_lp: Bodies=(ground calcn_lp)
          SimmDofSet:
            SimmTranslationDof tx: DOF_coordinate=calcn_l_tx
              Value:
                natCubicSpline: x=(-360 360) y=(-360 360)
            SimmTranslationDof ty: DOF_coordinate=calcn_l_ty
              Value:
                natCubicSpline: x=(-360 360) y=(-360 360)
            SimmTranslationDof tz: DOF_coordinate=calcn_l_tz
              Value:
                natCubicSpline: x=(-360 360) y=(-360 360)
            SimmRotationDof r1: axis=(1 0 0) DOF_coordinate=calcn_l_r1
              Value:
                natCubicSpline: x=(-360 360) y=(-360 360)
            SimmRotationDof r2: axis=(0 1 0) DOF_coordinate=calcn_l_r2
              Value:
                natCubicSpline: x=(-360 360) y=(-360 360)
            SimmRotationDof r3: axis=(0 0 1) DOF_coordinate=calcn_l_r3
              Value:
                natCubicSpline: x=(-360 360) y=(-360 360)
        SimmJoint ground_pelvis: Bodies=(ground pelvis)
          SimmDofSet:
            SimmTranslationDof tx: DOF_coordinate=pelvis_tx
              Value:
                natCubicSpline: x=(-360 360) y=(-360 360)
            SimmTranslationDof ty: DOF_coordinate=pelvis_ty
              Value:
                natCubicSpline: x=(-360 360) y=(-360 360)
            SimmTranslationDof tz: DOF_coordinate=pelvis_tz
              Value:
                natCubicSpline: x=(-360 360) y=(-360 360)
            SimmRotationDof r1: axis=(0 0 1) DOF_coordinate=pelvis_tilt
              Value:
                natCubicSpline: x=(-360 360) y=(-360 360)
            SimmRotationDof r2: axis=(1 0 0) DOF_coordinate=pelvis_list
              Value:
                natCubicSpline: x=(-360 360) y=(-360 360)
            SimmRotationDof r3: axis=(0 1 0) DOF_coordinate=pelvis_rotation
              Value:
                natCubicSpline: x=(-360 360) y=(-360 360)
        SimmJoint hip_r: Bodies=(pelvis femur_r)
          SimmDofSet:
            SimmTranslationDof tx:
              Value: Constant(value=-0.06579701)
            SimmTranslationDof ty:
              Value: Constant(value=-0.06151602)
            SimmTranslationDof tz:
              Value: Constant(value=0.07770934)
            SimmRotationDof r1: axis=(0 0 1) DOF_coordinate=hip_flexion_r
              Value:
                natCubicSpline: x=(-360 360) y=(-360 360)
            SimmRotationDof r2: axis=(1 0 0) DOF_coordinate=hip_adduction_r
              Value:
                natCubicSpline: x=(-360 360) y=(-360 360)
            SimmRotationDof r3: axis=(0 1 0) DOF_coordinate=hip_rotation_r
              Value:
                natCubicSpline: x=(-360 360) y=(-360 360)
        SimmJoint knee_r: Bodies=(femur_r tibia_r)
          SimmDofSet:
            SimmTranslationDof tx: DOF_coordinate=knee_angle_r
              Value:
                natCubicSpline: x=(-120 -100 -80 -60 -40 -20 -10 11.30699 19.33131 28.08511 87.17325 120)
                    y=(-0.00333991 0.00186826 0.0042897 0.00427926 0.00221269 -0.00104372 -0.00323554 -0.00545553 -0.00567263 -0.0058177 -0.00567263 -0.00547954)
            SimmTranslationDof ty: DOF_coordinate=knee_angle_r
              Value:
                natCubicSpline: x=(-120 -70 -30 -20 -10 9.118541 120)
                    y=(-0.4410768 -0.4260472 -0.4164449 -0.4149837 -0.41394 -0.4125456 -0.4133138)
            SimmTranslationDof tz:
              Value: Constant(value=0)
            SimmRotationDof r1: axis=(0 0 1) DOF_coordinate=knee_angle_r
              Value:
                natCubicSpline: x=(-360 360) y=(-360 360)
            SimmRotationDof r2: axis=(1 0 0)
              Value: Constant(value=0)
            SimmRotationDof r3: axis=(0 1 0)
              Value: Constant(value=0)
        SimmJoint tib_pat_r: Bodies=(tibia_r patella_r)
          SimmDofSet:
            SimmTranslationDof tx: DOF_coordinate=knee_angle_r
              Value:
                natCubicSpline: x=(-120 -80 -60 -40 -20 -10 0 0.01 0.02 5 120)
                    y=(0.01618493 0.03031167 0.03564427 0.04022845 0.04387707 0.04528039 0.04640305 0.04640305 0.04640305 0.04640305 0.04640305)
            SimmTranslationDof ty: DOF_coordinate=knee_angle_r
              Value:
                natCubicSpline: x=(-120 -90 -80 -60 -40 -20 -10 0 0.01 0.02 5 120)
                    y=(-0.02048844 -0.01889801 -0.01871091 -0.01908512 -0.01974001 -0.02048844 -0.02086266 -0.02123688 -0.02123688 -0.02123688 -0.02123688 -0.02123688)
            SimmTranslationDof tz:
              Value: Constant(value=0.00224531)
            SimmRotationDof r1: axis=(0 0 1) DOF_coordinate=knee_angle_r
              Value:
                natCubicSpline: x=(-120 -114.59 -83.51 -30.16 1.6 10) y=(17.65 17.65 17.55 15.48 -2.12 -16.04)
            SimmRotationDof r2: axis=(1 0 0)
              Value: Constant(value=0)
            SimmRotationDof r3: axis=(0 1 0)
              Value: Constant(value=0)
        SimmJoint ankle_r: Bodies=(tibia_r talus_r)
          SimmDofSet:
            SimmTranslationDof tx:
              Value: Constant(value=0)
            SimmTranslationDof ty:
              Value: Constant(value=-0.4022845)
            SimmTranslationDof tz:
              Value: Constant(value=0)
            SimmRotationDof r1: axis=(-0.1050135 -0.1740224 0.9791263) DOF_coordinate=ankle_angle_r
              Value:
                natCubicSpline: x=(-360 360) y=(-360 360)
            SimmRotationDof r2: axis=(1 0 0)
              Value: Constant(value=0)
            SimmRotationDof r3: axis=(0 1 0)
              Value: Constant(value=0)
        SimmJoint subtalar_r: Bodies=(talus_r calcn_r)
          SimmDofSet:
            SimmTranslationDof tx:
              Value: Constant(value=-0.04562654)
            SimmTranslationDof ty:
              Value: Constant(value=-0.03924612)
            SimmTranslationDof tz:
              Value: Constant(value=0.00740952)
            SimmRotationDof r1: axis=(0.7871796 0.6047475 -0.1209495) DOF_coordinate=subtalar_angle_r
              Value:
                natCubicSpline: x=(-360 360) y=(-360 360)
            SimmRotationDof r2: axis=(0 1 0)
              Value: Constant(value=0)
            SimmRotationDof r3: axis=(0 0 1)
              Value: Constant(value=0)
        SimmJoint mtp_r: Bodies=(calcn_r toes_r)
          SimmDofSet:
            SimmTranslationDof tx:
              Value: Constant(value=0.1860166)
            SimmTranslationDof ty:
              Value: Constant(value=-0.00208072)
            SimmTranslationDof tz:
              Value: Constant(value=0.00112359)
            SimmRotationDof r1: axis=(-0.5809544 0 0.8139361) DOF_coordinate=mtp_angle_r
              Value:
                natCubicSpline: x=(-360 360) y=(-360 360)
            SimmRotationDof r2: axis=(1 0 0)
              Value: Constant(value=0)
            SimmRotationDof r3: axis=(0 1 0)
              Value: Constant(value=0)
        SimmJoint hip_l: Bodies=(pelvis femur_l)
          SimmDofSet:
            SimmTranslationDof tx:
              Value: Constant(value=-0.06579701)
            SimmTranslationDof ty:
              Value: Constant(value=-0.06151602)
            SimmTranslationDof tz:
              Value: Constant(value=-0.07770934)
            SimmRotationDof r1: axis=(0 0 1) DOF_coordinate=hip_flexion_l
              Value:
                natCubicSpline: x=(-360 360) y=(-360 360)
            SimmRotationDof r2: axis=(-1 0 0) DOF_coordinate=hip_adduction_l
              Value:
                natCubicSpline: x=(-360 360) y=(-360 360)
            SimmRotationDof r3: axis=(0 -1 0) DOF_coordinate=hip_rotation_l
              Value:
                natCubicSpline: x=(-360 360) y=(-360 360)
        SimmJoint knee_l: Bodies=(femur_l tibia_l)
          SimmDofSet:
            SimmTranslationDof tx: DOF_coordinate=knee_angle_l
              Value:
                natCubicSpline: x=(-120 -100 -80 -60 -40 -20 -10 11.30699 19.33131 28.08511 87.17325 120)
                    y=(-0.00333991 0.00186826 0.0042897 0.00427926 0.00221269 -0.00104372 -0.00323554 -0.00545553 -0.00567263 -0.0058177 -0.00567263 -0.00547954)
            SimmTranslationDof ty: DOF_coordinate=knee_angle_l
              Value:
                natCubicSpline: x=(-120 -70 -30 -20 -10 9.118541 120)
                    y=(-0.4410768 -0.4260472 -0.4164449 -0.4149837 -0.41394 -0.4125456 -0.4133138)
            SimmTranslationDof tz:
              Value: Constant(value=0)
            SimmRotationDof r1: axis=(0 0 1) DOF_coordinate=knee_angle_l
              Value:
                natCubicSpline: x=(-360 360) y=(-360 360)
            SimmRotationDof r2: axis=(1 0 0)
              Value: Constant(value=0)
            SimmRotationDof r3: axis=(0 1 0)
              Value: Constant(value=0)
        SimmJoint tib_pat_l: Bodies=(tibia_l patella_l)
          SimmDofSet:
            SimmTranslationDof tx: DOF_coordinate=knee_angle_l
              Value:
                natCubicSpline: x=(-120 -80 -60 -40 -20 -10 0 0.01 0.02 5 120)
                    y=(0.01618493 0.03031167 0.03564427 0.04022845 0.04387707 0.04528039 0.04640305 0.04640305 0.04640305 0.04640305 0.04640305)
            SimmTranslationDof ty: DOF_coordinate=knee_angle_l
              Value:
                natCubicSpline: x=(-120 -90 -80 -60 -40 -20 -10 0 0.01 0.02 5 120)
                    y=(-0.02048844 -0.01889801 -0.01871091 -0.01908512 -0.01974001 -0.02048844 -0.02086266 -0.02123688 -0.02123688 -0.02123688 -0.02123688 -0.02123688)
            SimmTranslationDof tz:
              Value: Constant(value=-0.00224531)
            SimmRotationDof r1: axis=(0 0 1) DOF_coordinate=knee_angle_l
              Value:
                natCubicSpline: x=(-120 -114.59 -83.51 -30.16 1.6 10) y=(17.65 17.65 17.55 15.48 -2.12 -16.04)
            SimmRotationDof r2: axis=(1 0 0)
              Value: Constant(value=0)
            SimmRotationDof r3: axis=(0 1 0)
              Value: Constant(value=0)
        SimmJoint ankle_l: Bodies=(tibia_l talus_l)
          SimmDofSet:
            SimmTranslationDof tx:
              Value: Constant(value=0)
            SimmTranslationDof ty:
              Value: Constant(value=-0.4022845)
            SimmTranslationDof tz:
              Value: Constant(value=0)
            SimmRotationDof r1: axis=(0.1050135 -0.1740224 0.9791263) DOF_coordinate=ankle_angle_l
              Value:
                natCubicSpline: x=(-360 360) y=(-360 360)
            SimmRotationDof r2: axis=(1 0 0)
              Value: Constant(value=0)
            SimmRotationDof r3: axis=(0 1 0)
              Value: Constant(value=0)
        SimmJoint subtalar_l: Bodies=(talus_l calcn_l)
          SimmDofSet:
            SimmTranslationDof tx:
              Value: Constant(value=-0.04562654)
            SimmTranslationDof ty:
              Value: Constant(value=-0.03924612)
            SimmTranslationDof tz:
              Value: Constant(value=-0.00740952)
            SimmRotationDof r1: axis=(-0.7871796 -0.6047475 -0.1209495) DOF_coordinate=subtalar_angle_l
              Value:
                natCubicSpline: x=(-360 360) y=(-360 360)
            SimmRotationDof r2: axis=(0 1 0)
              Value: Constant(value=0)
            SimmRotationDof r3: axis=(0 0 1)
              Value: Constant(value=0)
        SimmJoint mtp_l: Bodies=(calcn_l toes_l)
          SimmDofSet:
            SimmTranslationDof tx:
              Value: Constant(value=0.1860166)
            SimmTranslationDof ty:
              Value: Constant(value=-0.00208072)
            SimmTranslationDof tz:
              Value: Constant(value=-0.00112359)
            SimmRotationDof r1: axis=(0.5809544 0 0.8139361) DOF_coordinate=mtp_angle_l
              Value:
                natCubicSpline: x=(-360 360) y=(-360 360)
            SimmRotationDof r2: axis=(1 0 0)
              Value: Constant(value=0)
            SimmRotationDof r3: axis=(0 1 0)
              Value: Constant(value=0)
        SimmJoint back: Bodies=(pelvis torso)
          SimmDofSet:
            SimmTranslationDof tx:
              Value: Constant(value=-0.09371654)
            SimmTranslationDof ty:
              Value: Constant(value=0.07584804)
            SimmTranslationDof tz:
              Value: Constant(value=0)
            SimmRotationDof r1: axis=(0 0 1) DOF_coordinate=lumbar_extension
              Value:
                natCubicSpline: x=(-360 360) y=(-360 360)
            SimmRotationDof r2: axis=(1 0 0) DOF_coordinate=lumbar_bending
              Value:
                natCubicSpline: x=(-360 360) y=(-360 360)
            SimmRotationDof r3: axis=(0 1 0) DOF_coordinate=lumbar_rotation
              Value:
                natCubicSpline: x=(-360 360) y=(-360 360)
