# OpenSim document version 20302
Model subject01:
  credits: Model authors names..
  publications: List of publications related to model...
  length_units: meters
  force_units: N
  gravity: 0 -9.80665 0
  BodySet:
    Body ground: mass=0 mass_center=(0 0 0) inertia_xx=0 inertia_yy=0 inertia_zz=0
    Body pelvis: mass=11.37517 mass_center=(-0.0724376 0 0) inertia_xx=0.1042331 inertia_yy=0.08831422
        inertia_zz=0.05870716 meshes=(sacrum.vtp pelvis.vtp l_pelvis.vtp)
      CustomJoint ground_pelvis: parent_body=ground location_in_parent=(0 0 0) location=(0 0 0)
        Coordinate pelvis_tilt: motion_type=rotational default_value=0.07883579 default_speed_value=0.08355219
            initial_value=0.07883579 range=(-1.570796 1.570796) clamped=false
        Coordinate pelvis_list: motion_type=rotational default_value=0.01171763 default_speed_value=-0.3362515
            initial_value=0.01171763 range=(-1.570796 1.570796) clamped=false
        Coordinate pelvis_rotation: motion_type=rotational default_value=0.06216861 default_speed_value=0.2567624
            initial_value=0.06216861 range=(-1.570796 1.570796) clamped=false
        Coordinate pelvis_tx: motion_type=translational default_value=0.6055685 default_speed_value=-0.00019854
            initial_value=0.6055685 range=(-5 5) clamped=false
        Coordinate pelvis_ty: motion_type=translational default_value=1.015851 default_speed_value=0.033656
            initial_value=1.015851 range=(-1 2) clamped=false
        Coordinate pelvis_tz: motion_type=translational default_value=0.01311526 default_speed_value=-0.06419042
            initial_value=0.01311526 range=(-3 3) clamped=false
        SpatialTransform:
          TransformAxis rotation1: coordinates=pelvis_tilt axis=(0 0 1) LinearFunction(coefficients=1 0)
          TransformAxis rotation2: coordinates=pelvis_list axis=(1 0 0) LinearFunction(coefficients=1 0)
          TransformAxis rotation3: coordinates=pelvis_rotation axis=(0 1 0) LinearFunction(coefficients=1 0)
          TransformAxis translation1: coordinates=pelvis_tx axis=(1 0 0)
              MultiplierFunction(scale=1, LinearFunction(coefficients=1 0))
          TransformAxis translation2: coordinates=pelvis_ty axis=(0 1 0)
              MultiplierFunction(scale=1, LinearFunction(coefficients=1 0))
          TransformAxis translation3: coordinates=pelvis_tz axis=(0 0 1)
              MultiplierFunction(scale=1, LinearFunction(coefficients=1 0))
    Body femur_r: mass=8.984038 mass_center=(0 -0.1950308 0) inertia_xx=0.1702207 inertia_yy=0.04462096
        inertia_zz=0.1795009 meshes=femur.vtp
      CustomJoint hip_r: parent_body=pelvis location_in_parent=(-0.0724376 -0.06772454 0.08555218) location=(0 0 0)
        Coordinate hip_flexion_r: motion_type=rotational default_value=0.3231752 default_speed_value=0.937806
            initial_value=0.3231752 range=(-2.094395 2.094395) clamped=false
        Coordinate hip_adduction_r: motion_type=rotational default_value=-0.0402486 default_speed_value=0.627026
            initial_value=-0.0402486 range=(-2.094395 2.094395) clamped=false
        Coordinate hip_rotation_r: motion_type=rotational default_value=-0.1210461 default_speed_value=-0.1241763
            initial_value=-0.1210461 range=(-2.094395 2.094395) clamped=false
        SpatialTransform: axes_held_at_zero=(translation1 translation2 translation3)
          TransformAxis rotation1: coordinates=hip_flexion_r axis=(0 0 1) LinearFunction(coefficients=1 0)
          TransformAxis rotation2: coordinates=hip_adduction_r axis=(1 0 0) LinearFunction(coefficients=1 0)
          TransformAxis rotation3: coordinates=hip_rotation_r axis=(0 1 0) LinearFunction(coefficients=1 0)
    Body tibia_r: mass=3.581001 mass_center=(0 -0.1845572 0) inertia_xx=0.04756937 inertia_yy=0.00481357
        inertia_zz=0.04823005 meshes=(tibia.vtp fibula.vtp)
      CustomJoint knee_r: parent_body=femur_r location_in_parent=(0 0 0) location=(0 0 0)
        Coordinate knee_angle_r: motion_type=rotational default_value=-0.4158869 default_speed_value=3.306106
            initial_value=-0.4158869 range=(-2.094395 0.1745329) clamped=false
        SpatialTransform: axes_held_at_zero=(rotation2 rotation3 translation3)
          TransformAxis rotation1: coordinates=knee_angle_r axis=(0 0 1) LinearFunction(coefficients=1 0)
          TransformAxis translation1: coordinates=knee_angle_r axis=(1 0 0)
            MultiplierFunction: scale=1.14724
              NaturalCubicSpline: x=(-2.094395 -1.745329 -1.396263 -1.047198 -0.6981317 -0.3490659 -0.1745329 0.1973442 0.337395 0.4901776 1.52146 2.094395)
                  y=(-0.0032 0.00179 0.00411 0.0041 0.00212 -0.001 -0.0031 -0.005227 -0.005435 -0.005574 -0.005435 -0.00525)
          TransformAxis translation2: coordinates=knee_angle_r axis=(0 1 0)
            MultiplierFunction: scale=1.14724
              NaturalCubicSpline: x=(-2.094395 -1.22173 -0.5235988 -0.3490659 -0.1745329 0.1591486 2.094395)
                  y=(-0.4226 -0.4082 -0.399 -0.3976 -0.3966 -0.395264 -0.396)
    Body talus_r: mass=0.09658802 mass_center=(0 0 0) inertia_xx=0.00119861 inertia_yy=0.00119861 inertia_zz=0.00119861
        meshes=talus.vtp
      CustomJoint ankle_r: parent_body=tibia_r location_in_parent=(0 -0.4250649 0) location=(0 0 0)
        Coordinate ankle_angle_r: motion_type=rotational default_value=0.02264509 default_speed_value=0.202881
            initial_value=0.02264509 range=(-1.570796 1.570796) clamped=false
        SpatialTransform: axes_held_at_zero=(rotation2 rotation3 translation1 translation2 translation3)
          TransformAxis rotation1: coordinates=ankle_angle_r axis=(-0.1050135 -0.1740224 0.9791263)
              LinearFunction(coefficients=1 0)
    Body calcn_r: mass=1.20735 mass_center=(0.1027085 0.03081254 0) inertia_xx=0.00142647 inertia_yy=0.00397375
        inertia_zz=0.00417753 meshes=foot.vtp
      CustomJoint subtalar_r: parent_body=talus_r location_in_parent=(-0.05432871 -0.04673138 0.00882271)
          location=(0 0 0)
        Coordinate subtalar_angle_r: motion_type=rotational default_value=-0.0000039 default_speed_value=0.00002133
            initial_value=-0.0000039 range=(-1.570796 1.570796) clamped=false
        SpatialTransform: axes_held_at_zero=(rotation2 rotation3 translation1 translation2 translation3)
          TransformAxis rotation1: coordinates=subtalar_angle_r axis=(0.7871796 0.6047475 -0.1209495)
              LinearFunction(coefficients=1 0)
    Body toes_r: mass=0.2092096 mass_center=(0.03553713 0.00616251 -0.01797398) inertia_xx=0.00010189
        inertia_yy=0.00020378 inertia_zz=0.00101891 meshes=bofoot.vtp
      CustomJoint mtp_r: parent_body=calcn_r location_in_parent=(0.1836428 -0.00205417 0.00110925) location=(0 0 0)
        Coordinate mtp_angle_r: motion_type=rotational default_value=-0.00000001 default_speed_value=-0.00000201
            initial_value=-0.00000001 range=(-1.570796 1.570796) clamped=false
        SpatialTransform: axes_held_at_zero=(rotation2 rotation3 translation1 translation2 translation3)
          TransformAxis rotation1: coordinates=mtp_angle_r axis=(-0.5809544 0 0.8139361)
              LinearFunction(coefficients=1 0)
    Body femur_l: mass=8.984038 mass_center=(0 -0.1950308 0) inertia_xx=0.1702207 inertia_yy=0.04462096
        inertia_zz=0.1795009 meshes=l_femur.vtp
      CustomJoint hip_l: parent_body=pelvis location_in_parent=(-0.0724376 -0.06772454 -0.08555218) location=(0 0 0)
        Coordinate hip_flexion_l: motion_type=rotational default_value=-0.1806778 default_speed_value=-2.027358
            initial_value=-0.1806778 range=(-2.094395 2.094395) clamped=false
        Coordinate hip_adduction_l: motion_type=rotational default_value=-0.01118594 default_speed_value=-0.3170247
            initial_value=-0.01118594 range=(-2.094395 2.094395) clamped=false
        Coordinate hip_rotation_l: motion_type=rotational default_value=0.03006113 default_speed_value=0.3449042
            initial_value=0.03006113 range=(-2.094395 2.094395) clamped=false
        SpatialTransform: axes_held_at_zero=(translation1 translation2 translation3)
          TransformAxis rotation1: coordinates=hip_flexion_l axis=(0 0 1) LinearFunction(coefficients=1 0)
          TransformAxis rotation2: coordinates=hip_adduction_l axis=(-1 0 0) LinearFunction(coefficients=1 0)
          TransformAxis rotation3: coordinates=hip_rotation_l axis=(0 -1 0) LinearFunction(coefficients=1 0)
    Body tibia_l: mass=3.581001 mass_center=(0 -0.1845572 0) inertia_xx=0.04756937 inertia_yy=0.00481357
        inertia_zz=0.04823005 meshes=(l_tibia.vtp l_fibula.vtp)
      CustomJoint knee_l: parent_body=femur_l location_in_parent=(0 0 0) location=(0 0 0)
        Coordinate knee_angle_l: motion_type=rotational default_value=-0.7696159 default_speed_value=1.628851
            initial_value=-0.7696159 range=(-2.094395 0.1745329) clamped=false
        SpatialTransform: axes_held_at_zero=(rotation2 rotation3 translation3)
          TransformAxis rotation1: coordinates=knee_angle_l axis=(0 0 1) LinearFunction(coefficients=1 0)
          TransformAxis translation1: coordinates=knee_angle_l axis=(1 0 0)
            MultiplierFunction: scale=1.14724
              NaturalCubicSpline: x=(-2.094395 -1.745329 -1.396263 -1.047198 -0.6981317 -0.3490659 -0.1745329 0.1973442 0.337395 0.4901776 1.52146 2.094395)
                  y=(-0.0032 0.00179 0.00411 0.0041 0.00212 -0.001 -0.0031 -0.005227 -0.005435 -0.005574 -0.005435 -0.00525)
          TransformAxis translation2: coordinates=knee_angle_l axis=(0 1 0)
            MultiplierFunction: scale=1.14724
              NaturalCubicSpline: x=(-2.094395 -1.22173 -0.5235988 -0.3490659 -0.1745329 0.1591486 2.094395)
                  y=(-0.4226 -0.4082 -0.399 -0.3976 -0.3966 -0.395264 -0.396)
    Body talus_l: mass=0.09658802 mass_center=(0 0 0) inertia_xx=0.00119861 inertia_yy=0.00119861 inertia_zz=0.00119861
        meshes=l_talus.vtp
      CustomJoint ankle_l: parent_body=tibia_l location_in_parent=(0 -0.4250649 0) location=(0 0 0)
        Coordinate ankle_angle_l: motion_type=rotational default_value=-0.02250022 default_speed_value=0.2546943
            initial_value=-0.02250022 range=(-1.047198 1.047198) clamped=false
        SpatialTransform: axes_held_at_zero=(rotation2 rotation3 translation1 translation2 translation3)
          TransformAxis rotation1: coordinates=ankle_angle_l axis=(0.1050135 0.1740224 0.9791263)
              LinearFunction(coefficients=1 0)
    Body calcn_l: mass=1.20735 mass_center=(0.1027085 0.03081254 0) inertia_xx=0.00142647 inertia_yy=0.00397375
        inertia_zz=0.00417753 meshes=l_foot.vtp
      CustomJoint subtalar_l: parent_body=talus_l location_in_parent=(-0.05432871 -0.04673138 -0.00882271)
          location=(0 0 0)
        Coordinate subtalar_angle_l: motion_type=rotational default_value=0.0000123 default_speed_value=0.00000749
            initial_value=0.0000123 range=(-1.570796 1.570796) clamped=false
        SpatialTransform: axes_held_at_zero=(rotation2 rotation3 translation1 translation2 translation3)
          TransformAxis rotation1: coordinates=subtalar_angle_l axis=(-0.7871796 -0.6047475 -0.1209495)
              LinearFunction(coefficients=1 0)
    Body toes_l: mass=0.2092096 mass_center=(0.03553713 0.00616251 0.01797398) inertia_xx=0.00010189
        inertia_yy=0.00020378 inertia_zz=0.00101891 meshes=l_bofoot.vtp
      CustomJoint mtp_l: parent_body=calcn_l location_in_parent=(0.1836428 -0.00205417 -0.00110925) location=(0 0 0)
        Coordinate mtp_angle_l: motion_type=rotational default_value=0.00000003 default_speed_value=-0.00000204
            initial_value=0.00000003 range=(-1.047198 1.047198) clamped=false
        SpatialTransform: axes_held_at_zero=(rotation2 rotation3 translation1 translation2 translation3)
          TransformAxis rotation1: coordinates=mtp_angle_l axis=(0.5809544 0 0.8139361)
              LinearFunction(coefficients=1 0)
    Body torso: mass=33.06845 mass_center=(0.00599443 0.3455104 0.1) inertia_xx=1.660314 inertia_yy=0.8507069
        inertia_zz=1.611783 meshes=(hat_spine.vtp hat_jaw.vtp hat_skull.vtp hat_ribs.vtp)
      CustomJoint back: parent_body=pelvis location_in_parent=(-0.1031749 0.08350303 0) location=(0 0 0)
        Coordinate lumbar_extension: motion_type=rotational default_value=-0.2674745 default_speed_value=-0.08336603
            initial_value=-0.2674745 range=(-1.570796 1.570796) clamped=false
        Coordinate lumbar_bending: motion_type=rotational default_value=0.04391806 default_speed_value=0.5986297
            initial_value=0.04391806 range=(-1.570796 1.570796) clamped=false
        Coordinate lumbar_rotation: motion_type=rotational default_value=-0.1192196 default_speed_value=-0.05934334
            initial_value=-0.1192196 range=(-1.570796 1.570796) clamped=false
        SpatialTransform: axes_held_at_zero=(translation1 translation2 translation3)
          TransformAxis rotation1: coordinates=lumbar_extension axis=(0 0 1) LinearFunction(coefficients=1 0)
          TransformAxis rotation2: coordinates=lumbar_bending axis=(1 0 0) LinearFunction(coefficients=1 0)
          TransformAxis rotation3: coordinates=lumbar_rotation axis=(0 1 0) LinearFunction(coefficients=1 0)
  MarkerSet:
    Marker Sternum: torso (0.1204879 0.307161 -0.00325415)
    Marker R.Acromium: torso (-0.00065165 0.4291076 0.1658803)
    Marker L.Acromium: torso (-0.00100762 0.4403144 -0.1751482)
    Marker Top.Head: torso (0.09618568 0.6955114 0.00377828)
    Marker R.ASIS: pelvis (0.02342149 0.03628304 0.1308401)
    Marker L.ASIS: pelvis (0.02831302 0.02728761 -0.1312515)
    Marker V.Sacral: pelvis (-0.1725591 0.04028204 0.00705459)
    Marker R.Thigh.Upper: femur_r (0.046341 -0.2198705 0.09188879)
    Marker R.Thigh.Front: femur_r (0.1084824 -0.2814198 -0.0006863)
    Marker R.Thigh.Rear: femur_r (0.03561661 -0.3405158 0.08192361)
    Marker R.Knee.Lat: femur_r (-0.00324464 -0.4259551 0.06143334)
    Marker R.Knee.Med: femur_r (0.00053937 -0.4428302 -0.05965726)
    Marker R.Shank.Upper: tibia_r (-0.02735051 -0.05973056 0.07022583)
    Marker R.Shank.Front: tibia_r (0.05100489 -0.09522922 0.01975761)
    Marker R.Shank.Rear: tibia_r (-0.01135933 -0.1451912 0.08031604)
    Marker R.Ankle.Lat: tibia_r (-0.00755805 -0.4304937 0.05548778)
    Marker R.Ankle.Med: tibia_r (0.00455313 -0.4160592 -0.03335681)
    Marker R.Heel: calcn_r (-0.02034258 0.01725087 -0.00558137)
    Marker R.Midfoot.Sup: calcn_r (0.1226653 0.03356966 -0.04042423)
    Marker R.Midfoot.Lat: calcn_r (0.1181867 0.00665462 0.06539407)
    Marker R.Toe.Lat: calcn_r (0.2088466 -0.01622023 0.07285127)
    Marker R.Toe.Med: calcn_r (0.2097438 0.00356087 -0.03453102)
    Marker R.Toe.Tip: calcn_r (0.2709039 0.00360341 -0.0031364)
    Marker L.Thigh.Upper: femur_l (0.02244783 -0.2067415 -0.09723255)
    Marker L.Thigh.Front: femur_l (0.1106123 -0.2488352 -0.03406858)
    Marker L.Thigh.Rear: femur_l (0.01511583 -0.315441 -0.0823868)
    Marker L.Knee.Lat: femur_l (-0.00864517 -0.4457674 -0.06417051)
    Marker L.Knee.Med: femur_l (0.00883426 -0.4459561 0.05080403)
    Marker L.Shank.Upper: tibia_l (-0.00634332 -0.0715332 -0.07941727)
    Marker L.Shank.Front: tibia_l (0.04520438 -0.1216054 -0.03085689)
    Marker L.Shank.Rear: tibia_l (-0.02463207 -0.1145204 -0.08793793)
    Marker L.Ankle.Lat: tibia_l (-0.00374142 -0.4284221 -0.05715249)
    Marker L.Ankle.Med: tibia_l (0.01302326 -0.4054301 0.03277413)
    Marker L.Heel: calcn_l (-0.02250338 0.02641887 0.00634089)
    Marker L.Midfoot.Sup: calcn_l (0.1493924 0.03636676 0.03459445)
    Marker L.Midfoot.Lat: calcn_l (0.133392 0.01776218 -0.06219726)
    Marker L.Toe.Lat: calcn_l (0.196296 -0.00665497 -0.06741377)
    Marker L.Toe.Med: calcn_l (0.2115868 0.01301084 0.03297501)
    Marker L.Toe.Tip: calcn_l (0.2614197 0.00990054 0.00899624)
