# OpenSim document version 20201
ExternalLoads:
  datafile: subject01_walk1_grf.mot
  external_loads_model_kinematics_file: subject01_walk1_ik.mot
  lowpass_cutoff_frequency_for_load_kinematics: -1
  PrescribedForce RightForce: body=calcn_r pointIsGlobal=false forceIsGlobal=true
    FunctionSet forceFunctions:
      NaturalCubicSpline ground_force_vx
      NaturalCubicSpline ground_force_vy
      NaturalCubicSpline ground_force_vz
    FunctionSet pointFunctions:
      NaturalCubicSpline ground_force_px
      NaturalCubicSpline ground_force_py
      NaturalCubicSpline ground_force_pz
    FunctionSet torqueFunctions:
      NaturalCubicSpline ground_torque_x
      NaturalCubicSpline ground_torque_y
      NaturalCubicSpline ground_torque_z
  PrescribedForce LeftForce: body=calcn_l pointIsGlobal=false forceIsGlobal=true
    FunctionSet forceFunctions:
      NaturalCubicSpline l_ground_force_vx
      NaturalCubicSpline l_ground_force_vy
      NaturalCubicSpline l_ground_force_vz
    FunctionSet pointFunctions:
      NaturalCubicSpline l_ground_force_px
      NaturalCubicSpline l_ground_force_py
      NaturalCubicSpline l_ground_force_pz
    FunctionSet torqueFunctions:
      NaturalCubicSpline l_ground_torque_x
      NaturalCubicSpline l_ground_torque_y
      NaturalCubicSpline l_ground_torque_z
