SimmModel Leg Model, No Muscles:
  gravity: 0 0 -9.80665
  KinematicsEngines:
    SimmKinematicsEngine:
      Bodies:
        SimmBody ground: mass=0 mass_center=(0 0 0) inertia=(0 0 0 0 0 0 0 0 0)
        SimmBody femur_r: mass=10.5225 mass_center=(0 -0.162162 0) inertia=(0.178608 0 0 0 0.036634 0 0 0 0.178608)
          Markers:
            SimmMarker R.Knee: location=(0 -0.404 0.05) weight=1
            SimmMarker R.Knee.Lateral: location=(0 -0.404 0.05) weight=1
            SimmMarker R.Knee.Lat: location=(0 -0.404 0.05) weight=1
            SimmMarker RKNE: location=(0 -0.404 0.05) weight=1
            SimmMarker R.Knee.Medial: location=(0 -0.404 -0.05) weight=1
            SimmMarker R.Knee.Med: location=(0 -0.404 -0.05) weight=1
            SimmMarker R.Thigh: location=(0.0179 -0.224 0.1147) weight=1
            SimmMarker R.Thigh.Upper: location=(0.0179 -0.264 0.0647) weight=1
            SimmMarker R.Thigh.Front: location=(0.08 -0.324 0.0047) weight=1
            SimmMarker R.Thigh.Rear: location=(-0.0479 -0.324 0.0047) weight=1
            SimmMarker RTHI: location=(0.0179 -0.264 0.0647) weight=1
          Bones:
            SimmBone femur_r: geometry_files=femur_r.vtp
        SimmBody tibia_r: mass=3.2475 mass_center=(0 -0.171713 0) inertia=(0.029999 0 0 0 0.005157 0 0 0 0.031231)
          Markers:
            SimmMarker R.Ankle: location=(-0.005 -0.41 0.053) weight=2
            SimmMarker R.Ankle.Lateral: location=(-0.005 -0.41 0.053) weight=2
            SimmMarker R.Ankle.Lat: location=(-0.005 -0.41 0.053) weight=2
            SimmMarker RANK: location=(-0.005 -0.41 0.053) weight=2
            SimmMarker R.Ankle.Medial: location=(0.006 -0.3888 -0.038) weight=2
            SimmMarker R.Ankle.Med: location=(0.006 -0.3888 -0.038) weight=2
            SimmMarker R.Shank: location=(0.0104 -0.2322 0.0748) weight=1
            SimmMarker R.Shank.Upper: location=(0.0125 -0.3196 0.06) weight=1
            SimmMarker R.Shank.Front: location=(0.0425 -0.3596 0) weight=1
            SimmMarker R.Shank.Rear: location=(-0.0325 -0.3596 0) weight=1
            SimmMarker RTIB: location=(0.0125 -0.3196 0.06) weight=1
          Bones:
            SimmBone tibia_r: geometry_files=tibia_r.vtp
            SimmBone fibula_r: geometry_files=fibula_r.vtp
        SimmBody patella_r: mass=0.0975 mass_center=(0.0018 0.0264 0) inertia=(0.000003 0 0 0 0.000015 0 0 0 0.000015)
          Bones:
            SimmBone patella_r: geometry_files=patella_r.vtp
        SimmBody talus_r: mass=0.045 mass_center=(0.0055 0.0023 0) inertia=(0.000003 0 0 0 0.000001 0 0 0 0.000003)
          Bones:
            SimmBone talus_rv: geometry_files=talus_rv.vtp
        SimmBody foot_r: mass=0.885 mass_center=(0.101865 0.0156 0) inertia=(0.000909 0 0 0 0.002314 0 0 0 0.002683)
          Bones:
            SimmBone calcaneous_rv: geometry_files=calcaneous_rv.vtp
            SimmBone navicular_rv: geometry_files=navicular_rv.vtp
            SimmBone cuboid_rv: geometry_files=cuboid_rv.vtp
            SimmBone first_cuneiform_rv: geometry_files=first_cuneiform_rv.vtp
            SimmBone second_cuneiform_rv: geometry_files=second_cuneiform_rv.vtp
            SimmBone third_cuneiform_rv: geometry_files=third_cuneiform_rv.vtp
            SimmBone metatarsal1_rv: geometry_files=metatarsal1_rv.vtp
            SimmBone metatarsal2_rv: geometry_files=metatarsal2_rv.vtp
            SimmBone metatarsal3_rv: geometry_files=metatarsal3_rv.vtp
            SimmBone metatarsal4_rv: geometry_files=metatarsal4_rv.vtp
            SimmBone metatarsal5_rv: geometry_files=metatarsal5_rv.vtp
        SimmBody foot_marker_r: mass=0 mass_center=(0 0 0) inertia=(0 0 0 0 0 0 0 0 0)
          Markers:
            SimmMarker R.Toe: location=(0.19 0 0) weight=2
            SimmMarker RTOE: location=(0.19 0 0) weight=2
            SimmMarker R.MedFoot: location=(0.13 0 -0.03) weight=2
            SimmMarker R.LatFoot: location=(0.13 0 0.05) weight=2
            SimmMarker R.Heel: location=(0 0 0) weight=2
            SimmMarker RHEE: location=(0 0 0) weight=2
        SimmBody toes_r: mass=0.0975 mass_center=(0.0307 -0.0026 0.0105) inertia=(0.0001 0 0 0 0.000255 0 0 0 0.000294)
          Bones:
            SimmBone prox_phalanx1_rvs: geometry_files=prox_phalanx1_rvs.vtp
            SimmBone prox_phalanx2_rvs: geometry_files=prox_phalanx2_rvs.vtp
            SimmBone prox_phalanx3_rvs: geometry_files=prox_phalanx3_rvs.vtp
            SimmBone prox_phalanx4_rvs: geometry_files=prox_phalanx4_rvs.vtp
            SimmBone prox_phalanx5_rvs: geometry_files=prox_phalanx5_rvs.vtp
            SimmBone mid_phalanx2_rvs: geometry_files=mid_phalanx2_rvs.vtp
            SimmBone mid_phalanx3_rvs: geometry_files=mid_phalanx3_rvs.vtp
            SimmBone mid_phalanx4_rvs: geometry_files=mid_phalanx4_rvs.vtp
            SimmBone mid_phalanx5_rvs: geometry_files=mid_phalanx5_rvs.vtp
            SimmBone distal_phalanx1_rvs: geometry_files=distal_phalanx1_rvs.vtp
            SimmBone distal_phalanx2_rvs: geometry_files=distal_phalanx2_rvs.vtp
            SimmBone distal_phalanx3_rvs: geometry_files=distal_phalanx3_rvs.vtp
            SimmBone distal_phalanx4_rvs: geometry_files=distal_phalanx4_rvs.vtp
            SimmBone distal_phalanx5_rvs: geometry_files=distal_phalanx5_rvs.vtp
      Coordinates:
        SimmCoordinate [values shared by the 40 below unless stated]: default_value=0 tolerance=0.00000001 stiffness=0
            restraint_active=false clamped=true
        SimmCoordinate lower_torso_TX: range=(-10 10) clamped=false
        SimmCoordinate lower_torso_TY: range=(-10 10) clamped=false
        SimmCoordinate lower_torso_TZ: range=(-10 10) default_value=0.969 clamped=false
        SimmCoordinate lower_torso_RX: range=(-270 270) default_value=90 clamped=false
        SimmCoordinate lower_torso_RY: range=(-270 270) clamped=false
        SimmCoordinate lower_torso_RZ: range=(-270 270) clamped=false
        SimmCoordinate lumbar_roll: range=(-45 45)
          MinRestraintFunctions:
            natCubicSpline: x=(0 10 30) y=(0 20 70)
          MaxRestraintFunctions:
            natCubicSpline: x=(0 10 30) y=(0 20 70)
        SimmCoordinate lumbar_yaw: range=(-60 60)
          MinRestraintFunctions:
            natCubicSpline: x=(0 10 30) y=(0 20 70)
          MaxRestraintFunctions:
            natCubicSpline: x=(0 10 30) y=(0 20 70)
        SimmCoordinate lumbar_pitch: range=(-45 45)
          MinRestraintFunctions:
            natCubicSpline: x=(0 10 30) y=(0 20 70)
          MaxRestraintFunctions:
            natCubicSpline: x=(0 10 30) y=(0 20 70)
        SimmCoordinate neck_roll: range=(-40 40)
          MinRestraintFunctions:
            natCubicSpline: x=(0 10 30) y=(0 20 70)
          MaxRestraintFunctions:
            natCubicSpline: x=(0 10 30) y=(0 20 70)
        SimmCoordinate neck_yaw: range=(-66 66)
          MinRestraintFunctions:
            natCubicSpline: x=(0 10 30) y=(0 20 70)
          MaxRestraintFunctions:
            natCubicSpline: x=(0 10 30) y=(0 20 70)
        SimmCoordinate neck_pitch: range=(-50 72)
          MinRestraintFunctions:
            natCubicSpline: x=(0 10 30) y=(0 20 70)
          MaxRestraintFunctions:
            natCubicSpline: x=(0 10 30) y=(0 20 70)
        SimmCoordinate arm_add_r: range=(-120 90)
          MinRestraintFunctions:
            natCubicSpline: x=(0 10 30) y=(0 20 70)
          MaxRestraintFunctions:
            natCubicSpline: x=(0 10 30) y=(0 20 70)
        SimmCoordinate arm_rot_r: range=(-10 10)
          MinRestraintFunctions:
            natCubicSpline: x=(0 10 30) y=(0 20 70)
          MaxRestraintFunctions:
            natCubicSpline: x=(0 10 30) y=(0 20 70)
        SimmCoordinate arm_flex_r: range=(-45 90)
          MinRestraintFunctions:
            natCubicSpline: x=(0 10 30) y=(0 20 70)
          MaxRestraintFunctions:
            natCubicSpline: x=(0 10 30) y=(0 20 70)
        SimmCoordinate elbow_flex_r: range=(0 130)
          MinRestraintFunctions:
            natCubicSpline: x=(0 10 30) y=(0 20 70)
          MaxRestraintFunctions:
            natCubicSpline: x=(0 10 30) y=(0 20 70)
        SimmCoordinate pro_sup_r: range=(50 70) default_value=60
          MinRestraintFunctions:
            natCubicSpline: x=(0 10 30) y=(0 20 70)
          MaxRestraintFunctions:
            natCubicSpline: x=(0 10 30) y=(0 20 70)
        SimmCoordinate wrist_dev_r: range=(-25 35)
          MinRestraintFunctions:
            natCubicSpline: x=(0 10 30) y=(0 20 70)
          MaxRestraintFunctions:
            natCubicSpline: x=(0 10 30) y=(0 20 70)
        SimmCoordinate wrist_flex_r: range=(-70 70)
          MinRestraintFunctions:
            natCubicSpline: x=(0 10 30) y=(0 20 70)
          MaxRestraintFunctions:
            natCubicSpline: x=(0 10 30) y=(0 20 70)
        SimmCoordinate arm_add_l: range=(-120 90)
          MinRestraintFunctions:
            natCubicSpline: x=(0 10 30) y=(0 20 70)
          MaxRestraintFunctions:
            natCubicSpline: x=(0 10 30) y=(0 20 70)
        SimmCoordinate arm_rot_l: range=(-10 10)
          MinRestraintFunctions:
            natCubicSpline: x=(0 10 30) y=(0 20 70)
          MaxRestraintFunctions:
            natCubicSpline: x=(0 10 30) y=(0 20 70)
        SimmCoordinate arm_flex_l: range=(-45 90)
          MinRestraintFunctions:
            natCubicSpline: x=(0 10 30) y=(0 20 70)
          MaxRestraintFunctions:
            natCubicSpline: x=(0 10 30) y=(0 20 70)
        SimmCoordinate elbow_flex_l: range=(0 130)
          MinRestraintFunctions:
            natCubicSpline: x=(0 10 30) y=(0 20 70)
          MaxRestraintFunctions:
            natCubicSpline: x=(0 10 30) y=(0 20 70)
        SimmCoordinate pro_sup_l: range=(50 70) default_value=60
          MinRestraintFunctions:
            natCubicSpline: x=(0 10 30) y=(0 20 70)
          MaxRestraintFunctions:
            natCubicSpline: x=(0 10 30) y=(0 20 70)
        SimmCoordinate wrist_dev_l: range=(-25 35)
          MinRestraintFunctions:
            natCubicSpline: x=(0 10 30) y=(0 20 70)
          MaxRestraintFunctions:
            natCubicSpline: x=(0 10 30) y=(0 20 70)
        SimmCoordinate wrist_flex_l: range=(-70 70)
          MinRestraintFunctions:
            natCubicSpline: x=(0 10 30) y=(0 20 70)
          MaxRestraintFunctions:
            natCubicSpline: x=(0 10 30) y=(0 20 70)
        SimmCoordinate hip_add_r: range=(-50 20)
          MinRestraintFunctions:
            natCubicSpline: x=(0 10 30) y=(0 20 70)
          MaxRestraintFunctions:
            natCubicSpline: x=(0 10 30) y=(0 20 70)
        SimmCoordinate hip_rot_r: range=(-40 40)
          MinRestraintFunctions:
            natCubicSpline: x=(0 10 30) y=(0 20 70)
          MaxRestraintFunctions:
            natCubicSpline: x=(0 10 30) y=(0 20 70)
        SimmCoordinate hip_flex_r: range=(-11 95)
          MinRestraintFunctions:
            natCubicSpline: x=(0 10 30) y=(0 20 70)
          MaxRestraintFunctions:
            natCubicSpline: x=(0 10 30) y=(0 20 70)
        SimmCoordinate knee_flex_r: range=(-10 120)
          MinRestraintFunctions:
            natCubicSpline: x=(0 10 30) y=(0 20 70)
          MaxRestraintFunctions:
            natCubicSpline: x=(0 10 30) y=(0 20 70)
        SimmCoordinate ankle_flex_r: range=(-30 30)
          MinRestraintFunctions:
            natCubicSpline: x=(0 10 30) y=(0 20 70)
          MaxRestraintFunctions:
            natCubicSpline: x=(0 10 30) y=(0 20 70)
        SimmCoordinate subt_angle_r: range=(-20 20)
          MinRestraintFunctions:
            natCubicSpline: x=(0 10 30) y=(0 20 70)
          MaxRestraintFunctions:
            natCubicSpline: x=(0 10 30) y=(0 20 70)
        SimmCoordinate toe_angle_r: range=(-30 30)
          MinRestraintFunctions:
            natCubicSpline: x=(0 10 30) y=(0 20 70)
          MaxRestraintFunctions:
            natCubicSpline: x=(0 10 30) y=(0 20 70)
        SimmCoordinate hip_add_l: range=(-50 20)
          MinRestraintFunctions:
            natCubicSpline: x=(0 10 30) y=(0 20 70)
          MaxRestraintFunctions:
            natCubicSpline: x=(0 10 30) y=(0 20 70)
        SimmCoordinate hip_rot_l: range=(-40 40)
          MinRestraintFunctions:
            natCubicSpline: x=(0 10 30) y=(0 20 70)
          MaxRestraintFunctions:
            natCubicSpline: x=(0 10 30) y=(0 20 70)
        SimmCoordinate hip_flex_l: range=(-11 95)
          MinRestraintFunctions:
            natCubicSpline: x=(0 10 30) y=(0 20 70)
          MaxRestraintFunctions:
            natCubicSpline: x=(0 10 30) y=(0 20 70)
        SimmCoordinate knee_flex_l: range=(-10 120)
          MinRestraintFunctions:
            natCubicSpline: x=(0 10 30) y=(0 20 70)
          MaxRestraintFunctions:
            natCubicSpline: x=(0 10 30) y=(0 20 70)
        SimmCoordinate ankle_flex_l: range=(-30 30)
          MinRestraintFunctions:
            natCubicSpline: x=(0 10 30) y=(0 20 70)
          MaxRestraintFunctions:
            natCubicSpline: x=(0 10 30) y=(0 20 70)
        SimmCoordinate subt_angle_l: range=(-20 20)
          MinRestraintFunctions:
            natCubicSpline: x=(0 10 30) y=(0 20 70)
          MaxRestraintFunctions:
            natCubicSpline: x=(0 10 30) y=(0 20 70)
        SimmCoordinate toe_angle_l: range=(-30 30)
          MinRestraintFunctions:
            natCubicSpline: x=(0 10 30) y=(0 20 70)
          MaxRestraintFunctions:
            natCubicSpline: x=(0 10 30) y=(0 20 70)
      Joints:
        SimmJoint gnd_pelvis: Bodies=(ground pelvis)
          Dofs:
            SimmTranslationDof tx: DOF_coordinate=lower_torso_TX
              Values:
                natCubicSpline: x=(-360 360) y=(-360 360)
            SimmTranslationDof ty: DOF_coordinate=lower_torso_TY
              Values:
                natCubicSpline: x=(-360 360) y=(-360 360)
            SimmTranslationDof tz: DOF_coordinate=lower_torso_TZ
              Values:
                natCubicSpline: x=(-360 360) y=(-360 360)
            SimmRotationDof r1: axis=(1 0 0) DOF_coordinate=lower_torso_RX
              Values:
                natCubicSpline: x=(-360 360) y=(-360 360)
            SimmRotationDof r2: axis=(0 1 0) DOF_coordinate=lower_torso_RY
              Values:
                natCubicSpline: x=(-360 360) y=(-360 360)
            SimmRotationDof r3: axis=(0 0 1) DOF_coordinate=lower_torso_RZ
              Values:
                natCubicSpline: x=(-360 360) y=(-360 360)
        SimmJoint pelvis_torso: Bodies=(pelvis torso)
          Dofs:
            SimmTranslationDof tx:
              Values: Constant(value=-0.0872)
            SimmTranslationDof ty:
              Values: Constant(value=0.0331)
            SimmTranslationDof tz:
              Values: Constant(value=0)
            SimmRotationDof r1: axis=(0 0 1) DOF_coordinate=lumbar_pitch
              Values:
                natCubicSpline: x=(-360 360) y=(-360 360)
            SimmRotationDof r2: axis=(1 0 0) DOF_coordinate=lumbar_roll
              Values:
                natCubicSpline: x=(-360 360) y=(-360 360)
            SimmRotationDof r3: axis=(0 1 0) DOF_coordinate=lumbar_yaw
              Values:
                natCubicSpline: x=(-360 360) y=(-360 360)
        SimmJoint torso_neckhead: Bodies=(torso neckhead)
          Dofs:
            SimmTranslationDof tx:
              Values: Constant(value=-0.0253)
            SimmTranslationDof ty:
              Values: Constant(value=0.44895)
            SimmTranslationDof tz:
              Values: Constant(value=0)
            SimmRotationDof r1: axis=(0 0 1) DOF_coordinate=neck_pitch
              Values:
                natCubicSpline: x=(-360 360) y=(-360 360)
            SimmRotationDof r2: axis=(1 0 0) DOF_coordinate=neck_roll
              Values:
                natCubicSpline: x=(-360 360) y=(-360 360)
            SimmRotationDof r3: axis=(0 1 0) DOF_coordinate=neck_yaw
              Values:
                natCubicSpline: x=(-360 360) y=(-360 360)
        SimmJoint neckhead_OT_head: Bodies=(neckhead OT_head)
          Dofs:
            SimmTranslationDof tx:
              Values: Constant(value=-0.07166)
            SimmTranslationDof ty:
              Values: Constant(value=0.2359)
            SimmTranslationDof tz:
              Values: Constant(value=0)
            SimmRotationDof r1: axis=(0 0 1)
              Values: Constant(value=-90)
            SimmRotationDof r2: axis=(1 0 0)
              Values: Constant(value=0)
            SimmRotationDof r3: axis=(0 1 0)
              Values: Constant(value=0)
        SimmJoint clavicularmarker_r: Bodies=(torso clavicle_marker_r)
          Dofs:
            SimmRotationDof r1: axis=(1 0 0)
              Values: Constant(value=0)
            SimmRotationDof r2: axis=(0 0 1)
              Values: Constant(value=0)
            SimmRotationDof r3: axis=(0 1 0)
              Values: Constant(value=0)
            SimmTranslationDof tx:
              Values: Constant(value=-0.0488)
            SimmTranslationDof ty:
              Values: Constant(value=0.47065)
            SimmTranslationDof tz:
              Values: Constant(value=0)
        SimmJoint acromial_r: Bodies=(torso humerus_r)
          Dofs:
            SimmTranslationDof tx:
              Values: Constant(value=-0.0281)
            SimmTranslationDof ty:
              Values: Constant(value=0.41645)
            SimmTranslationDof tz:
              Values: Constant(value=0.199)
            SimmRotationDof r1: axis=(1 0 0) DOF_coordinate=arm_add_r
              Values:
                natCubicSpline: x=(-360 360) y=(-360 360)
            SimmRotationDof r2: axis=(0 0 1) DOF_coordinate=arm_flex_r
              Values:
                natCubicSpline: x=(-360 360) y=(-360 360)
            SimmRotationDof r3: axis=(0 1 0) DOF_coordinate=arm_rot_r
              Values:
                natCubicSpline: x=(-360 360) y=(-360 360)
        SimmJoint elbowmarker_r: Bodies=(humerus_r elbow_marker_r)
          Dofs:
            SimmTranslationDof tx:
              Values: Constant(value=0)
            SimmTranslationDof ty:
              Values: Constant(value=0)
            SimmTranslationDof tz:
              Values: Constant(value=0)
            SimmRotationDof r1: axis=(0.226047 0.022269 0.973862)
              Values: Constant(value=3)
            SimmRotationDof r2: axis=(0 1 0)
              Values: Constant(value=15)
            SimmRotationDof r3: axis=(1 0 0)
              Values: Constant(value=0)
        SimmJoint elbow_r: Bodies=(humerus_r ulna_r)
          Dofs:
            SimmTranslationDof tx:
              Values: Constant(value=0.013144)
            SimmTranslationDof ty:
              Values: Constant(value=-0.286273)
            SimmTranslationDof tz:
              Values: Constant(value=-0.009595)
            SimmRotationDof r1: axis=(0.226047 0.022269 0.973862) DOF_coordinate=elbow_flex_r
              Values:
                natCubicSpline: x=(-360 360) y=(-360 360)
            SimmRotationDof r2: axis=(0 1 0)
              Values: Constant(value=0)
            SimmRotationDof r3: axis=(1 0 0)
              Values: Constant(value=0)
        SimmJoint radioulnar_r: Bodies=(ulna_r radius_r)
          Dofs:
            SimmTranslationDof tx:
              Values: Constant(value=-0.006727)
            SimmTranslationDof ty:
              Values: Constant(value=-0.013007)
            SimmTranslationDof tz:
              Values: Constant(value=0.026083)
            SimmRotationDof r1: axis=(1 0 0)
              Values: Constant(value=0)
            SimmRotationDof r2: axis=(0.056398 0.998406 0.001952) DOF_coordinate=pro_sup_r
              Values:
                natCubicSpline: x=(-360 360) y=(-360 360)
            SimmRotationDof r3: axis=(0 0 1)
              Values: Constant(value=0)
        SimmJoint wristmarker_r: Bodies=(radius_r wrist_marker_r)
          Dofs:
            SimmTranslationDof tx:
              Values: Constant(value=0.006727)
            SimmTranslationDof ty:
              Values: Constant(value=0.013007)
            SimmTranslationDof tz:
              Values: Constant(value=-0.026083)
            SimmRotationDof r1: axis=(1 0 0)
              Values: Constant(value=-8)
            SimmRotationDof r2: axis=(0 1 0)
              Values: Constant(value=10)
            SimmRotationDof r3: axis=(0 0 1)
              Values: Constant(value=-4)
        SimmJoint radius_hand_r: Bodies=(radius_r hand_r)
          Dofs:
            SimmTranslationDof tx:
              Values: Constant(value=-0.008797)
            SimmTranslationDof ty:
              Values: Constant(value=-0.235841)
            SimmTranslationDof tz:
              Values: Constant(value=0.01361)
            SimmRotationDof r1: axis=(0 0 1) DOF_coordinate=wrist_flex_r
              Values:
                natCubicSpline: x=(-360 360) y=(-360 360)
            SimmRotationDof r2: axis=(0 1 0)
              Values: Constant(value=0)
            SimmRotationDof r3: axis=(1 0 0) DOF_coordinate=wrist_dev_r
              Values:
                natCubicSpline: x=(-360 360) y=(-360 360)
        SimmJoint clavicularmarker_l: Bodies=(torso clavicle_marker_l)
          Dofs:
            SimmRotationDof r1: axis=(1 0 0)
              Values: Constant(value=0)
            SimmRotationDof r2: axis=(0 0 1)
              Values: Constant(value=0)
            SimmRotationDof r3: axis=(0 1 0)
              Values: Constant(value=0)
            SimmTranslationDof tx:
              Values: Constant(value=-0.0488)
            SimmTranslationDof ty:
              Values: Constant(value=0.47065)
            SimmTranslationDof tz:
              Values: Constant(value=0)
        SimmJoint acromial_l: Bodies=(torso humerus_l)
          Dofs:
            SimmTranslationDof tx:
              Values: Constant(value=-0.0281)
            SimmTranslationDof ty:
              Values: Constant(value=0.41645)
            SimmTranslationDof tz:
              Values: Constant(value=-0.199)
            SimmRotationDof r1: axis=(-1 0 0) DOF_coordinate=arm_add_l
              Values:
                natCubicSpline: x=(-360 360) y=(-360 360)
            SimmRotationDof r2: axis=(0 0 1) DOF_coordinate=arm_flex_l
              Values:
                natCubicSpline: x=(-360 360) y=(-360 360)
            SimmRotationDof r3: axis=(0 -1 0) DOF_coordinate=arm_rot_l
              Values:
                natCubicSpline: x=(-360 360) y=(-360 360)
        SimmJoint elbowmarker_l: Bodies=(humerus_l elbow_marker_l)
          Dofs:
            SimmTranslationDof tx:
              Values: Constant(value=0)
            SimmTranslationDof ty:
              Values: Constant(value=0)
            SimmTranslationDof tz:
              Values: Constant(value=0)
            SimmRotationDof r1: axis=(-0.226047 -0.022269 0.973862)
              Values: Constant(value=3)
            SimmRotationDof r2: axis=(0 -1 0)
              Values: Constant(value=-15)
            SimmRotationDof r3: axis=(-1 0 0)
              Values: Constant(value=0)
        SimmJoint elbow_l: Bodies=(humerus_l ulna_l)
          Dofs:
            SimmTranslationDof tx:
              Values: Constant(value=0.013144)
            SimmTranslationDof ty:
              Values: Constant(value=-0.286273)
            SimmTranslationDof tz:
              Values: Constant(value=0.009595)
            SimmRotationDof r1: axis=(-0.226047 -0.022269 0.973862) DOF_coordinate=elbow_flex_l
              Values:
                natCubicSpline: x=(-360 360) y=(-360 360)
            SimmRotationDof r2: axis=(0 -1 0)
              Values: Constant(value=0)
            SimmRotationDof r3: axis=(-1 0 0)
              Values: Constant(value=0)
        SimmJoint radioulnar_l: Bodies=(ulna_l radius_l)
          Dofs:
            SimmTranslationDof tx:
              Values: Constant(value=-0.006727)
            SimmTranslationDof ty:
              Values: Constant(value=-0.013007)
            SimmTranslationDof tz:
              Values: Constant(value=-0.026083)
            SimmRotationDof r1: axis=(-1 0 0)
              Values: Constant(value=0)
            SimmRotationDof r2: axis=(-0.056398 -0.998406 0.001952) DOF_coordinate=pro_sup_l
              Values:
                natCubicSpline: x=(-360 360) y=(-360 360)
            SimmRotationDof r3: axis=(0 0 1)
              Values: Constant(value=0)
        SimmJoint wristmarker_l: Bodies=(radius_l wrist_marker_l)
          Dofs:
            SimmTranslationDof tx:
              Values: Constant(value=0.006727)
            SimmTranslationDof ty:
              Values: Constant(value=0.013007)
            SimmTranslationDof tz:
              Values: Constant(value=0.026083)
            SimmRotationDof r1: axis=(1 0 0)
              Values: Constant(value=8)
            SimmRotationDof r2: axis=(0 1 0)
              Values: Constant(value=-10)
            SimmRotationDof r3: axis=(0 0 1)
              Values: Constant(value=-4)
        SimmJoint radius_hand_l: Bodies=(radius_l hand_l)
          Dofs:
            SimmTranslationDof tx:
              Values: Constant(value=-0.008797)
            SimmTranslationDof ty:
              Values: Constant(value=-0.235841)
            SimmTranslationDof tz:
              Values: Constant(value=-0.01361)
            SimmRotationDof r1: axis=(0 0 1) DOF_coordinate=wrist_flex_l
              Values:
                natCubicSpline: x=(-360 360) y=(-360 360)
            SimmRotationDof r2: axis=(0 -1 0)
              Values: Constant(value=0)
            SimmRotationDof r3: axis=(-1 0 0) DOF_coordinate=wrist_dev_l
              Values:
                natCubicSpline: x=(-360 360) y=(-360 360)
        SimmJoint hip_r: Bodies=(pelvis femur_r)
          Dofs:
            SimmTranslationDof tx:
              Values: Constant(value=-0.08)
            SimmTranslationDof ty:
              Values: Constant(value=-0.0824)
            SimmTranslationDof tz:
              Values: Constant(value=0.0785)
            SimmRotationDof r1: axis=(0 0 1) DOF_coordinate=hip_flex_r
              Values:
                natCubicSpline: x=(-360 360) y=(-360 360)
            SimmRotationDof r2: axis=(1 0 0) DOF_coordinate=hip_add_r
              Values:
                natCubicSpline: x=(-360 360) y=(-360 360)
            SimmRotationDof r3: axis=(0 1 0) DOF_coordinate=hip_rot_r
              Values:
                natCubicSpline: x=(-360 360) y=(-360 360)
        SimmJoint knee_flexion_r: Bodies=(femur_r tibia_r)
          Dofs:
            SimmTranslationDof tx: DOF_coordinate=knee_flex_r
              Values:
                natCubicSpline: x=(0 10 20 40 60 80 100 120)
                    y=(-0.00525 -0.0031 -0.001 0.00212 0.0041 0.00411 0.00179 -0.0032)
            SimmTranslationDof ty: DOF_coordinate=knee_flex_r
              Values:
                natCubicSpline: x=(0 10 20 30 70 120) y=(-0.396 -0.3966 -0.3976 -0.399 -0.4082 -0.4226)
            SimmTranslationDof tz:
              Values: Constant(value=0)
            SimmRotationDof r1: axis=(0 0 -1) DOF_coordinate=knee_flex_r
              Values:
                natCubicSpline: x=(-360 360) y=(-360 360)
            SimmRotationDof r2: axis=(1 0 0)
              Values: Constant(value=0)
            SimmRotationDof r3: axis=(0 1 0)
              Values: Constant(value=0)
        SimmJoint tib_pat_r: Bodies=(tibia_r patella_r)
          Dofs:
            SimmTranslationDof tx: DOF_coordinate=knee_flex_r
              Values:
                natCubicSpline: x=(0 10 20 40 60 80 120) y=(0.0496 0.0484 0.0469 0.043 0.0381 0.0324 0.0173)
            SimmTranslationDof ty: DOF_coordinate=knee_flex_r
              Values:
                natCubicSpline: x=(0.286 10 20 40 60 80 90 120)
                    y=(-0.0227 -0.0223 -0.0219 -0.0211 -0.0204 -0.02 -0.0202 -0.0219)
            SimmTranslationDof tz:
              Values: Constant(value=0.0024)
            SimmRotationDof r1: axis=(0 0 1) DOF_coordinate=knee_flex_r
              Values:
                natCubicSpline: x=(-10 -0.15 20.34 56.43 114.59 120) y=(-9.24 -2.44 6.09 13.86 17.65 17.65)
            SimmRotationDof r2: axis=(1 0 0)
              Values: Constant(value=0)
            SimmRotationDof r3: axis=(0 1 0)
              Values: Constant(value=0)
        SimmJoint ankle_r: Bodies=(tibia_r talus_r)
          Dofs:
            SimmTranslationDof tx:
              Values: Constant(value=0)
            SimmTranslationDof ty:
              Values: Constant(value=-0.426)
            SimmTranslationDof tz:
              Values: Constant(value=0)
            SimmRotationDof r1: axis=(-0.104529 -0.173649 0.979244) DOF_coordinate=ankle_flex_r
              Values:
                natCubicSpline: x=(-360 360) y=(-360 360)
            SimmRotationDof r2: axis=(1 0 0)
              Values: Constant(value=0)
            SimmRotationDof r3: axis=(0 1 0)
              Values: Constant(value=0)
        SimmJoint subtalar_r: Bodies=(talus_r foot_r)
          Dofs:
            SimmTranslationDof tx:
              Values: Constant(value=-0.04877)
            SimmTranslationDof ty:
              Values: Constant(value=-0.04195)
            SimmTranslationDof tz:
              Values: Constant(value=0.00792)
            SimmRotationDof r1: axis=(0.78718 0.604747 -0.120949) DOF_coordinate=subt_angle_r
              Values:
                natCubicSpline: x=(-360 360) y=(-360 360)
            SimmRotationDof r2: axis=(0 1 0)
              Values: Constant(value=0)
            SimmRotationDof r3: axis=(0 0 1)
              Values: Constant(value=0)
        SimmJoint foot_mark_r: Bodies=(foot_r foot_marker_r)
          Dofs:
            SimmTranslationDof tx:
              Values: Constant(value=-0.02)
            SimmTranslationDof ty:
              Values: Constant(value=0.018)
            SimmTranslationDof tz:
              Values: Constant(value=-0.01)
            SimmRotationDof r1: axis=(1 0 0)
              Values: Constant(value=0)
            SimmRotationDof r2: axis=(0 1 0)
              Values: Constant(value=0)
            SimmRotationDof r3: axis=(0 0 1)
              Values: Constant(value=0)
        SimmJoint toes_r: Bodies=(foot_r toes_r)
          Dofs:
            SimmTranslationDof tx:
              Values: Constant(value=0.1768)
            SimmTranslationDof ty:
              Values: Constant(value=-0.002)
            SimmTranslationDof tz:
              Values: Constant(value=0.00108)
            SimmRotationDof r1: axis=(0.541717 0 -0.840561) DOF_coordinate=toe_angle_r
              Values:
                natCubicSpline: x=(-360 360) y=(-360 360)
            SimmRotationDof r2: axis=(0 1 0)
              Values: Constant(value=0)
            SimmRotationDof r3: axis=(0 0 1)
              Values: Constant(value=0)
        SimmJoint hip_l: Bodies=(pelvis femur_l)
          Dofs:
            SimmTranslationDof tx:
              Values: Constant(value=-0.08)
            SimmTranslationDof ty:
              Values: Constant(value=-0.0824)
            SimmTranslationDof tz:
              Values: Constant(value=-0.0785)
            SimmRotationDof r1: axis=(0 0 1) DOF_coordinate=hip_flex_l
              Values:
                natCubicSpline: x=(-360 360) y=(-360 360)
            SimmRotationDof r2: axis=(-1 0 0) DOF_coordinate=hip_add_l
              Values:
                natCubicSpline: x=(-360 360) y=(-360 360)
            SimmRotationDof r3: axis=(0 -1 0) DOF_coordinate=hip_rot_l
              Values:
                natCubicSpline: x=(-360 360) y=(-360 360)
        SimmJoint knee_flexion_l: Bodies=(femur_l tibia_l)
          Dofs:
            SimmTranslationDof tx: DOF_coordinate=knee_flex_l
              Values:
                natCubicSpline: x=(0 10 20 40 60 80 100 120)
                    y=(-0.00525 -0.0031 -0.001 0.00212 0.0041 0.00411 0.00179 -0.0032)
            SimmTranslationDof ty: DOF_coordinate=knee_flex_l
              Values:
                natCubicSpline: x=(0 10 20 30 70 120) y=(-0.396 -0.3966 -0.3976 -0.399 -0.4082 -0.4226)
            SimmTranslationDof tz:
              Values: Constant(value=0)
            SimmRotationDof r1: axis=(0 0 -1) DOF_coordinate=knee_flex_l
              Values:
                natCubicSpline: x=(-360 360) y=(-360 360)
            SimmRotationDof r2: axis=(1 0 0)
              Values: Constant(value=0)
            SimmRotationDof r3: axis=(0 1 0)
              Values: Constant(value=0)
        SimmJoint tib_pat_l: Bodies=(tibia_l patella_l)
          Dofs:
            SimmTranslationDof tx: DOF_coordinate=knee_flex_l
              Values:
                natCubicSpline: x=(0 10 20 40 60 80 120) y=(0.0496 0.0484 0.0469 0.043 0.0381 0.0324 0.0173)
            SimmTranslationDof ty: DOF_coordinate=knee_flex_l
              Values:
                natCubicSpline: x=(0.286 10 20 40 60 80 90 120)
                    y=(-0.0227 -0.0223 -0.0219 -0.0211 -0.0204 -0.02 -0.0202 -0.0219)
            SimmTranslationDof tz:
              Values: Constant(value=-0.0024)
            SimmRotationDof r1: axis=(0 0 1) DOF_coordinate=knee_flex_l
              Values:
                natCubicSpline: x=(-10 -0.15 20.34 56.43 114.59 120) y=(-9.24 -2.44 6.09 13.86 17.65 17.65)
            SimmRotationDof r2: axis=(-1 0 0)
              Values: Constant(value=0)
            SimmRotationDof r3: axis=(0 -1 0)
              Values: Constant(value=0)
        SimmJoint ankle_l: Bodies=(tibia_l talus_l)
          Dofs:
            SimmTranslationDof tx:
              Values: Constant(value=0)
            SimmTranslationDof ty:
              Values: Constant(value=-0.426)
            SimmTranslationDof tz:
              Values: Constant(value=0)
            SimmRotationDof r1: axis=(0.104529 0.173649 0.979244) DOF_coordinate=ankle_flex_l
              Values:
                natCubicSpline: x=(-360 360) y=(-360 360)
            SimmRotationDof r2: axis=(-1 0 0)
              Values: Constant(value=0)
            SimmRotationDof r3: axis=(0 -1 0)
              Values: Constant(value=0)
        SimmJoint subtalar_l: Bodies=(talus_l foot_l)
          Dofs:
            SimmTranslationDof tx:
              Values: Constant(value=-0.04877)
            SimmTranslationDof ty:
              Values: Constant(value=-0.04195)
            SimmTranslationDof tz:
              Values: Constant(value=-0.00792)
            SimmRotationDof r1: axis=(-0.78718 -0.604747 -0.120949) DOF_coordinate=subt_angle_l
              Values:
                natCubicSpline: x=(-360 360) y=(-360 360)
            SimmRotationDof r2: axis=(0 -1 0)
              Values: Constant(value=0)
            SimmRotationDof r3: axis=(0 0 1)
              Values: Constant(value=0)
        SimmJoint foot_mark_l: Bodies=(foot_l foot_marker_l)
          Dofs:
            SimmTranslationDof tx:
              Values: Constant(value=-0.02)
            SimmTranslationDof ty:
              Values: Constant(value=0.018)
            SimmTranslationDof tz:
              Values: Constant(value=0.01)
            SimmRotationDof r1: axis=(1 0 0)
              Values: Constant(value=0)
            SimmRotationDof r2: axis=(0 1 0)
              Values: Constant(value=0)
            SimmRotationDof r3: axis=(0 0 1)
              Values: Constant(value=0)
        SimmJoint toes_l: Bodies=(foot_l toes_l)
          Dofs:
            SimmTranslationDof tx:
              Values: Constant(value=0.1768)
            SimmTranslationDof ty:
              Values: Constant(value=-0.002)
            SimmTranslationDof tz:
              Values: Constant(value=-0.00108)
            SimmRotationDof r1: axis=(-0.541717 0 -0.840561) DOF_coordinate=toe_angle_l
              Values:
                natCubicSpline: x=(-360 360) y=(-360 360)
            SimmRotationDof r2: axis=(0 1 0)
              Values: Constant(value=0)
            SimmRotationDof r3: axis=(0 0 1)
              Values: Constant(value=0)
