# OpenSim document version 40000
SerializableObject TestObject:
  Test_Bool: true
  Test_Int: 0
  Test_Infinity: Inf
  Test_MinusInfinity: -Inf
  Test_Dbl: 1.23456
  Test_Str: ABC
  Test_IntArray: 0 1 2 3
  Test_DblArray: 0 1 2 3
  Test_StrArray: abc def ghi jkl
  MyTransformProperty: 2 1 0.5 3 2 1
  Test_DblVec3: 3 5 7
  SerializableObject2 Test_Obj
  Test_ObjArray:
    SerializableObject2 Obj1
    SerializableObjectBad Obj2
    SerializableObject2 Obj3
  SerializableObject2
