# OpenSim document version 20303
SerializableObject TestObject:
  Test_Bool: true
  Test_Int: 0
  Test_Dbl: 1.23456
  Test_Str: ABC
  Test_IntArray: 0 1 2 3
  Test_DblArray: 0 1 2 3
  Test_StrArray: abc def ghi jkl
  MyTransformProperty: 2 1 0.5 3 2 1
  defaults: SerializableObject2 default: Test_DblArray2=(7 8 9) Test_Bool2=true
  SerializableObject2 Test_Obj: Test_Bool2=false Test_DblArray2=(0.1 0.1 0.1)
  Test_ObjArray:
    SerializableObject2 Obj1: Test_Bool2=false Test_DblArray2=(0.1 0.1 0.1)
    SerializableObject2 Obj2
    SerializableObject2 Obj3: Test_Bool2=false Test_DblArray2=(0.1 0.1 0.1)
