# OpenSim document version 10600
Model 3DGaitModel2354:
  credits:
    Delp S.L., Loan J.P., Hoy M.G., Zajac F.E., Topp E.L., Rosen J.M., Thelen D.G., Anderson F.C., Seth A.
  publications:
    Notes: 3D, 23 DOF gait model created by D.G. Thelen, Univ. of Wisconsin-Madison, and Ajay Seth, Frank C. Anderson, and Scott L. Delp, Stanford University. Lower extremity joint defintions based on Delp et al. (1990). Low back joint and anthropometry based on Anderson and Pandy (1999, 2001). Planar knee model of Yamaguchi and Zajac (1989). Seth removed the patella to avoid kinematic constraints; insertions of the quadrucepts are handled with moving points in the tibia frame. Number of muscles was reduced by Anderson to improve simulation speed for demonstrations and is not intended to be used in research.
    Delp, S.L., Loan, J.P., Hoy, M.G., Zajac, F.E., Topp E.L., Rosen, J.M.: An interactive graphics-based model of the lower extremity to study orthopaedic surgical procedures, IEEE Transactions on Biomedical Engineering, vol. 37, pp. 757-767, 1990.
    Yamaguchi G.T., Zajac F.E.: A planar model of the knee joint to characterize the knee extensor mechanism." J . Biomecl7. vol. 21. pp. 1-10. 1989.
    Anderson F.C., Pandy M.G.: A dynamic optimization solution for vertical jumping in three dimensions. Computer Methods in Biomechanics and Biomedical Engineering 2:201-231, 1999.
    Anderson F.C., Pandy M.G.: Dynamic optimization of human walking. Journal of Biomechanical Engineering 123:381-390, 2001.
  DynamicsEngine:
    SimbodyEngine default: gravity=(0 -9.807 0)
      BodySet:
        Body ground: mass=0 mass_center=(0 0 0) inertia_xx=0 inertia_yy=0 inertia_zz=0 meshes=treadmill.vtp
        Body pelvis: mass=11.777 mass_center=(-0.071 0 0) inertia_xx=0.103 inertia_yy=0.087 inertia_zz=0.058
            meshes=(sacrum.vtp pelvis.vtp l_pelvis.vtp)
          CustomJoint ground_pelvis: parent_body=ground location_in_parent=(0 0 0) location=(0 0 0)
            Coordinate pelvis_tx: default_value=0.1 initial_value=0 tolerance=0 stiffness=0 range=(-5 5) keys=p_key
                clamped=true restraint_active=false
            Coordinate pelvis_ty: default_value=0.935 initial_value=0 tolerance=0 stiffness=0 range=(-1 2) keys=q_key
                clamped=true restraint_active=false
            Coordinate pelvis_tz: default_value=0 initial_value=0 tolerance=0 stiffness=0 range=(-3 3) keys=q_key
                clamped=true restraint_active=false
            Coordinate pelvis_tilt: default_value=0 initial_value=0 tolerance=0 stiffness=0 range=(-1.571 1.571)
                keys=q_key clamped=true restraint_active=false
            Coordinate pelvis_list: default_value=0 initial_value=0 tolerance=0 stiffness=0 range=(-1.571 1.571)
                keys=q_key clamped=true restraint_active=false
            Coordinate pelvis_rotation: default_value=0 initial_value=0 tolerance=0 stiffness=0 range=(-1.571 1.571)
                keys=q_key clamped=true restraint_active=false
            TransformAxis tx: coordinate=pelvis_tx is_rotation=false axis=(1 0 0)
            TransformAxis ty: coordinate=pelvis_ty is_rotation=false axis=(0 1 0)
            TransformAxis tz: coordinate=pelvis_tz is_rotation=false axis=(0 0 1)
            TransformAxis r1: coordinate=pelvis_tilt axis=(0 0 1)
            TransformAxis r2: coordinate=pelvis_list axis=(1 0 0)
            TransformAxis r3: coordinate=pelvis_rotation axis=(0 1 0)
        Body femur_r: mass=9.301 mass_center=(0 -0.17 0) inertia_xx=0.134 inertia_yy=0.035 inertia_zz=0.141
            meshes=femur.vtp
          CustomJoint hip_r: parent_body=pelvis location_in_parent=(-0.071 -0.066 0.084) location=(0 0 0)
            Coordinate hip_flexion_r: default_value=0 initial_value=0 tolerance=0 stiffness=0 range=(-2.094 2.094)
                keys=(h_key leftmouse_button) clamped=true restraint_active=false
            Coordinate hip_adduction_r: default_value=0 initial_value=0 tolerance=0 stiffness=0 range=(-2.094 2.094)
                keys=(h_key leftmouse_button) clamped=true restraint_active=false
            Coordinate hip_rotation_r: default_value=0 initial_value=0 tolerance=0 stiffness=0 range=(-2.094 2.094)
                keys=(h_key leftmouse_button) clamped=true restraint_active=false
            TransformAxis r1: coordinate=hip_flexion_r axis=(0 0 1)
            TransformAxis r2: coordinate=hip_adduction_r axis=(1 0 0)
            TransformAxis r3: coordinate=hip_rotation_r axis=(0 1 0)
        Body tibia_r: mass=3.708 mass_center=(0 -0.187 0) inertia_xx=0.05 inertia_yy=0.005 inertia_zz=0.051
            meshes=(tibia.vtp fibula.vtp)
          CustomJoint knee_r: parent_body=femur_r location_in_parent=(0 0 0) location=(0 0 0)
            Coordinate knee_angle_r: default_value=0 initial_value=0 tolerance=0 stiffness=0 range=(-2.094 0.175)
                keys=k_key clamped=true restraint_active=false
            Coordinate tib_tx_r: default_value=0 initial_value=0 tolerance=0 stiffness=0 range=(-5 5) clamped=false
                restraint_active=false
            Coordinate tib_ty_r: default_value=0 initial_value=0 tolerance=0 stiffness=0 range=(-1 2) clamped=false
                restraint_active=false
            TransformAxis r1: coordinate=knee_angle_r axis=(0 0 1)
            TransformAxis tx: coordinate=tib_tx_r is_rotation=false axis=(1 0 0)
            TransformAxis ty: coordinate=tib_ty_r is_rotation=false axis=(0 1 0)
        Body patella_r: mass=0.1 mass_center=(0 0 0) inertia_xx=0.001 inertia_yy=0.001 inertia_zz=0.001 index=3
            meshes=pat.vtp
          CustomJoint tib_pat_r: parent_body=tibia_r location_in_parent=(0 0 0) location=(0 0 0)
            Coordinate pat_angle_r: default_value=-0.00116917 initial_value=-0.00116917 tolerance=0 stiffness=0
                range=(-2.094 0.175) clamped=true restraint_active=false
            Coordinate pat_tx_r: default_value=0.0496 initial_value=0.0496 tolerance=0 stiffness=0 range=(-5 5)
                clamped=false restraint_active=false
            Coordinate pat_ty_r: default_value=-0.0227 initial_value=-0.0227 tolerance=0 stiffness=0 range=(-5 5)
                clamped=false restraint_active=false
            TransformAxis r1: coordinate=pat_angle_r axis=(0 0 1)
            TransformAxis tx: coordinate=pat_tx_r is_rotation=false axis=(1 0 0)
            TransformAxis ty: coordinate=pat_ty_r is_rotation=false axis=(0 1 0)
        Body talus_r: mass=0.1 mass_center=(0 0 0) inertia_xx=0.001 inertia_yy=0.001 inertia_zz=0.001 meshes=talus.vtp
          CustomJoint ankle_r: parent_body=tibia_r location_in_parent=(0 -0.43 0) location=(0 0 0)
            Coordinate ankle_angle_r: default_value=0 initial_value=0 tolerance=0 stiffness=0 range=(-1.571 1.571)
                keys=a_key clamped=true restraint_active=false
            TransformAxis r1: coordinate=ankle_angle_r axis=(-0.105 -0.174 0.979)
        Body calcn_r: mass=1.25 mass_center=(0.1 0.03 0) inertia_xx=0.001 inertia_yy=0.004 inertia_zz=0.004
            meshes=foot.vtp
          CustomJoint subtalar_r: parent_body=talus_r location_in_parent=(-0.049 -0.042 0.008) location=(0 0 0)
            Coordinate subtalar_angle_r: default_value=0 initial_value=0 tolerance=0 stiffness=0 range=(-1.571 1.571)
                keys=a_key clamped=true restraint_active=false
            TransformAxis r1: coordinate=subtalar_angle_r axis=(0.787 0.605 -0.121)
        Body toes_r: mass=0.217 mass_center=(0.035 0.006 -0.018) inertia_xx=0 inertia_yy=0 inertia_zz=0.001
            meshes=bofoot.vtp
          CustomJoint mtp_r: parent_body=calcn_r location_in_parent=(0.179 -0.002 0.001) location=(0 0 0)
            Coordinate mtp_angle_r: default_value=0 initial_value=0 tolerance=0 stiffness=0 range=(-1.571 1.571)
                keys=t_key clamped=true restraint_active=false
            TransformAxis r1: coordinate=mtp_angle_r axis=(-0.581 0 0.814)
        Body femur_l: mass=9.301 mass_center=(0 -0.17 0) inertia_xx=0.134 inertia_yy=0.035 inertia_zz=0.141
            meshes=l_femur.vtp
          CustomJoint hip_l: parent_body=pelvis location_in_parent=(-0.071 -0.066 -0.084) location=(0 0 0)
            Coordinate hip_flexion_l: default_value=0 initial_value=0 tolerance=0 stiffness=0 range=(-2.094 2.094)
                keys=(h_key leftmouse_button) clamped=true restraint_active=false
            Coordinate hip_adduction_l: default_value=0 initial_value=0 tolerance=0 stiffness=0 range=(-2.094 2.094)
                keys=(h_key leftmouse_button) clamped=true restraint_active=false
            Coordinate hip_rotation_l: default_value=0 initial_value=0 tolerance=0 stiffness=0 range=(-2.094 2.094)
                keys=(h_key leftmouse_button) clamped=true restraint_active=false
            TransformAxis r1: coordinate=hip_flexion_l axis=(0 0 1)
            TransformAxis r2: coordinate=hip_adduction_l axis=(-1 0 0)
            TransformAxis r3: coordinate=hip_rotation_l axis=(0 -1 0)
        Body tibia_l: mass=3.708 mass_center=(0 -0.187 0) inertia_xx=0.05 inertia_yy=0.005 inertia_zz=0.051
            meshes=(l_tibia.vtp l_fibula.vtp)
          CustomJoint knee_l: parent_body=femur_l location_in_parent=(0 0 0) location=(0 0 0)
            Coordinate knee_angle_l: default_value=0 initial_value=0 tolerance=0 stiffness=0 range=(-2.094 0.175)
                keys=k_key clamped=true restraint_active=false
            TransformAxis tx: coordinate=knee_angle_l is_rotation=false axis=(1 0 0)
              natCubicSpline: min_x=-1000000000000000000000000000000 max_x=1000000000000000000000000000000
                  min_y=-1000000000000000000000000000000 max_y=1000000000000000000000000000000
                  min_z=-1000000000000000000000000000000 max_z=1000000000000000000000000000000
                  x=(-2.094395 -1.745329 -1.396263 -1.047198 -0.6981317 -0.3490659 -0.1745329 0.1973442 0.337395 0.4901776 1.52146 2.094395)
                  y=(-0.0032 0.00179 0.00411 0.0041 0.00212 -0.001 -0.0031 -0.005227 -0.005435 -0.005574 -0.005435 -0.00525)
            TransformAxis ty: coordinate=knee_angle_l is_rotation=false axis=(0 1 0)
              natCubicSpline: min_x=-1000000000000000000000000000000 max_x=1000000000000000000000000000000
                  min_y=-1000000000000000000000000000000 max_y=1000000000000000000000000000000
                  min_z=-1000000000000000000000000000000 max_z=1000000000000000000000000000000
                  x=(-2.094395 -1.22173 -0.5235988 -0.3490659 -0.1745329 0.1591486 2.094395)
                  y=(-0.4226 -0.4082 -0.399 -0.3976 -0.3966 -0.395264 -0.396)
            TransformAxis r1: coordinate=knee_angle_l axis=(0 0 1)
        Body patella_l: mass=0.1 mass_center=(0 0 0) inertia_xx=0.001 inertia_yy=0.001 inertia_zz=0.001 index=3
            meshes=l_patella.vtp
          CustomJoint tib_pat_l: parent_body=tibia_l location_in_parent=(0 0 0) location=(0 0 0)
            Coordinate pat_angle_l: default_value=-0.00116917 initial_value=-0.00116917 tolerance=0 stiffness=0
                range=(-2.094 0.175) clamped=true restraint_active=false
            Coordinate pat_tx_l: default_value=0.0496 initial_value=0.0496 tolerance=0 stiffness=0 range=(-5 5)
                clamped=false restraint_active=false
            Coordinate pat_ty_l: default_value=-0.0227 initial_value=-0.0227 tolerance=0 stiffness=0 range=(-5 5)
                clamped=false restraint_active=false
            TransformAxis r1: coordinate=pat_angle_l axis=(0 0 1)
            TransformAxis tx: coordinate=pat_tx_l is_rotation=false axis=(1 0 0)
            TransformAxis ty: coordinate=pat_ty_l is_rotation=false axis=(0 1 0)
        Body talus_l: mass=0.1 mass_center=(0 0 0) inertia_xx=0.001 inertia_yy=0.001 inertia_zz=0.001
            meshes=l_talus.vtp
          CustomJoint ankle_l: parent_body=tibia_l location_in_parent=(0 -0.43 0) location=(0 0 0)
            Coordinate ankle_angle_l: default_value=0 initial_value=0 tolerance=0 stiffness=0 range=(-1.047 1.047)
                keys=a_key clamped=true restraint_active=false
            TransformAxis r1: coordinate=ankle_angle_l axis=(0.105 -0.174 0.979)
        Body calcn_l: mass=1.25 mass_center=(0.1 0.03 0) inertia_xx=0.001 inertia_yy=0.004 inertia_zz=0.004
            meshes=l_foot.vtp
          CustomJoint subtalar_l: parent_body=talus_l location_in_parent=(-0.049 -0.042 -0.008) location=(0 0 0)
            Coordinate subtalar_angle_l: default_value=0 initial_value=0 tolerance=0 stiffness=0 range=(-1.571 1.571)
                keys=a_key clamped=true restraint_active=false
            TransformAxis r1: coordinate=subtalar_angle_l axis=(-0.787 -0.605 -0.121)
        Body toes_l: mass=0.217 mass_center=(0.035 0.006 0.018) inertia_xx=0 inertia_yy=0 inertia_zz=0.001
            meshes=l_bofoot.vtp
          CustomJoint mtp_l: parent_body=calcn_l location_in_parent=(0.179 -0.002 -0.001) location=(0 0 0)
            Coordinate mtp_angle_l: default_value=0 initial_value=0 tolerance=0 stiffness=0 range=(-1.047 1.047)
                keys=t_key clamped=true restraint_active=false
            TransformAxis r1: coordinate=mtp_angle_l axis=(0.581 0 0.814)
        Body torso: mass=34.237 mass_center=(-0.03 0.32 0) inertia_xx=1.474 inertia_yy=0.755 inertia_zz=1.431
            meshes=(hat_spine.vtp hat_jaw.vtp hat_skull.vtp hat_ribs.vtp)
          CustomJoint back: parent_body=pelvis location_in_parent=(-0.101 0.082 0) location=(0 0 0)
            Coordinate lumbar_extension: default_value=0 initial_value=0 tolerance=0 stiffness=0 range=(-1.571 1.571)
                keys=q_key clamped=true restraint_active=false
            Coordinate lumbar_bending: default_value=0 initial_value=0 tolerance=0 stiffness=0 range=(-1.571 1.571)
                keys=q_key clamped=true restraint_active=false
            Coordinate lumbar_rotation: default_value=0 initial_value=0 tolerance=0 stiffness=0 range=(-1.571 1.571)
                keys=q_key clamped=true restraint_active=false
            TransformAxis r1: coordinate=lumbar_extension axis=(0 0 1)
            TransformAxis r2: coordinate=lumbar_bending axis=(1 0 0)
            TransformAxis r3: coordinate=lumbar_rotation axis=(0 1 0)
      ConstraintSet:
        CoordinateCouplerConstraint knee_tx_r: independent_coordinate_names=knee_angle_r
            dependent_coordinate_name=tib_tx_r
          coupled_coordinates_function: natCubicSpline: x=(-2.094395 -1.745329 -1.396263 -1.047198 -0.6981317 -0.3490659 -0.1745329 0.1973442 0.337395 0.4901776 1.52146 2.094395)
              y=(-0.0032 0.00179 0.00411 0.0041 0.00212 -0.001 -0.0031 -0.005227 -0.005435 -0.005574 -0.005435 -0.00525)
        CoordinateCouplerConstraint knee_ty_r: independent_coordinate_names=knee_angle_r
            dependent_coordinate_name=tib_ty_r
          coupled_coordinates_function: natCubicSpline: x=(-2.094395 -1.22173 -0.5235988 -0.3490659 -0.1745329 0.1591486 2.094395)
              y=(-0.4226 -0.4082 -0.399 -0.3976 -0.3966 -0.395264 -0.396)
        CoordinateCouplerConstraint pat_tx_r: independent_coordinate_names=knee_angle_r
            dependent_coordinate_name=pat_tx_r
          coupled_coordinates_function: natCubicSpline: x=(-2.094395 -1.396263 -1.047198 -0.6981317 -0.3490659 -0.1745329 0 0.00017453 0.00034907 0.08726646 2.094395)
              y=(0.0173 0.0324 0.0381 0.043 0.0469 0.0484 0.0496 0.0496 0.0496 0.0496 0.0496)
        CoordinateCouplerConstraint pat_ty_r: independent_coordinate_names=knee_angle_r
            dependent_coordinate_name=pat_ty_r
          coupled_coordinates_function: natCubicSpline: x=(-2.094395 -1.570796 -1.396263 -1.047198 -0.6981317 -0.3490659 -0.1745329 0 0.00017453 0.00034907 0.08726646 2.094395)
              y=(-0.0219 -0.0202 -0.02 -0.0204 -0.0211 -0.0219 -0.0223 -0.0227 -0.0227 -0.0227 -0.0227 -0.0227)
        CoordinateCouplerConstraint pat_angle_r: independent_coordinate_names=knee_angle_r
            dependent_coordinate_name=pat_angle_r
          coupled_coordinates_function: natCubicSpline: x=(-2.094395 -1.999973 -1.457524 -0.5263913 0.02792527 0.1745329)
              y=(0.3080506 0.3080506 0.3063053 0.270177 -0.03700098 -0.2799508)
        CoordinateCouplerConstraint pat_tx_l: independent_coordinate_names=knee_angle_l
            dependent_coordinate_name=pat_tx_l
          coupled_coordinates_function: natCubicSpline: x=(-2.094395 -1.396263 -1.047198 -0.6981317 -0.3490659 -0.1745329 0 0.00017453 0.00034907 0.08726646 2.094395)
              y=(0.0173 0.0324 0.0381 0.043 0.0469 0.0484 0.0496 0.0496 0.0496 0.0496 0.0496)
        CoordinateCouplerConstraint pat_ty_l: independent_coordinate_names=knee_angle_l
            dependent_coordinate_name=pat_ty_l
          coupled_coordinates_function: natCubicSpline: x=(-2.094395 -1.570796 -1.396263 -1.047198 -0.6981317 -0.3490659 -0.1745329 0 0.00017453 0.00034907 0.08726646 2.094395)
              y=(-0.0219 -0.0202 -0.02 -0.0204 -0.0211 -0.0219 -0.0223 -0.0227 -0.0227 -0.0227 -0.0227 -0.0227)
        CoordinateCouplerConstraint pat_angle_l: independent_coordinate_names=knee_angle_l
            dependent_coordinate_name=pat_angle_l
          coupled_coordinates_function: natCubicSpline: x=(-2.094395 -1.999973 -1.457524 -0.5263913 0.02792527 0.1745329)
              y=(0.3080506 0.3080506 0.3063053 0.270177 -0.03700098 -0.2799508)
        WeldConstraint: body_1=ground body_2=calcn_r location_body_1=(0 0 0.084) orientation_body_1=(0 0 0)
            location_body_2=(0 0 0) orientation_body_2=(0 0 0)
  ActuatorSet:
    ObjectGroup R_hip_abd: members=(glut_max1_r glut_med1_r glut_med2_r glut_med3_r peri_r sar_r tfl_r)
    ObjectGroup R_hip_flex: members=(glut_med1_r grac_r iliacus_r pect_r psoas_r rect_fem_r sar_r tfl_r)
    ObjectGroup R_hip_inrot: members=(glut_med1_r iliacus_r psoas_r tfl_r)
    ObjectGroup R_hip_exrot: members=(gem_r glut_med3_r peri_r quad_fem_r)
    ObjectGroup R_hip_ext: members=(add_mag2_r bifemlh_r glut_max1_r glut_max2_r glut_max3_r glut_med3_r)
    ObjectGroup R_hip_add: members=(add_mag2_r bifemlh_r grac_r pect_r)
    ObjectGroup R_knee_bend: members=(bifemlh_r bifemsh_r grac_r med_gas_r sar_r)
    ObjectGroup R_knee_ext: members=(rect_fem_r vas_int_r)
    ObjectGroup R_ankle_pf: members=(med_gas_r soleus_r tib_post_r)
    ObjectGroup R_inverter: members=(tib_ant_r tib_post_r)
    ObjectGroup R_ankle_df: members=tib_ant_r
    ObjectGroup L_hip_abd: members=(glut_max1_l glut_med1_l glut_med2_l glut_med3_l peri_l sar_l tfl_l)
    ObjectGroup L_hip_flex: members=(glut_med1_l grac_l iliacus_l pect_l psoas_l rect_fem_l sar_l tfl_l)
    ObjectGroup L_hip_inrot: members=(glut_med1_l iliacus_l psoas_l tfl_l)
    ObjectGroup L_hip_exrot: members=(gem_l glut_med3_l peri_l quad_fem_l)
    ObjectGroup L_hip_ext: members=(add_mag2_l bifemlh_l glut_max1_l glut_max2_l glut_max3_l glut_med3_l)
    ObjectGroup L_hip_add: members=(add_mag2_l bifemlh_l grac_l pect_l)
    ObjectGroup L_knee_bend: members=(bifemlh_l bifemsh_l grac_l med_gas_l sar_l)
    ObjectGroup L_knee_ext: members=(rect_fem_l vas_int_l)
    ObjectGroup L_ankle_pf: members=(med_gas_l soleus_l tib_post_l)
    ObjectGroup L_inverter: members=(tib_ant_l tib_post_l)
    ObjectGroup L_ankle_df: members=tib_ant_l
    ObjectGroup back_ext: members=(ercspn_l ercspn_r)
    ObjectGroup back_rlb: members=(ercspn_r extobl_r intobl_r)
    ObjectGroup back_introt: members=(ercspn_r extobl_l intobl_r)
    ObjectGroup back_llb: members=(ercspn_l extobl_l intobl_l)
    ObjectGroup back_extrot: members=(ercspn_l extobl_r intobl_l)
    ObjectGroup back_flex: members=(extobl_l extobl_r intobl_l intobl_r)
