Model:
  DynamicsEngine:
    SimbodyEngine: gravity=(0 -10 0)
      BodySet:
        SimbodyBody ground: mass=0 mass_center=(0 0 0) inertia=(0 0 0 0 0 0 0 0 0)
        SimbodyBody Pendulum: mass=2 mass_center=(0 -0.5 0) inertia=(1 0 0 0 1 0 0 0 1)
        SimbodyBody Pendulum2: mass=2 mass_center=(0 -0.5 0) inertia=(1 0 0 0 1 0 0 0 1)
      JointSet:
        SimbodyJoint ground_Pendulum: bodies=(ground Pendulum) location_in_parent=(0 0 0) location_in_child=(0 0.5 0)
          DofSet:
            SimbodyRotationDof r1: coordinate=PendulumAxis axis=(1 1 1)
              Value
        SimbodyJoint Pendulum_Pendulum2: bodies=(Pendulum Pendulum2) location_in_parent=(0 0 0)
            location_in_child=(0 0.5 0)
          DofSet:
            SimbodyRotationDof r1: coordinate=Pendulum2Axis axis=(0 0 1)
              Value
      SimbodyCoordinate PendulumAxis: default_value=0 initial_value=0 tolerance=0.00000001 stiffness=0
          range=(-999999.9 999999.9) clamped=true restraint_active=true
      SimbodyCoordinate Pendulum2Axis: default_value=0 initial_value=0 tolerance=0.00000001 stiffness=0
          range=(-999999.9 999999.9) clamped=true restraint_active=true
      SpeedSet:
        SimbodySpeed PendulumAxis_u: default_value=0 coordinate=PendulumAxis
        SimbodySpeed Pendulum2Axis_u: default_value=0 coordinate=PendulumAxis
