# OpenSim document version 10905
Model osimModel:
  gravity: 0 -9.80665 0
  ForceSet:
    PistonActuator piston: bodyA=linkage1 bodyB=block points_are_global=false pointA=(0 0 0) pointB=(0 0 0)
        optimal_force=200
    ControllableSpring spring: bodyA=block bodyB=linkage1 points_are_global=false pointA=(0 0 0) pointB=(0 0 0)
        optimal_force=2000 rest_length=0.8
  BodySet:
    Body ground: mass=0 mass_center=(0 0 0) inertia_xx=1 inertia_yy=1 inertia_zz=1 meshes=ground.vtp
    Body linkage1: mass=0.001 mass_center=(0 -0.25 0) inertia_xx=0.00008333 inertia_yy=0 inertia_zz=0.00008333
        meshes=linkage1.vtp
      PinJoint ankle: parent_body=ground location_in_parent=(0 0 0) location=(0 0 0)
        Coordinate q1: motion_type=rotational default_value=-0.1586489 initial_value=0 range=(-6.283185 6.283185)
            clamped=false
    Body linkage2: mass=0.001 mass_center=(0 -0.25 0) inertia_xx=0.00008333 inertia_yy=0 inertia_zz=0.00008333
        meshes=linkage1.vtp
      PinJoint knee: parent_body=linkage1 location_in_parent=(0 0.5 0) location=(0 0 0)
        Coordinate q2: motion_type=rotational default_value=1.530868 initial_value=0 range=(-6.283185 6.283185)
            clamped=false
    Body block: mass=20 mass_center=(0 0 0) inertia_xx=0.5333333 inertia_yy=0.5333333 inertia_zz=0.5333333
        meshes=big_block_centered.vtp
      PinJoint hip: parent_body=linkage2 location_in_parent=(0 0.5 0) location=(0 0 0)
        Coordinate q3: motion_type=rotational default_value=0 initial_value=0 range=(-6.283185 6.283185) clamped=false
  ConstraintSet:
    PointOnLineConstraint: line_body=ground line_direction_vec=(0 1 0) point_on_line=(0 0 0) follower_body=block
        point_on_follower=(0 0 0)
