# OpenSim document version 20302
ForceSet leg69_RRA_Residuals_and_Motors:
  TorqueActuator MZ: bodyA=pelvis bodyB=ground torque_is_global=true axis=(0 0 1) optimal_force=1
  PointActuator FX: body=pelvis point=(-0.0592121 0 0) point_is_global=false direction=(1 0 0) force_is_global=true
      optimal_force=1
  PointActuator FY: body=pelvis point=(-0.0592121 0 0) point_is_global=false direction=(0 1 0) force_is_global=true
      optimal_force=1
  CoordinateActuator hip_flexion_r_moment: coordinate=hip_flexion_r optimal_force=10000
  CoordinateActuator knee_angle_r_moment: coordinate=knee_angle_r optimal_force=10000
  CoordinateActuator ankle_angle_r_moment: coordinate=ankle_angle_r optimal_force=100000
