# OpenSim document version 20302
CMC_TaskSet leg69_swing:
  CMC_Joint hip_flexion_r: weight=(1 1 1) wrt_body=-1 express_body=-1 active=(true false false) kp=(100 1 1)
      kv=(20 1 1) ka=(1 1 1) r0=(0 0 0) r1=(0 0 0) r2=(0 0 0) coordinate=hip_flexion_r limit=0
  CMC_Joint knee_angle_r: weight=(1 1 1) wrt_body=-1 express_body=-1 active=(true false false) kp=(100 1 1) kv=(20 1 1)
      ka=(1 1 1) r0=(0 0 0) r1=(0 0 0) r2=(0 0 0) coordinate=knee_angle_r limit=0
  CMC_Joint ankle_angle_r: weight=(1 1 1) wrt_body=-1 express_body=-1 active=(true false false) kp=(100 1 1)
      kv=(20 1 1) ka=(1 1 1) r0=(0 0 0) r1=(0 0 0) r2=(0 0 0) coordinate=ankle_angle_r limit=0
