# OpenSim document version 40600
IKTaskSet:
  IKMarkerTask R.ASIS: apply=true weight=20
  IKMarkerTask L.ASIS: apply=true weight=20
  IKMarkerTask R.PSIS: apply=true weight=20
  IKMarkerTask L.PSIS: apply=true weight=20
  IKMarkerTask R.Knee: apply=true weight=10
  IKMarkerTask R.Ankle: apply=true weight=10
  IKMarkerTask R.Heel: apply=true weight=10
  IKMarkerTask R.MT5: apply=true weight=5
  IKMarkerTask R.Toe: apply=true weight=2
  IKMarkerTask L.Knee: apply=true weight=10
  IKMarkerTask L.Ankle: apply=true weight=10
  IKMarkerTask L.Heel: apply=true weight=10
  IKMarkerTask L.MT5: apply=true weight=5
  IKMarkerTask L.Toe: apply=true weight=2
  IKMarkerTask R.HeelGround: apply=true weight=1
  IKMarkerTask R.MT5Ground: apply=true weight=1
  IKMarkerTask R.ToeGround: apply=true weight=1
  IKMarkerTask L.HeelGround: apply=true weight=1
  IKMarkerTask L.MT5Ground: apply=true weight=1
  IKMarkerTask L.ToeGround: apply=true weight=1
