# OpenSim document version 40600
ForceSet contact_force_set:
  SmoothSphereHalfSpaceForce [values shared by the 12 below unless stated]: socket_half_space=/contactgeometryset/floor
      stiffness=3067776 [N/m^2] dissipation=2 [s/m] static_friction=0.8 dynamic_friction=0.8 viscous_friction=0.5
      transition_velocity=0.2 [m/s] hertz_smoothing=300 hunt_crossley_smoothing=50
  SmoothSphereHalfSpaceForce contactHeel_r: socket_sphere=/contactgeometryset/heel_r
  SmoothSphereHalfSpaceForce contactLateralRearfoot_r: socket_sphere=/contactgeometryset/lateralRearfoot_r
  SmoothSphereHalfSpaceForce contactLateralMidfoot_r: socket_sphere=/contactgeometryset/lateralMidfoot_r
  SmoothSphereHalfSpaceForce contactLateralToe_r: socket_sphere=/contactgeometryset/lateralToe_r stiffness=306777.6
  SmoothSphereHalfSpaceForce contactMedialToe_r: socket_sphere=/contactgeometryset/medialToe_r
  SmoothSphereHalfSpaceForce contactMedialMidfoot_r: socket_sphere=/contactgeometryset/medialMidfoot_r
  SmoothSphereHalfSpaceForce contactHeel_l: socket_sphere=/contactgeometryset/heel_l
  SmoothSphereHalfSpaceForce contactLateralRearfoot_l: socket_sphere=/contactgeometryset/lateralRearfoot_l
  SmoothSphereHalfSpaceForce contactLateralMidfoot_l: socket_sphere=/contactgeometryset/lateralMidfoot_l
  SmoothSphereHalfSpaceForce contactLateralToe_l: socket_sphere=/contactgeometryset/lateralToe_l stiffness=306777.6
  SmoothSphereHalfSpaceForce contactMedialToe_l: socket_sphere=/contactgeometryset/medialToe_l
  SmoothSphereHalfSpaceForce contactMedialMidfoot_l: socket_sphere=/contactgeometryset/medialMidfoot_l
