# OpenSim document version 40600
ContactGeometrySet contact_geometry_set:
  ContactHalfSpace floor: socket_frame=/ground orientation=(0 0 -1.570796)
  ContactSphere heel_r: socket_frame=/bodyset/calcn_r location=(0.0146421 0 -0.0122799) radius=0.035
  ContactSphere lateralRearfoot_r: socket_frame=/bodyset/calcn_r location=(0.0849291 0 0.0338649) radius=0.035
  ContactSphere lateralMidfoot_r: socket_frame=/bodyset/calcn_r location=(0.153362 0 0.0594829) radius=0.035
  ContactSphere lateralToe_r: socket_frame=/bodyset/toes_r location=(0.023014 0 0.0670461) radius=0.035
  ContactSphere medialToe_r: socket_frame=/bodyset/toes_r location=(0.074363 0 -0.026039) radius=0.035
  ContactSphere medialMidfoot_r: socket_frame=/bodyset/calcn_r location=(0.203637 0 -0.0398688) radius=0.035
  ContactSphere heel_l: socket_frame=/bodyset/calcn_l location=(0.0146421 0 0.0122799) radius=0.035
  ContactSphere lateralRearfoot_l: socket_frame=/bodyset/calcn_l location=(0.0849291 0 -0.0338649) radius=0.035
  ContactSphere lateralMidfoot_l: socket_frame=/bodyset/calcn_l location=(0.153362 0 -0.0594829) radius=0.035
  ContactSphere lateralToe_l: socket_frame=/bodyset/toes_l location=(0.023014 0 -0.0670461) radius=0.035
  ContactSphere medialToe_l: socket_frame=/bodyset/toes_l location=(0.074363 0 0.026039) radius=0.035
  ContactSphere medialMidfoot_l: socket_frame=/bodyset/calcn_l location=(0.203637 0 0.0398688) radius=0.035
