# OpenSim document version 40600
ForceSet expression_based_coordinate_force_set:
  ExpressionBasedCoordinateForce PassiveShoulderDampingX_r: coordinate=arm_flex_r
      expression=-2.44*exp(5.05*(q-1.81))+1.51*exp(-11.88*(q+0.50))-1.0*qdot
  ExpressionBasedCoordinateForce PassiveShoulderDampingY_r: coordinate=arm_add_r
      expression=-15.03*exp(20.94*(q-0.10))+5.03*exp(-14.93*(q+1.57))-1.0*qdot
  ExpressionBasedCoordinateForce PassiveShoulderDampingZ_r: coordinate=arm_rot_r
      expression=-0.43*exp(14.94*(q-0.15))+0.43*exp(-14.93*(q+0.15))-1.0*qdot
  ExpressionBasedCoordinateForce PassiveElbowDamping_r: coordinate=elbow_flex_r
      expression=6.09*exp(-6.94*(q-0.30))-11.03*exp(11.33*(q-2.40))-1.0*qdot
  ExpressionBasedCoordinateForce PassiveShoulderDampingX_l: coordinate=arm_flex_l
      expression=-2.44*exp(5.05*(q-1.81))+1.51*exp(-11.88*(q+0.50))-1.0*qdot
  ExpressionBasedCoordinateForce PassiveShoulderDampingY_l: coordinate=arm_add_l
      expression=-15.03*exp(20.94*(q-0.10))+5.03*exp(-14.93*(q+1.57))-1.0*qdot
  ExpressionBasedCoordinateForce PassiveShoulderDampingZ_l: coordinate=arm_rot_l
      expression=-0.43*exp(14.94*(q-0.15))+0.43*exp(-14.93*(q+0.15))-1.0*qdot
  ExpressionBasedCoordinateForce PassiveElbowDamping_l: coordinate=elbow_flex_l
      expression=6.09*exp(-6.94*(q-0.30))-11.03*exp(11.33*(q-2.40))-1.0*qdot
  ExpressionBasedCoordinateForce PassiveHipDampingX_r: coordinate=hip_flexion_r
      expression=-2.44*exp(5.05*(q-1.81))+1.51*exp(-21.88*(q+0.47))-0.1*qdot
  ExpressionBasedCoordinateForce PassiveHipDampingY_r: coordinate=hip_adduction_r
      expression=-0.03*exp(14.94*(q-0.50))+0.03*exp(-14.94*(q+0.50))-0.1*qdot
  ExpressionBasedCoordinateForce PassiveHipDampingZ_r: coordinate=hip_rotation_r
      expression=-0.03*exp(14.94*(q-0.92))+0.03*exp(-14.94*(q+0.92))-0.1*qdot
  ExpressionBasedCoordinateForce PassiveHipDampingX_l: coordinate=hip_flexion_l
      expression=-2.44*exp(5.05*(q-1.81))+1.51*exp(-21.88*(q+0.47))-0.1*qdot
  ExpressionBasedCoordinateForce PassiveHipDampingY_l: coordinate=hip_adduction_l
      expression=-0.03*exp(14.94*(q-0.50))+0.03*exp(-14.94*(q+0.50))-0.1*qdot
  ExpressionBasedCoordinateForce PassiveHipDampingZ_l: coordinate=hip_rotation_l
      expression=-0.03*exp(14.94*(q-0.92))+0.03*exp(-14.94*(q+0.92))-0.1*qdot
  ExpressionBasedCoordinateForce PassiveKneeDamping_r: coordinate=knee_angle_r
      expression=6.09*exp(33.94*(-q-0.13))-11.03*exp(-11.33*(-q+2.40))-0.1*qdot
  ExpressionBasedCoordinateForce PassiveKneeDamping_l: coordinate=knee_angle_l
      expression=6.09*exp(33.94*(-q-0.13))-11.03*exp(-11.33*(-q+2.40))-0.1*qdot
  ExpressionBasedCoordinateForce PassiveAnkleDamping_r: coordinate=ankle_angle_r expression=-0.1*qdot
  ExpressionBasedCoordinateForce PassiveAnkleDamping_l: coordinate=ankle_angle_l expression=-0.1*qdot
  ExpressionBasedCoordinateForce PassiveToeDamping_r: coordinate=mtp_angle_r expression=-25.0*q-2.0*qdot
  ExpressionBasedCoordinateForce PassiveToeDamping_l: coordinate=mtp_angle_l expression=-25.0*q-2.0*qdot
