# OpenSim document version 20302
Model tugOfWar:
  gravity: 0 -9.80665 0
  ForceSet:
    Thelen2003Muscle Liu: min_control=0 max_control=1 optimal_force=1 max_isometric_force=4000 optimal_fiber_length=0.2
        tendon_slack_length=0.2 pennation_angle_at_optimal=0 max_contraction_velocity=10
        activation_time_constant=0.0001 deactivation_time_constant=1 Vmax=10 Vmax0=5 FmaxTendonStrain=0.033
        FmaxMuscleStrain=0.6 KshapeActive=0.5 KshapePassive=4 damping=0.05 Af=0.3 Flen=1.8
      PathPoint point1: ground (0 0.05 -0.35)
      PathPoint point2: block (0 0 -0.05)
    Thelen2003Muscle Thelen: min_control=0 max_control=1 optimal_force=1 max_isometric_force=2000
        optimal_fiber_length=0.2 tendon_slack_length=0.2 pennation_angle_at_optimal=0 max_contraction_velocity=10
        activation_time_constant=0.0001 deactivation_time_constant=1 Vmax=10 Vmax0=5 FmaxTendonStrain=0.033
        FmaxMuscleStrain=0.6 KshapeActive=0.5 KshapePassive=4 damping=0.05 Af=0.3 Flen=1.8
      PathPoint point1: ground (0 0.05 0.35)
      PathPoint point2: block (0 0 0.05)
    ElasticFoundationForce contactForce: transition_velocity=0.01
      ContactParametersSet:
        ContactParameters: geometry=(cube floor) stiffness=100000000 dissipation=0.01 static_friction=0
            dynamic_friction=0.25 viscous_friction=0
  BodySet:
    Body ground: mass=0 mass_center=(0 0 0) inertia_xx=1 inertia_yy=1 inertia_zz=1
        meshes=(ground.vtp anchor1.vtp anchor2.vtp)
    Body block: mass=20 mass_center=(0 0 0) inertia_xx=0.1333333 inertia_yy=0.1333333 inertia_zz=0.1333333
        meshes=blockRemesh192.obj
      FreeJoint blockToGround: parent_body=ground location_in_parent=(0 0.05 0) location=(0 0 0)
        Coordinate blockToGround_xRotation: motion_type=rotational default_value=0 initial_value=0
            range=(-1.570796 1.570796) clamped=true locked=true
        Coordinate blockToGround_yRotation: motion_type=rotational default_value=0 initial_value=0
            range=(-1.570796 1.570796) clamped=true locked=true
        Coordinate blockToGround_zRotation: motion_type=rotational default_value=0 initial_value=0
            range=(-1.570796 1.570796) clamped=true locked=true
        Coordinate blockToGround_xTranslation: motion_type=translational default_value=0 initial_value=0 range=(-1 1)
            clamped=true
        Coordinate blockToGround_yTranslation: motion_type=translational default_value=0 initial_value=0 range=(-1 1)
            clamped=true
        Coordinate blockToGround_zTranslation: motion_type=translational default_value=0 initial_value=0 range=(-1 1)
            clamped=true
  ContactGeometrySet:
    ContactHalfSpace floor: body_name=ground location=(0 0 0) orientation=(0 0 -1.570796)
    ContactMesh cube: body_name=block location=(0 0 0) filename=blockRemesh192.obj
