Model pelvis:
  angle_units: radians
  ContactForceSet: file=PassiveWalker_contact.xml
  DynamicsEngine:
    SimbodyEngine: gravity=(0 -9.80665 0)
      BodySet:
        SimbodyBody ground: mass=0 mass_center=(0 0 0) inertia=(0 0 0 0 0 0 0 0 0) meshes=floor.vtp
        SimbodyBody pelvis: mass=50 mass_center=(0 -0.2 0) inertia=(0.1 0 0 0 0.1 0 0 0 0.1)
            meshes=(sacrum.vtp pelvis.vtp l_pelvis.vtp)
        SimbodyBody rleg: mass=10 mass_center=(0 0 0) inertia=(0.01 0 0 0 0.01 0 0 0 0.01) meshes=wheel.vtp
        SimbodyBody lleg: mass=10 mass_center=(0 0 0) inertia=(0.01 0 0 0 0.01 0 0 0 0.01) meshes=wheel.vtp
      SimbodyCoordinate [values shared by the 8 below unless stated]: default_value=0 tolerance=0.00000001 stiffness=0
          clamped=true restraint_active=false keys=q_key
      SimbodyCoordinate pelvis_tx: range=(-5 5) keys=p_key
      SimbodyCoordinate pelvis_ty: range=(-1 2) default_value=1
      SimbodyCoordinate pelvis_tz: range=(-3 3)
      SimbodyCoordinate pelvis_rz: range=(-1.570796 1.570796)
      SimbodyCoordinate pelvis_rx: range=(-1.570796 1.570796)
      SimbodyCoordinate pelvis_ry: range=(-1.570796 1.570796)
      SimbodyCoordinate rhip_rz: range=(-1.570796 1.570796)
      SimbodyCoordinate lhip_rz: range=(-1.570796 1.570796)
      SpeedSet:
        SimbodySpeed pelvis_tx_u: default_value=0 coordinate=pelvis_tx
        SimbodySpeed pelvis_ty_u: default_value=0 coordinate=pelvis_ty
        SimbodySpeed pelvis_tz_u: default_value=0 coordinate=pelvis_tz
        SimbodySpeed pelvis_rz_u: default_value=0 coordinate=pelvis_rz
        SimbodySpeed pelvis_rx_u: default_value=0 coordinate=pelvis_rx
        SimbodySpeed pelvis_ry_u: default_value=0 coordinate=pelvis_ry
        SimbodySpeed rhip_rz_u: default_value=0 coordinate=rhip_rz
        SimbodySpeed lhip_rz_u: default_value=0 coordinate=lhip_rz
      JointSet:
        SimbodyJoint ground_pelvis: bodies=(ground pelvis)
          DofSet:
            SimbodyTranslationDof tx: coordinate=pelvis_tx
              Value:
                natCubicSpline: x=(-360 360) y=(-360 360)
            SimbodyTranslationDof ty: coordinate=pelvis_ty
              Value:
                natCubicSpline: x=(-360 360) y=(-360 360)
            SimbodyTranslationDof tz: coordinate=pelvis_tz
              Value:
                natCubicSpline: x=(-360 360) y=(-360 360)
            SimbodyRotationDof r1: axis=(0 0 1) coordinate=pelvis_rz
              Value:
                natCubicSpline: x=(-6.283185 6.283185) y=(-6.283185 6.283185)
            SimbodyRotationDof r2: axis=(1 0 0) coordinate=pelvis_rx
              Value:
                natCubicSpline: x=(-6.283185 6.283185) y=(-6.283185 6.283185)
            SimbodyRotationDof r3: axis=(0 1 0) coordinate=pelvis_ry
              Value:
                natCubicSpline: x=(-6.283185 6.283185) y=(-6.283185 6.283185)
        SimbodyJoint rhip: bodies=(pelvis rleg) location_in_child=(0 0.6 0)
          DofSet:
            SimbodyTranslationDof tx:
              Value: Constant(value=0)
            SimbodyTranslationDof ty:
              Value: Constant(value=0)
            SimbodyTranslationDof tz:
              Value: Constant(value=0.03)
            SimbodyRotationDof r1: axis=(0 0 1) coordinate=rhip_rz
              Value:
                natCubicSpline: x=(-6.283185 6.283185) y=(-6.283185 6.283185)
        SimbodyJoint lhip: bodies=(pelvis lleg) location_in_child=(0 0.6 0)
          DofSet:
            SimbodyTranslationDof tx:
              Value: Constant(value=0)
            SimbodyTranslationDof ty:
              Value: Constant(value=0)
            SimbodyTranslationDof tz:
              Value: Constant(value=-0.03)
            SimbodyRotationDof r1: axis=(0 0 1) coordinate=lhip_rz
              Value:
                natCubicSpline: x=(-6.283185 6.283185) y=(-6.283185 6.283185)
