# OpenSim document version 10902
Model Three Masses:
  credits: Tim Dorn
  publications: List of publications related to model...
  length_units: meters
  force_units: N
  gravity: 0 -9.80665 0
  ForceSet:
    BodyDragForce sphere1_drag: body_name=sphere1 coefficient=0 exponent=2
    BodyDragForce sphere2_drag: body_name=sphere2 coefficient=0.7 exponent=2
    BodyDragForce sphere3_drag: body_name=sphere3 coefficient=1.4 exponent=2
  BodySet:
    Body ground: mass=0 mass_center=(0 0 0) inertia_xx=0 inertia_yy=0 inertia_zz=0
    Body sphere1: mass=10 mass_center=(0 0 0) inertia_xx=0.025 inertia_yy=0.025 inertia_zz=0.025 meshes=sphere.vtp
      CustomJoint ground_sphere1: parent_body=ground location_in_parent=(1 0 0) location=(0 0 0)
        Coordinate sphere1_TransX: motion_type=translational default_value=0 initial_value=0 range=(-10 10)
            clamped=false
        Coordinate sphere1_TransY: motion_type=translational default_value=0 initial_value=0 range=(-10 10)
            clamped=false
        Coordinate sphere1_TransZ: motion_type=translational default_value=0 initial_value=0 range=(-10 10)
            clamped=false
        SpatialTransform:
          TransformAxis translation1: coordinates=sphere1_TransX axis=(1 0 0)
              MultiplierFunction(scale=1, LinearFunction(coefficients=1 0))
          TransformAxis translation2: coordinates=sphere1_TransY axis=(0 1 0)
              MultiplierFunction(scale=1, LinearFunction(coefficients=1 0))
          TransformAxis translation3: coordinates=sphere1_TransZ axis=(0 0 1)
              MultiplierFunction(scale=1, LinearFunction(coefficients=1 0))
    Body sphere2: mass=100 mass_center=(0 0 0) inertia_xx=0.025 inertia_yy=0.025 inertia_zz=0.025 meshes=sphere.vtp
      CustomJoint ground_sphere2: parent_body=ground location_in_parent=(3 0 0) location=(0 0 0)
        Coordinate sphere2_TransX: motion_type=translational default_value=0 initial_value=0 range=(-10 10)
            clamped=false
        Coordinate sphere2_TransY: motion_type=translational default_value=0 initial_value=0 range=(-10 10)
            clamped=false
        Coordinate sphere2_TransZ: motion_type=translational default_value=0 initial_value=0 range=(-10 10)
            clamped=false
        SpatialTransform:
          TransformAxis translation1: coordinates=sphere2_TransX axis=(1 0 0)
              MultiplierFunction(scale=1, LinearFunction(coefficients=1 0))
          TransformAxis translation2: coordinates=sphere2_TransY axis=(0 1 0)
              MultiplierFunction(scale=1, LinearFunction(coefficients=1 0))
          TransformAxis translation3: coordinates=sphere2_TransZ axis=(0 0 1)
              MultiplierFunction(scale=1, LinearFunction(coefficients=1 0))
    Body sphere3: mass=100 mass_center=(0 0 0) inertia_xx=0.025 inertia_yy=0.025 inertia_zz=0.025 meshes=sphere.vtp
      CustomJoint ground_sphere3: parent_body=ground location_in_parent=(5 0 0) location=(0 0 0)
        Coordinate sphere3_TransX: motion_type=translational default_value=0 initial_value=0 range=(-10 10)
            clamped=false
        Coordinate sphere3_TransY: motion_type=translational default_value=0 initial_value=0 range=(-10 10)
            clamped=false
        Coordinate sphere3_TransZ: motion_type=translational default_value=0 initial_value=0 range=(-10 10)
            clamped=false
        SpatialTransform:
          TransformAxis translation1: coordinates=sphere3_TransX axis=(1 0 0)
              MultiplierFunction(scale=1, LinearFunction(coefficients=1 0))
          TransformAxis translation2: coordinates=sphere3_TransY axis=(0 1 0)
              MultiplierFunction(scale=1, LinearFunction(coefficients=1 0))
          TransformAxis translation3: coordinates=sphere3_TransZ axis=(0 0 1)
              MultiplierFunction(scale=1, LinearFunction(coefficients=1 0))
