# OpenSim document version 20302
ForwardTool Three Masses:
  model_file: ThreeMasses.osim
  replace_force_set: false
  results_directory: .
  output_precision: 8
  initial_time: 0
  final_time: 20
  solve_for_equilibrium_for_auxiliary_states: false
  maximum_number_of_integrator_steps: 20000
  maximum_integrator_step_size: 1
  minimum_integrator_step_size: 0.00000001
  integrator_error_tolerance: 0.00001
  use_specified_dt: false
  AnalysisSet Analyses:
    ForceReporter: start_time=0 end_time=5 step_interval=1 in_degrees=true include_constraint_forces=false
