# OpenSim document version 20001
Model pendulum:
  credits: Tim Dorn
  publications: List of publications related to model...
  length_units: meters
  force_units: N
  gravity: 0 -9.80665 0
  ForceSet:
    BodyDragForce pend_drag: body_name=pend coefficient=0.3 exponent=2
  BodySet:
    Body ground: mass=0 mass_center=(0 0 0) inertia_xx=0 inertia_yy=0 inertia_zz=0
    Body pend: mass=0.75 mass_center=(0 0 0) inertia_xx=0.025 inertia_yy=0.025 inertia_zz=0.025 meshes=pendulum.vtp
      CustomJoint pin1: parent_body=ground location_in_parent=(0 0 0) location=(0 0.5 0)
        Coordinate r1_z: motion_type=rotational default_value=1.570796 initial_value=0 range=(-3.141593 3.141593)
            clamped=false
        SpatialTransform: axes_held_at_zero=(rotation2 rotation3 translation1 translation2 translation3)
          TransformAxis rotation1: coordinates=r1_z axis=(0 0 1) LinearFunction(coefficients=1 0)
