Model subject01:
  length_units: meters
  force_units: N
  credits:
    Delp S.L., Loan J.P., Hoy M.G., Zajac F.E., Topp E.L., Rosen J.M., Thelen D.G., Anderson F.C., Seth A.
  publications:
    Notes: 3D, 23 DOF gait model created by D.G. Thelen, Univ. of Wisconsin-Madison, and Ajay Seth, Frank C. Anderson, and Scott L. Delp, Stanford University. Lower extremity joint defintions based on Delp et al. (1990). Low back joint and anthropometry based on Anderson and Pandy (1999, 2001). Planar knee model of Yamaguchi and Zajac (1989). Seth removed the patella to avoid kinematic constraints; insertions of the quadrucepts are handled with moving points in the tibia frame.
    Delp, S.L., Loan, J.P., Hoy, M.G., Zajac, F.E., Topp E.L., Rosen, J.M.: An interactive graphics-based model of the lower extremity to study orthopaedic surgical procedures, IEEE Transactions on Biomedical Engineering, vol. 37, pp. 757-767, 1990.
    Yamaguchi G.T., Zajac F.E.: A planar model of the knee joint to characterize the knee extensor mechanism." J . Biomecl7. vol. 21. pp. 1-10. 1989.
    Anderson F.C., Pandy M.G.: A dynamic optimization solution for vertical jumping in three dimensions. Computer Methods in Biomechanics and Biomedical Engineering 2:201-231, 1999.
    Anderson F.C., Pandy M.G.: Dynamic optimization of human walking. Journal of Biomechanical Engineering 123:381-390, 2001.
  ContactForceSet:
    LinearSetPoint [values shared by the 10 below unless stated]: body_A=ground normal_A=(0 1 0) point_A=(0 0 0)
        normal_B=(0 -1 0) coefficient_of_friction=0.7 tangential_stiffness=10000 tangential_viscosity=200
        normal_stiffness=250000 normal_viscosity=1000
    LinearSetPoint R.Heel.Med: body_B=calcn_r point_B=(-0.05 0 -0.04)
    LinearSetPoint R.Heel.Lat: body_B=calcn_r point_B=(-0.05 0 0.04)
    LinearSetPoint R.Mtp.Med: body_B=calcn_r point_B=(0.15 0 -0.05)
    LinearSetPoint R.Mtp.Lat: body_B=calcn_r point_B=(0.15 0 0.05)
    LinearSetPoint R.Toes.Tip: body_B=toes_r point_B=(0.06 0 0)
    LinearSetPoint L.Heel.Med: body_B=calcn_l point_B=(-0.05 0 0.05)
    LinearSetPoint L.Heel.Lat: body_B=calcn_l point_B=(-0.05 0 -0.04)
    LinearSetPoint L.Mtp.Med: body_B=calcn_l point_B=(0.15 0 0.05)
    LinearSetPoint L.Mtp.Lat: body_B=calcn_l point_B=(0.15 0 -0.05)
    LinearSetPoint L.Toes.Tip: body_B=toes_l point_B=(0.06 0 0)
  DynamicsEngine:
    SimbodyEngine: gravity=(0 -9.80665 0)
      BodySet:
        SimbodyBody ground: mass=0 mass_center=(0 0 0) inertia=(0 0 0 0 0 0 0 0 0) meshes=treadmill.vtp
        SimbodyBody pelvis: mass=11.37517 mass_center=(-0.0724376 0 0)
            inertia=(0.1042331 0 0 0 0.08831422 0 0 0 0.05870716) meshes=(sacrum.vtp pelvis.vtp l_pelvis.vtp)
        SimbodyBody femur_r: mass=8.984038 mass_center=(0 -0.1950308 0)
            inertia=(0.1702207 0 0 0 0.04462096 0 0 0 0.1795009) meshes=femur.vtp
        SimbodyBody tibia_r: mass=3.581001 mass_center=(0 -0.1845572 0)
            inertia=(0.04756937 0 0 0 0.004813567 0 0 0 0.04823005) meshes=(tibia.vtp fibula.vtp)
        SimbodyBody talus_r: mass=0.09658802 mass_center=(0 0 0)
            inertia=(0.001198606 0 0 0 0.001198606 0 0 0 0.001198606) meshes=talus.vtp
        SimbodyBody calcn_r: mass=1.20735 mass_center=(0.1027085 0.03081254 0)
            inertia=(0.001426474 0 0 0 0.003973749 0 0 0 0.004177531) meshes=foot.vtp
        SimbodyBody toes_r: mass=0.2092097 mass_center=(0.03553713 0.006162509 -0.01797398)
            inertia=(0.000101891 0 0 0 0.000203782 0 0 0 0.00101891) meshes=bofoot.vtp
        SimbodyBody femur_l: mass=8.984038 mass_center=(0 -0.1950308 0)
            inertia=(0.1702207 0 0 0 0.04462096 0 0 0 0.1795009) meshes=l_femur.vtp
        SimbodyBody tibia_l: mass=3.581001 mass_center=(0 -0.1845572 0)
            inertia=(0.04756937 0 0 0 0.004813567 0 0 0 0.04823005) meshes=(l_tibia.vtp l_fibula.vtp)
        SimbodyBody talus_l: mass=0.09658802 mass_center=(0 0 0)
            inertia=(0.001198606 0 0 0 0.001198606 0 0 0 0.001198606) meshes=l_talus.vtp
        SimbodyBody calcn_l: mass=1.20735 mass_center=(0.1027085 0.03081254 0)
            inertia=(0.001426474 0 0 0 0.003973749 0 0 0 0.004177531) meshes=l_foot.vtp
        SimbodyBody toes_l: mass=0.2092097 mass_center=(0.03553713 0.006162509 0.01797398)
            inertia=(0.000101891 0 0 0 0.000203782 0 0 0 0.00101891) meshes=l_bofoot.vtp
        SimbodyBody torso: mass=33.06845 mass_center=(0.0323916 0.3455104 0)
            inertia=(1.660314 0 0 0 0.8507069 0 0 0 1.611783)
            meshes=(hat_spine.vtp hat_jaw.vtp hat_skull.vtp hat_ribs.vtp)
      JointSet:
        SimbodyJoint [values shared by the 12 below unless stated]: location_in_parent=(0 0 0)
            location_in_child=(0 0 0)
        SimbodyJoint ground_pelvis: bodies=(ground pelvis)
          DofSet:
            SimbodyTranslationDof tx: coordinate=pelvis_tx
              Value:
                natCubicSpline: min_x=0 max_x=0 min_y=0 max_y=0 min_z=0 max_z=0 x=(-360 360) y=(-360 360)
            SimbodyTranslationDof ty: coordinate=pelvis_ty
              Value:
                natCubicSpline: min_x=0 max_x=0 min_y=0 max_y=0 min_z=0 max_z=0 x=(-360 360) y=(-360 360)
            SimbodyTranslationDof tz: coordinate=pelvis_tz
              Value:
                natCubicSpline: min_x=0 max_x=0 min_y=0 max_y=0 min_z=0 max_z=0 x=(-360 360) y=(-360 360)
            SimbodyRotationDof r1: coordinate=pelvis_tilt axis=(0 0 1)
              Value:
                natCubicSpline: min_x=0 max_x=0 min_y=0 max_y=0 min_z=0 max_z=0 x=(-6.283185 6.283185)
                    y=(-6.283185 6.283185)
            SimbodyRotationDof r2: coordinate=pelvis_list axis=(1 0 0)
              Value:
                natCubicSpline: min_x=0 max_x=0 min_y=0 max_y=0 min_z=0 max_z=0 x=(-6.283185 6.283185)
                    y=(-6.283185 6.283185)
            SimbodyRotationDof r3: coordinate=pelvis_rotation axis=(0 1 0)
              Value:
                natCubicSpline: min_x=0 max_x=0 min_y=0 max_y=0 min_z=0 max_z=0 x=(-6.283185 6.283185)
                    y=(-6.283185 6.283185)
        SimbodyJoint hip_r: bodies=(pelvis femur_r)
          DofSet:
            SimbodyTranslationDof tx:
              Value:
                Constant: min_x=0 max_x=0 min_y=0 max_y=0 min_z=0 max_z=0 value=-0.0724376
            SimbodyTranslationDof ty:
              Value:
                Constant: min_x=0 max_x=0 min_y=0 max_y=0 min_z=0 max_z=0 value=-0.06772454
            SimbodyTranslationDof tz:
              Value:
                Constant: min_x=0 max_x=0 min_y=0 max_y=0 min_z=0 max_z=0 value=0.08555218
            SimbodyRotationDof r1: coordinate=hip_flexion_r axis=(0 0 1)
              Value:
                natCubicSpline: min_x=0 max_x=0 min_y=0 max_y=0 min_z=0 max_z=0 x=(-6.283185 6.283185)
                    y=(-6.283185 6.283185)
            SimbodyRotationDof r2: coordinate=hip_adduction_r axis=(1 0 0)
              Value:
                natCubicSpline: min_x=0 max_x=0 min_y=0 max_y=0 min_z=0 max_z=0 x=(-6.283185 6.283185)
                    y=(-6.283185 6.283185)
            SimbodyRotationDof r3: coordinate=hip_rotation_r axis=(0 1 0)
              Value:
                natCubicSpline: min_x=0 max_x=0 min_y=0 max_y=0 min_z=0 max_z=0 x=(-6.283185 6.283185)
                    y=(-6.283185 6.283185)
        SimbodyJoint knee_r: bodies=(femur_r tibia_r)
          DofSet:
            SimbodyTranslationDof tx: coordinate=knee_angle_r
              Value:
                natCubicSpline: min_x=0 max_x=0 min_y=0 max_y=0 min_z=0 max_z=0
                    x=(-2.094395 -1.745329 -1.396263 -1.047198 -0.6981317 -0.3490659 -0.1745329 0.1973442 0.337395 0.4901776 1.52146 2.094395)
                    y=(-0.003671168 0.00205356 0.004715156 0.004703684 0.002432149 -0.00114724 -0.003556444 -0.005996623 -0.006235249 -0.006394716 -0.006235249 -0.00602301)
            SimbodyTranslationDof ty: coordinate=knee_angle_r
              Value:
                natCubicSpline: min_x=0 max_x=0 min_y=0 max_y=0 min_z=0 max_z=0
                    x=(-2.094395 -1.22173 -0.5235988 -0.3490659 -0.1745329 0.1591486 2.094395)
                    y=(-0.4848236 -0.4683034 -0.4577488 -0.4561426 -0.4549954 -0.4534627 -0.454307)
            SimbodyTranslationDof tz:
              Value:
                Constant: min_x=0 max_x=0 min_y=0 max_y=0 min_z=0 max_z=0 value=0
            SimbodyRotationDof r1: coordinate=knee_angle_r axis=(0 0 1)
              Value:
                natCubicSpline: min_x=0 max_x=0 min_y=0 max_y=0 min_z=0 max_z=0 x=(-6.283185 6.283185)
                    y=(-6.283185 6.283185)
            SimbodyRotationDof r2: axis=(1 0 0)
              Value:
                Constant: min_x=0 max_x=0 min_y=0 max_y=0 min_z=0 max_z=0 value=0
            SimbodyRotationDof r3: axis=(0 1 0)
              Value:
                Constant: min_x=0 max_x=0 min_y=0 max_y=0 min_z=0 max_z=0 value=0
        SimbodyJoint ankle_r: bodies=(tibia_r talus_r)
          DofSet:
            SimbodyTranslationDof tx:
              Value:
                Constant: min_x=0 max_x=0 min_y=0 max_y=0 min_z=0 max_z=0 value=0
            SimbodyTranslationDof ty:
              Value:
                Constant: min_x=0 max_x=0 min_y=0 max_y=0 min_z=0 max_z=0 value=-0.4250649
            SimbodyTranslationDof tz:
              Value:
                Constant: min_x=0 max_x=0 min_y=0 max_y=0 min_z=0 max_z=0 value=0
            SimbodyRotationDof r1: coordinate=ankle_angle_r axis=(-0.1050135 -0.1740225 0.9791263)
              Value:
                natCubicSpline: min_x=0 max_x=0 min_y=0 max_y=0 min_z=0 max_z=0 x=(-6.283185 6.283185)
                    y=(-6.283185 6.283185)
            SimbodyRotationDof r2: axis=(1 0 0)
              Value:
                Constant: min_x=0 max_x=0 min_y=0 max_y=0 min_z=0 max_z=0 value=0
            SimbodyRotationDof r3: axis=(0 1 0)
              Value:
                Constant: min_x=0 max_x=0 min_y=0 max_y=0 min_z=0 max_z=0 value=0
        SimbodyJoint subtalar_r: bodies=(talus_r calcn_r)
          DofSet:
            SimbodyTranslationDof tx:
              Value:
                Constant: min_x=0 max_x=0 min_y=0 max_y=0 min_z=0 max_z=0 value=-0.05432871
            SimbodyTranslationDof ty:
              Value:
                Constant: min_x=0 max_x=0 min_y=0 max_y=0 min_z=0 max_z=0 value=-0.04673138
            SimbodyTranslationDof tz:
              Value:
                Constant: min_x=0 max_x=0 min_y=0 max_y=0 min_z=0 max_z=0 value=0.008822706
            SimbodyRotationDof r1: coordinate=subtalar_angle_r axis=(0.7871796 0.6047475 -0.1209495)
              Value:
                natCubicSpline: min_x=0 max_x=0 min_y=0 max_y=0 min_z=0 max_z=0 x=(-6.283185 6.283185)
                    y=(-6.283185 6.283185)
            SimbodyRotationDof r2: axis=(0 1 0)
              Value:
                Constant: min_x=0 max_x=0 min_y=0 max_y=0 min_z=0 max_z=0 value=0
            SimbodyRotationDof r3: axis=(0 0 1)
              Value:
                Constant: min_x=0 max_x=0 min_y=0 max_y=0 min_z=0 max_z=0 value=0
        SimbodyJoint mtp_r: bodies=(calcn_r toes_r)
          DofSet:
            SimbodyTranslationDof tx:
              Value:
                Constant: min_x=0 max_x=0 min_y=0 max_y=0 min_z=0 max_z=0 value=0.1836428
            SimbodyTranslationDof ty:
              Value:
                Constant: min_x=0 max_x=0 min_y=0 max_y=0 min_z=0 max_z=0 value=-0.00205417
            SimbodyTranslationDof tz:
              Value:
                Constant: min_x=0 max_x=0 min_y=0 max_y=0 min_z=0 max_z=0 value=0.001109252
            SimbodyRotationDof r1: coordinate=mtp_angle_r axis=(-0.5809544 0 0.8139361)
              Value:
                natCubicSpline: min_x=0 max_x=0 min_y=0 max_y=0 min_z=0 max_z=0 x=(-6.283185 6.283185)
                    y=(-6.283185 6.283185)
            SimbodyRotationDof r2: axis=(1 0 0)
              Value:
                Constant: min_x=0 max_x=0 min_y=0 max_y=0 min_z=0 max_z=0 value=0
            SimbodyRotationDof r3: axis=(0 1 0)
              Value:
                Constant: min_x=0 max_x=0 min_y=0 max_y=0 min_z=0 max_z=0 value=0
        SimbodyJoint hip_l: bodies=(pelvis femur_l)
          DofSet:
            SimbodyTranslationDof tx:
              Value:
                Constant: min_x=0 max_x=0 min_y=0 max_y=0 min_z=0 max_z=0 value=-0.0724376
            SimbodyTranslationDof ty:
              Value:
                Constant: min_x=0 max_x=0 min_y=0 max_y=0 min_z=0 max_z=0 value=-0.06772454
            SimbodyTranslationDof tz:
              Value:
                Constant: min_x=0 max_x=0 min_y=0 max_y=0 min_z=0 max_z=0 value=-0.08555218
            SimbodyRotationDof r1: coordinate=hip_flexion_l axis=(0 0 1)
              Value:
                natCubicSpline: min_x=0 max_x=0 min_y=0 max_y=0 min_z=0 max_z=0 x=(-6.283185 6.283185)
                    y=(-6.283185 6.283185)
            SimbodyRotationDof r2: coordinate=hip_adduction_l axis=(-1 0 0)
              Value:
                natCubicSpline: min_x=0 max_x=0 min_y=0 max_y=0 min_z=0 max_z=0 x=(-6.283185 6.283185)
                    y=(-6.283185 6.283185)
            SimbodyRotationDof r3: coordinate=hip_rotation_l axis=(0 -1 0)
              Value:
                natCubicSpline: min_x=0 max_x=0 min_y=0 max_y=0 min_z=0 max_z=0 x=(-6.283185 6.283185)
                    y=(-6.283185 6.283185)
        SimbodyJoint knee_l: bodies=(femur_l tibia_l)
          DofSet:
            SimbodyTranslationDof tx: coordinate=knee_angle_l
              Value:
                natCubicSpline: min_x=0 max_x=0 min_y=0 max_y=0 min_z=0 max_z=0
                    x=(-2.094395 -1.745329 -1.396263 -1.047198 -0.6981317 -0.3490659 -0.1745329 0.1973442 0.337395 0.4901776 1.52146 2.094395)
                    y=(-0.003671168 0.00205356 0.004715156 0.004703684 0.002432149 -0.00114724 -0.003556444 -0.005996623 -0.006235249 -0.006394716 -0.006235249 -0.00602301)
            SimbodyTranslationDof ty: coordinate=knee_angle_l
              Value:
                natCubicSpline: min_x=0 max_x=0 min_y=0 max_y=0 min_z=0 max_z=0
                    x=(-2.094395 -1.22173 -0.5235988 -0.3490659 -0.1745329 0.1591486 2.094395)
                    y=(-0.4848236 -0.4683034 -0.4577488 -0.4561426 -0.4549954 -0.4534627 -0.454307)
            SimbodyTranslationDof tz:
              Value:
                Constant: min_x=0 max_x=0 min_y=0 max_y=0 min_z=0 max_z=0 value=0
            SimbodyRotationDof r1: coordinate=knee_angle_l axis=(0 0 1)
              Value:
                natCubicSpline: min_x=0 max_x=0 min_y=0 max_y=0 min_z=0 max_z=0 x=(-6.283185 6.283185)
                    y=(-6.283185 6.283185)
            SimbodyRotationDof r2: axis=(1 0 0)
              Value:
                Constant: min_x=0 max_x=0 min_y=0 max_y=0 min_z=0 max_z=0 value=0
            SimbodyRotationDof r3: axis=(0 1 0)
              Value:
                Constant: min_x=0 max_x=0 min_y=0 max_y=0 min_z=0 max_z=0 value=0
        SimbodyJoint ankle_l: bodies=(tibia_l talus_l)
          DofSet:
            SimbodyTranslationDof tx:
              Value:
                Constant: min_x=0 max_x=0 min_y=0 max_y=0 min_z=0 max_z=0 value=0
            SimbodyTranslationDof ty:
              Value:
                Constant: min_x=0 max_x=0 min_y=0 max_y=0 min_z=0 max_z=0 value=-0.4250649
            SimbodyTranslationDof tz:
              Value:
                Constant: min_x=0 max_x=0 min_y=0 max_y=0 min_z=0 max_z=0 value=0
            SimbodyRotationDof r1: coordinate=ankle_angle_l axis=(0.1050135 -0.1740225 0.9791263)
              Value:
                natCubicSpline: min_x=0 max_x=0 min_y=0 max_y=0 min_z=0 max_z=0 x=(-6.283185 6.283185)
                    y=(-6.283185 6.283185)
            SimbodyRotationDof r2: axis=(1 0 0)
              Value:
                Constant: min_x=0 max_x=0 min_y=0 max_y=0 min_z=0 max_z=0 value=0
            SimbodyRotationDof r3: axis=(0 1 0)
              Value:
                Constant: min_x=0 max_x=0 min_y=0 max_y=0 min_z=0 max_z=0 value=0
        SimbodyJoint subtalar_l: bodies=(talus_l calcn_l)
          DofSet:
            SimbodyTranslationDof tx:
              Value:
                Constant: min_x=0 max_x=0 min_y=0 max_y=0 min_z=0 max_z=0 value=-0.05432871
            SimbodyTranslationDof ty:
              Value:
                Constant: min_x=0 max_x=0 min_y=0 max_y=0 min_z=0 max_z=0 value=-0.04673138
            SimbodyTranslationDof tz:
              Value:
                Constant: min_x=0 max_x=0 min_y=0 max_y=0 min_z=0 max_z=0 value=-0.008822706
            SimbodyRotationDof r1: coordinate=subtalar_angle_l axis=(-0.7871796 -0.6047475 -0.1209495)
              Value:
                natCubicSpline: min_x=0 max_x=0 min_y=0 max_y=0 min_z=0 max_z=0 x=(-6.283185 6.283185)
                    y=(-6.283185 6.283185)
            SimbodyRotationDof r2: axis=(0 1 0)
              Value:
                Constant: min_x=0 max_x=0 min_y=0 max_y=0 min_z=0 max_z=0 value=0
            SimbodyRotationDof r3: axis=(0 0 1)
              Value:
                Constant: min_x=0 max_x=0 min_y=0 max_y=0 min_z=0 max_z=0 value=0
        SimbodyJoint mtp_l: bodies=(calcn_l toes_l)
          DofSet:
            SimbodyTranslationDof tx:
              Value:
                Constant: min_x=0 max_x=0 min_y=0 max_y=0 min_z=0 max_z=0 value=0.1836428
            SimbodyTranslationDof ty:
              Value:
                Constant: min_x=0 max_x=0 min_y=0 max_y=0 min_z=0 max_z=0 value=-0.00205417
            SimbodyTranslationDof tz:
              Value:
                Constant: min_x=0 max_x=0 min_y=0 max_y=0 min_z=0 max_z=0 value=-0.001109252
            SimbodyRotationDof r1: coordinate=mtp_angle_l axis=(0.5809544 0 0.8139361)
              Value:
                natCubicSpline: min_x=0 max_x=0 min_y=0 max_y=0 min_z=0 max_z=0 x=(-6.283185 6.283185)
                    y=(-6.283185 6.283185)
            SimbodyRotationDof r2: axis=(1 0 0)
              Value:
                Constant: min_x=0 max_x=0 min_y=0 max_y=0 min_z=0 max_z=0 value=0
            SimbodyRotationDof r3: axis=(0 1 0)
              Value:
                Constant: min_x=0 max_x=0 min_y=0 max_y=0 min_z=0 max_z=0 value=0
        SimbodyJoint back: bodies=(pelvis torso)
          DofSet:
            SimbodyTranslationDof tx:
              Value:
                Constant: min_x=0 max_x=0 min_y=0 max_y=0 min_z=0 max_z=0 value=-0.1031749
            SimbodyTranslationDof ty:
              Value:
                Constant: min_x=0 max_x=0 min_y=0 max_y=0 min_z=0 max_z=0 value=0.08350303
            SimbodyTranslationDof tz:
              Value:
                Constant: min_x=0 max_x=0 min_y=0 max_y=0 min_z=0 max_z=0 value=0
            SimbodyRotationDof r1: coordinate=lumbar_extension axis=(0 0 1)
              Value:
                natCubicSpline: min_x=0 max_x=0 min_y=0 max_y=0 min_z=0 max_z=0 x=(-6.283185 6.283185)
                    y=(-6.283185 6.283185)
            SimbodyRotationDof r2: coordinate=lumbar_bending axis=(1 0 0)
              Value:
                natCubicSpline: min_x=0 max_x=0 min_y=0 max_y=0 min_z=0 max_z=0 x=(-6.283185 6.283185)
                    y=(-6.283185 6.283185)
            SimbodyRotationDof r3: coordinate=lumbar_rotation axis=(0 1 0)
              Value:
                natCubicSpline: min_x=0 max_x=0 min_y=0 max_y=0 min_z=0 max_z=0 x=(-6.283185 6.283185)
                    y=(-6.283185 6.283185)
      SimbodyCoordinate [values shared by the 23 below unless stated]: default_value=0 initial_value=0
          tolerance=0.00000001 stiffness=0 clamped=true restraint_active=false
      SimbodyCoordinate pelvis_tx: range=(-5 5) keys=p_key
      SimbodyCoordinate pelvis_ty: default_value=0.93 initial_value=0.93 range=(-1 2) keys=q_key
      SimbodyCoordinate pelvis_tz: range=(-3 3) keys=q_key
      SimbodyCoordinate pelvis_tilt: range=(-1.570796 1.570796) keys=q_key
      SimbodyCoordinate pelvis_list: range=(-1.570796 1.570796) keys=q_key
      SimbodyCoordinate pelvis_rotation: range=(-1.570796 1.570796) keys=q_key
      SimbodyCoordinate hip_flexion_r: range=(-2.094395 2.094395) keys=(h_key leftmouse_button)
      SimbodyCoordinate hip_adduction_r: range=(-2.094395 2.094395) keys=(h_key leftmouse_button)
      SimbodyCoordinate hip_rotation_r: range=(-2.094395 2.094395) keys=(h_key leftmouse_button)
      SimbodyCoordinate knee_angle_r: range=(-2.094395 0.1745329) keys=k_key
      SimbodyCoordinate ankle_angle_r: range=(-1.570796 1.570796) keys=a_key
      SimbodyCoordinate subtalar_angle_r: range=(-1.570796 1.570796) keys=a_key
      SimbodyCoordinate mtp_angle_r: range=(-1.570796 1.570796) keys=t_key
      SimbodyCoordinate hip_flexion_l: range=(-2.094395 2.094395) keys=(h_key leftmouse_button)
      SimbodyCoordinate hip_adduction_l: range=(-2.094395 2.094395) keys=(h_key leftmouse_button)
      SimbodyCoordinate hip_rotation_l: range=(-2.094395 2.094395) keys=(h_key leftmouse_button)
      SimbodyCoordinate knee_angle_l: range=(-2.094395 0.1745329) keys=k_key
      SimbodyCoordinate ankle_angle_l: range=(-1.047198 1.047198) keys=a_key
      SimbodyCoordinate subtalar_angle_l: range=(-1.570796 1.570796) keys=a_key
      SimbodyCoordinate mtp_angle_l: range=(-1.047198 1.047198) keys=t_key
      SimbodyCoordinate lumbar_extension: range=(-1.570796 1.570796) keys=q_key
      SimbodyCoordinate lumbar_bending: range=(-1.570796 1.570796) keys=q_key
      SimbodyCoordinate lumbar_rotation: range=(-1.570796 1.570796) keys=q_key
      ObjectGroup all: members=(pelvis_tx pelvis_ty pelvis_tz pelvis_tilt pelvis_list pelvis_rotation hip_flexion_r hip_adduction_r hip_rotation_r knee_angle_r ankle_angle_r subtalar_angle_r mtp_angle_r hip_flexion_l hip_adduction_l hip_rotation_l knee_angle_l ankle_angle_l subtalar_angle_l mtp_angle_l lumbar_extension lumbar_bending lumbar_rotation)
      SpeedSet:
        SimbodySpeed pelvis_tx_u: default_value=0 coordinate=pelvis_tx
        SimbodySpeed pelvis_ty_u: default_value=0 coordinate=pelvis_ty
        SimbodySpeed pelvis_tz_u: default_value=0 coordinate=pelvis_tz
        SimbodySpeed pelvis_tilt_u: default_value=0 coordinate=pelvis_tilt
        SimbodySpeed pelvis_list_u: default_value=0 coordinate=pelvis_list
        SimbodySpeed pelvis_rotation_u: default_value=0 coordinate=pelvis_rotation
        SimbodySpeed hip_flexion_r_u: default_value=0 coordinate=hip_flexion_r
        SimbodySpeed hip_adduction_r_u: default_value=0 coordinate=hip_adduction_r
        SimbodySpeed hip_rotation_r_u: default_value=0 coordinate=hip_rotation_r
        SimbodySpeed knee_angle_r_u: default_value=0 coordinate=knee_angle_r
        SimbodySpeed ankle_angle_r_u: default_value=0 coordinate=ankle_angle_r
        SimbodySpeed subtalar_angle_r_u: default_value=0 coordinate=subtalar_angle_r
        SimbodySpeed mtp_angle_r_u: default_value=0 coordinate=mtp_angle_r
        SimbodySpeed hip_flexion_l_u: default_value=0 coordinate=hip_flexion_l
        SimbodySpeed hip_adduction_l_u: default_value=0 coordinate=hip_adduction_l
        SimbodySpeed hip_rotation_l_u: default_value=0 coordinate=hip_rotation_l
        SimbodySpeed knee_angle_l_u: default_value=0 coordinate=knee_angle_l
        SimbodySpeed ankle_angle_l_u: default_value=0 coordinate=ankle_angle_l
        SimbodySpeed subtalar_angle_l_u: default_value=0 coordinate=subtalar_angle_l
        SimbodySpeed mtp_angle_l_u: default_value=0 coordinate=mtp_angle_l
        SimbodySpeed lumbar_extension_u: default_value=0 coordinate=lumbar_extension
        SimbodySpeed lumbar_bending_u: default_value=0 coordinate=lumbar_bending
        SimbodySpeed lumbar_rotation_u: default_value=0 coordinate=lumbar_rotation
      MarkerSet:
        Marker Sternum: torso (0.12051 0.3072637 -0.003249279)
        Marker R.Acromium: torso (-0.0006332624 0.4292181 0.1658768)
        Marker L.Acromium: torso (-0.0009926991 0.4403987 -0.1751525)
        Marker Top.Head: torso (0.09619129 0.6956136 0.003753537)
        Marker R.ASIS: pelvis (0.02343129 0.03623238 0.1308421)
        Marker L.ASIS: pelvis (0.02837734 0.02754359 -0.1312588)
        Marker V.Sacral: pelvis (-0.1725239 0.04036845 0.007020881)
        Marker R.Thigh.Upper: femur_r (0.04636128 -0.2198463 0.09178766)
        Marker R.Thigh.Front: femur_r (0.1084951 -0.2814156 -0.0007792204)
        Marker R.Thigh.Rear: femur_r (0.03562866 -0.3404925 0.08184381)
        Marker R.Knee.Lat: femur_r (-0.003238955 -0.4259329 0.06136987)
        Marker R.Knee.Med: femur_r (0.0005391748 -0.4428293 -0.05971795)
        Marker R.Shank.Upper: tibia_r (-0.0273464 -0.05970644 0.07017878)
        Marker R.Shank.Front: tibia_r (0.05100677 -0.09521399 0.01971335)
        Marker R.Shank.Rear: tibia_r (-0.01135499 -0.1451654 0.08028305)
        Marker R.Ankle.Lat: tibia_r (-0.007555449 -0.4304722 0.05550385)
        Marker R.Ankle.Med: tibia_r (0.004551993 -0.416053 -0.03334374)
        Marker R.Heel: calcn_r (-0.02034263 0.0172661 -0.005557349)
        Marker R.Midfoot.Sup: calcn_r (0.1226639 0.03357368 -0.04041107)
        Marker R.Midfoot.Lat: calcn_r (0.1181903 0.006676356 0.06541194)
        Marker R.Toe.Lat: calcn_r (0.2088498 -0.0162007 0.07286776)
        Marker R.Toe.Med: calcn_r (0.2097416 0.003562569 -0.03451786)
        Marker R.Toe.Tip: calcn_r (0.2709035 0.003607988 -0.003126739)
        Marker L.Thigh.Upper: femur_l (0.02345909 -0.2066444 -0.09696868)
        Marker L.Thigh.Front: femur_l (0.1107355 -0.2488316 -0.03264434)
        Marker L.Thigh.Rear: femur_l (0.01577357 -0.3153241 -0.0821572)
        Marker L.Knee.Lat: femur_l (-0.008415425 -0.4456045 -0.06417589)
        Marker L.Knee.Med: femur_l (0.007573453 -0.4457513 0.05101545)
        Marker L.Shank.Upper: tibia_l (-0.005781873 -0.07136457 -0.07944649)
        Marker L.Shank.Front: tibia_l (0.04526205 -0.1213019 -0.03021959)
        Marker L.Shank.Rear: tibia_l (-0.02384682 -0.1143993 -0.0882014)
        Marker L.Ankle.Lat: tibia_l (-0.002540964 -0.4282451 -0.05713247)
        Marker L.Ankle.Med: tibia_l (0.01299683 -0.4052083 0.03300278)
        Marker L.Heel: calcn_l (-0.02224898 0.02734423 0.006685192)
        Marker L.Midfoot.Sup: calcn_l (0.1498296 0.03562774 0.03435694)
        Marker L.Midfoot.Lat: calcn_l (0.1333254 0.01702626 -0.06235072)
        Marker L.Toe.Lat: calcn_l (0.1959659 -0.008023759 -0.06773361)
        Marker L.Toe.Med: calcn_l (0.2117831 0.01165179 0.03257167)
        Marker L.Toe.Tip: calcn_l (0.2615031 0.008007109 0.008434373)
  ActuatorSet:
    Thelen2003Muscle [values shared by the 92 below unless stated]: muscle_model=9 activation_time_constant=0.01
        deactivation_time_constant=0.04 Vmax=10 Vmax0=5 FmaxTendonStrain=0.033 FmaxMuscleStrain=0.6 KshapeActive=0.5
        KshapePassive=4 damping=0.05 Af=0.3 Flen=1.8
    Thelen2003Muscle glut_med1_r: max_isometric_force=819 optimal_fiber_length=0.05640635
        tendon_slack_length=0.08223729 pennation_angle=0.1396263
      MusclePoint P1: pelvis (-0.04180274 0.03114714 0.1238714)
      MusclePoint P2: femur_r (-0.02500983 -0.01342271 0.06367182)
    Thelen2003Muscle glut_med2_r: max_isometric_force=573 optimal_fiber_length=0.08913177
        tendon_slack_length=0.05590513 pennation_angle=0
      MusclePoint P1: pelvis (-0.08760134 0.04559368 0.0784826)
      MusclePoint P2: femur_r (-0.02959879 -0.006653992 0.06045955)
    Thelen2003Muscle glut_med3_r: max_isometric_force=653 optimal_fiber_length=0.06853064
        tendon_slack_length=0.05622483 pennation_angle=0.3316126
      MusclePoint P1: pelvis (-0.1253058 0.01075806 0.06639259)
      MusclePoint P2: femur_r (-0.03544972 -0.005392028 0.05942703)
    Thelen2003Muscle glut_min1_r: max_isometric_force=270 optimal_fiber_length=0.07328921
        tendon_slack_length=0.01724452 pennation_angle=0.1745329
      MusclePoint P1: pelvis (-0.04784775 -0.008196616 0.1081953)
      MusclePoint P2: femur_r (-0.008260128 -0.0119313 0.06424544)
    Thelen2003Muscle glut_min2_r: max_isometric_force=285 optimal_fiber_length=0.06065928
        tendon_slack_length=0.02816324 pennation_angle=0
      MusclePoint P1: pelvis (-0.06485573 -0.006659751 0.1015356)
      MusclePoint P2: femur_r (-0.0110135 -0.0119313 0.06424544)
    Thelen2003Muscle glut_min3_r: max_isometric_force=323 optimal_fiber_length=0.04117692
        tendon_slack_length=0.05526376 pennation_angle=0.01745329
      MusclePoint P1: pelvis (-0.08544972 -0.006454835 0.08770379)
      MusclePoint P2: femur_r (-0.01548774 -0.009522092 0.0630982)
    Thelen2003Muscle semimem_r: max_isometric_force=1288 optimal_fiber_length=0.09098535 tendon_slack_length=0.4082968
        pennation_angle=0.2617994
      MusclePoint P1: pelvis (-0.1221296 -0.09986552 0.0732675)
      MuscleViaPoint P2: tibia_r (-0.0344006 -0.03478612 -0.01869297) range=(-0.5585054 0.1745329)
          coordinate=knee_angle_r
      MusclePoint P3: tibia_r (-0.02669012 -0.04716243 -0.0193454)
    Thelen2003Muscle semiten_r: max_isometric_force=410 optimal_fiber_length=0.2252741 tendon_slack_length=0.2863559
        pennation_angle=0.08726646
      MusclePoint P1: pelvis (-0.1294553 -0.1125805 0.06187421)
      MuscleViaPoint P2: tibia_r (-0.04154762 -0.02826187 -0.02250867) range=(-0.3316126 0.1745329)
          coordinate=knee_angle_r
      MusclePoint P3: tibia_r (-0.03283873 -0.05221378 -0.02261741)
      MusclePoint P4: tibia_r (-0.01117031 -0.07374382 -0.02421881)
      MusclePoint P5: tibia_r (0.002669012 -0.0945028 -0.01907849)
    Thelen2003Muscle bifemlh_r: max_isometric_force=896 optimal_fiber_length=0.1236311 tendon_slack_length=0.369759
        pennation_angle=0
      MusclePoint P1: pelvis (-0.1290557 -0.1050909 0.07114663)
      MusclePoint P2: tibia_r (-0.02975454 -0.03558683 0.02909223)
      MusclePoint P3: tibia_r (-0.02313144 -0.05565384 0.03390634)
    Thelen2003Muscle bifemsh_r: max_isometric_force=804 optimal_fiber_length=0.1914449 tendon_slack_length=0.09848899
        pennation_angle=0.4014257
      MusclePoint P1: femur_r (0.0057362 -0.2421824 0.02684542)
      MusclePoint P2: tibia_r (-0.02975454 -0.03558683 0.02909223)
      MusclePoint P3: tibia_r (-0.02313144 -0.05565384 0.03390634)
    Thelen2003Muscle sar_r: max_isometric_force=156 optimal_fiber_length=0.5742156 tendon_slack_length=0.1104261
        pennation_angle=0
      MusclePoint P1: pelvis (-0.01567603 -0.00133195 0.1272525)
      MusclePoint P2: femur_r (-0.00344172 -0.4093352 -0.0482988)
      MusclePoint P3: tibia_r (-0.005535729 -0.04141911 -0.03944207)
      MusclePoint P4: tibia_r (0.005931138 -0.058224 -0.03786043)
      MusclePoint P5: tibia_r (0.02402111 -0.08303593 -0.02491078)
    Thelen2003Muscle add_long_r: max_isometric_force=627 optimal_fiber_length=0.1570085 tendon_slack_length=0.1251517
        pennation_angle=0.1047198
      MusclePoint P1: pelvis (-0.03237663 -0.08565464 0.01731535)
      MusclePoint P2: femur_r (0.0057362 -0.2421824 0.02684542)
    Thelen2003Muscle add_brev_r: max_isometric_force=429 optimal_fiber_length=0.1490375 tendon_slack_length=0.02241165
        pennation_angle=0
      MusclePoint P1: pelvis (-0.06014267 -0.0937488 0.01680306)
      MusclePoint P2: femur_r (0.001032516 -0.1372099 0.03372886)
    Thelen2003Muscle add_mag1_r: max_isometric_force=381 optimal_fiber_length=0.09866288 tendon_slack_length=0.06804336
        pennation_angle=0.08726646
      MusclePoint P1: pelvis (-0.07499904 -0.1202853 0.02612671)
      MusclePoint P2: femur_r (-0.00516258 -0.1389308 0.03889144)
    Thelen2003Muscle add_mag2_r: max_isometric_force=343 optimal_fiber_length=0.1409897 tendon_slack_length=0.1398245
        pennation_angle=0.05235988
      MusclePoint P1: pelvis (-0.08514235 -0.1221296 0.03155697)
      MusclePoint P2: femur_r (0.006195096 -0.2621443 0.02604235)
    Thelen2003Muscle add_mag3_r: max_isometric_force=488 optimal_fiber_length=0.1522604 tendon_slack_length=0.289411
        pennation_angle=0.08726646
      MusclePoint P1: pelvis (-0.11381 -0.116935 0.05001985)
      MusclePoint P2: femur_r (0.00803068 -0.440196 -0.03051658)
    Thelen2003Muscle tfl_r: max_isometric_force=233 optimal_fiber_length=0.1060379 tendon_slack_length=0.4743801
        pennation_angle=0.05235988
      MusclePoint P1: pelvis (-0.03186435 0.02192595 0.12715)
      MusclePoint P2: femur_r (0.03372886 -0.1141504 0.06849023)
      MusclePoint P3: femur_r (0.006195096 -0.4645175 0.04095647)
      MusclePoint P4: tibia_r (0.005931138 -0.04814107 0.02935913)
    Thelen2003Muscle pect_r: max_isometric_force=266 optimal_fiber_length=0.1116559 tendon_slack_length=0.03684646
        pennation_angle=0
      MusclePoint P1: pelvis (-0.04415927 -0.07868752 0.04620842)
      MusclePoint P2: femur_r (-0.01399633 -0.09430313 0.02902517)
    Thelen2003Muscle grac_r: max_isometric_force=162 optimal_fiber_length=0.3965859 tendon_slack_length=0.1419597
        pennation_angle=0.05235988
      MusclePoint P1: pelvis (-0.07582895 -0.1216173 0.02862668)
      MuscleViaPoint P2: tibia_r (-0.02626506 -0.03153388 -0.03730686) range=(-0.4363323 0.1745329)
          coordinate=knee_angle_r
      MusclePoint P3: tibia_r (-0.019207 -0.05093859 -0.03538912)
      MusclePoint P4: tibia_r (0.005931138 -0.08264052 -0.02253832)
    Thelen2003Muscle glut_max1_r: max_isometric_force=573 optimal_fiber_length=0.151587 tendon_slack_length=0.1334393
        pennation_angle=0.08726646
      MusclePoint P1: pelvis (-0.122437 0.06270411 0.07172039)
      MusclePoint P2: pelvis (-0.1322729 0.001229492 0.09077753)
      MusclePoint P3: femur_r (-0.05242887 -0.02845155 0.04497181)
      MusclePoint P4: femur_r (-0.03177855 -0.06493378 0.05392028)
    Thelen2003Muscle glut_max2_r: max_isometric_force=819 optimal_fiber_length=0.1593947 tendon_slack_length=0.1377084
        pennation_angle=0
      MusclePoint P1: pelvis (-0.1382154 0.01803256 0.05768369)
      MusclePoint P2: pelvis (-0.1409818 -0.05327801 0.09364634)
      MusclePoint P3: femur_r (-0.04887242 -0.06080372 0.03361413)
      MusclePoint P4: femur_r (-0.01789694 -0.1165596 0.04806936)
    Thelen2003Muscle glut_max3_r: max_isometric_force=552 optimal_fiber_length=0.1562884 tendon_slack_length=0.1573737
        pennation_angle=0.08726646
      MusclePoint P1: pelvis (-0.1594242 -0.03217172 0.005942547)
      MusclePoint P2: pelvis (-0.1566578 -0.1077855 0.04129045)
      MusclePoint P3: femur_r (-0.03430248 -0.1194277 0.01548774)
      MusclePoint P4: femur_r (-0.00688344 -0.1627934 0.04715156)
    Thelen2003Muscle iliacus_r: max_isometric_force=1073 optimal_fiber_length=0.1061641 tendon_slack_length=0.1061641
        pennation_angle=0.122173
      MusclePoint P1: pelvis (-0.06905649 0.03739706 0.08749888)
      MusclePoint P2: pelvis (-0.02643409 -0.05635174 0.0830932)
      MuscleViaPoint P3: pelvis (-0.02950782 -0.08247845 0.08360549) range=(-1.570796 0.7853982)
          coordinate=hip_flexion_r
      MusclePoint P4: femur_r (0.001950308 -0.06229513 0.006539268)
      MusclePoint P5: femur_r (-0.02214173 -0.0712436 0.0147994)
    Thelen2003Muscle psoas_r: max_isometric_force=1113 optimal_fiber_length=0.1051723 tendon_slack_length=0.1682757
        pennation_angle=0.1396263
      MusclePoint P1: pelvis (-0.06629013 0.09087998 0.02961028)
      MusclePoint P2: pelvis (-0.02438493 -0.05840089 0.0777654)
      MuscleViaPoint P3: pelvis (-0.02950782 -0.08247845 0.08360549) range=(-1.570796 0.7853982)
          coordinate=hip_flexion_r
      MusclePoint P4: femur_r (0.001835584 -0.05816507 0.004359512)
      MusclePoint P5: femur_r (-0.02156811 -0.06849023 0.0119313)
    Thelen2003Muscle quad_fem_r: max_isometric_force=381 optimal_fiber_length=0.05807418 tendon_slack_length=0.02581075
        pennation_angle=0
      MusclePoint P1: pelvis (-0.1171092 -0.1179288 0.05327801)
      MusclePoint P2: femur_r (-0.04370984 -0.04118592 0.04198898)
    Thelen2003Muscle gem_r: max_isometric_force=164 optimal_fiber_length=0.02609439 tendon_slack_length=0.04240338
        pennation_angle=0
      MusclePoint P1: pelvis (-0.1160846 -0.08401532 0.0731548)
      MusclePoint P2: femur_r (-0.01629081 -0.003785892 0.05082273)
    Thelen2003Muscle peri_r: max_isometric_force=444 optimal_fiber_length=0.02732926 tendon_slack_length=0.1208794
        pennation_angle=0.1745329
      MusclePoint P1: pelvis (-0.143031 0.0003073731 0.02407756)
      MusclePoint P2: pelvis (-0.122232 -0.02827833 0.06731471)
      MusclePoint P3: femur_r (-0.01697915 -0.004130064 0.05013439)
    Thelen2003Muscle rect_fem_r: max_isometric_force=1169 optimal_fiber_length=0.1304623 tendon_slack_length=0.354766
        pennation_angle=0.08726646
      MusclePoint P1: pelvis (-0.03022502 -0.03186435 0.09917906)
      MuscleViaPoint P2: femur_r (0.03831782 -0.4623377 0.002179756) range=(-2.617994 -1.459968)
          coordinate=knee_angle_r
      MovingMusclePoint P3: tibia_r (0.06198665 0.02047078 0.001383932) x_coordinate=knee_angle_r
          y_coordinate=knee_angle_r z_coordinate=knee_angle_r
        XAttachment:
          natCubicSpline: min_x=0 max_x=0 min_y=0 max_y=0 min_z=0 max_z=0
              x=(-2.094395 -1.999973 -1.570796 -1.457524 -1.396263 -1.047198 -0.6981317 -0.5263913 -0.3490659 -0.1745329 0 0.0001745329 0.0003490659 0.02792527 0.08726646 0.1745329 2.094395)
              y=(0.01540168 0.01778731 0.02719239 0.02931599 0.0304085 0.03614982 0.04172301 0.04457268 0.04783562 0.05281671 0.06104876 0.06105797 0.0610672 0.06258172 0.06622507 0.07246216 0.05668989)
        YAttachment:
          natCubicSpline: min_x=0 max_x=0 min_y=0 max_y=0 min_z=0 max_z=0
              x=(-2.094395 -1.999973 -1.570796 -1.457524 -1.396263 -1.047198 -0.6981317 -0.5263913 -0.3490659 -0.1745329 0 0.0001745329 0.0003490659 0.02792527 0.08726646 0.1745329 2.094395)
              y=(0.02314293 0.0234886 0.0248259 0.02498935 0.02502409 0.02463241 0.02395914 0.02357106 0.02315093 0.02250313 0.02074319 0.02074062 0.02073806 0.02028694 0.01895534 0.01577232 -0.06660408)
        ZAttachment:
          natCubicSpline: min_x=0 max_x=0 min_y=0 max_y=0 min_z=0 max_z=0 x=(-2.0944 0.1745)
              y=(0.001383932 0.001383932)
    Thelen2003Muscle vas_med_r: max_isometric_force=1294 optimal_fiber_length=0.1031382 tendon_slack_length=0.1460159
        pennation_angle=0.08726646
      MusclePoint P1: femur_r (0.01606136 -0.2408057 0.02156811)
      MusclePoint P2: femur_r (0.04084174 -0.3176708 0.001032516)
      MuscleViaPoint P3: femur_r (0.04244788 -0.4644028 -0.0143405) range=(-2.617994 -1.210037) coordinate=knee_angle_r
      MuscleViaPoint P4: femur_r (0.03143438 -0.4881506 -0.01502884) range=(-2.617994 -1.780061)
          coordinate=knee_angle_r
      MovingMusclePoint P5: tibia_r (0.05627306 0.02139384 -0.01443244) x_coordinate=knee_angle_r
          y_coordinate=knee_angle_r z_coordinate=knee_angle_r
        XAttachment:
          natCubicSpline: min_x=0 max_x=0 min_y=0 max_y=0 min_z=0 max_z=0
              x=(-2.094395 -1.999973 -1.570796 -1.457524 -1.396263 -1.047198 -0.6981317 -0.5263913 -0.3490659 -0.1745329 0 0.0001745329 0.0003490659 0.02792527 0.08726646 0.1745329 2.094395)
              y=(0.009698365 0.01208399 0.02148762 0.02361096 0.02470343 0.03044245 0.03600075 0.03883616 0.04207691 0.04703038 0.05531637 0.05532576 0.05533515 0.05688147 0.06063282 0.06717044 0.06221089)
        YAttachment:
          natCubicSpline: min_x=0 max_x=0 min_y=0 max_y=0 min_z=0 max_z=0
              x=(-2.094395 -1.999973 -1.570796 -1.457524 -1.396263 -1.047198 -0.6981317 -0.5263913 -0.3490659 -0.1745329 0 0.0001745329 0.0003490659 0.02792527 0.08726646 0.1745329 2.094395)
              y=(0.02215813 0.02250381 0.02384958 0.02401451 0.0240495 0.02367142 0.02309118 0.02280293 0.02257216 0.0223764 0.02154156 0.02154022 0.02153887 0.02128931 0.0204468 0.01811654 -0.06486734)
        ZAttachment:
          natCubicSpline: min_x=0 max_x=0 min_y=0 max_y=0 min_z=0 max_z=0 x=(-2.094395 2.094395)
              y=(-0.01443244 -0.01443244)
    Thelen2003Muscle vas_int_r: max_isometric_force=1365 optimal_fiber_length=0.1013743 tendon_slack_length=0.1584701
        pennation_angle=0.05235988
      MusclePoint P1: femur_r (0.03326996 -0.220729 0.03556444)
      MusclePoint P2: femur_r (0.03843254 -0.2390848 0.03269634)
      MuscleViaPoint P3: femur_r (0.03935033 -0.4623377 0.00630982) range=(-2.617994 -1.42) coordinate=knee_angle_r
      MovingMusclePoint P4: tibia_r (0.05585887 0.02486414 0.001779341) x_coordinate=knee_angle_r
          y_coordinate=knee_angle_r z_coordinate=knee_angle_r
        XAttachment:
          natCubicSpline: min_x=0 max_x=0 min_y=0 max_y=0 min_z=0 max_z=0
              x=(-2.094395 -1.999973 -1.570796 -1.457524 -1.396263 -1.047198 -0.6981317 -0.5263913 -0.3490659 -0.1745329 0 0.0001745329 0.0003490659 0.02792527 0.08726646 0.1745329 2.094395)
              y=(0.008178344 0.01056397 0.01997228 0.02209643 0.02318904 0.02893557 0.0345454 0.03743639 0.04078339 0.04599468 0.05482667 0.05483679 0.05484692 0.05651553 0.06056877 0.0676514 0.0641371)
        YAttachment:
          natCubicSpline: min_x=0 max_x=0 min_y=0 max_y=0 min_z=0 max_z=0
              x=(-2.094395 -1.999973 -1.570796 -1.457524 -1.396263 -1.047198 -0.6981317 -0.5263913 -0.3490659 -0.1745329 0 0.0001745329 0.0003490659 0.02792527 0.08726646 0.1745329 2.094395)
              y=(0.02530524 0.02565091 0.02699894 0.02716426 0.02719932 0.02682484 0.0262687 0.02600533 0.02581893 0.02571437 0.02500204 0.0250008 0.02499956 0.02476505 0.02394117 0.02157825 -0.06778357)
        ZAttachment:
          natCubicSpline: min_x=0 max_x=0 min_y=0 max_y=0 min_z=0 max_z=0 x=(-2.0944 2.0944)
              y=(0.001779341 0.001779341)
    Thelen2003Muscle vas_lat_r: max_isometric_force=1871 optimal_fiber_length=0.09705652 tendon_slack_length=0.1814032
        pennation_angle=0.08726646
      MusclePoint P1: femur_r (0.005506752 -0.2126983 0.04003868)
      MusclePoint P2: femur_r (0.03086076 -0.2972499 0.04692212)
      MuscleViaPoint P3: femur_r (0.04141536 -0.4623377 0.02351842) range=(-2.617994 -1.210037) coordinate=knee_angle_r
      MuscleViaPoint P4: femur_r (0.02902517 -0.4867739 0.02110922) range=(-2.617994 -1.920037) coordinate=knee_angle_r
      MovingMusclePoint P5: tibia_r (0.06017583 0.01912833 0.01631063) x_coordinate=knee_angle_r
          y_coordinate=knee_angle_r z_coordinate=knee_angle_r
        XAttachment:
          natCubicSpline: min_x=0 max_x=0 min_y=0 max_y=0 min_z=0 max_z=0
              x=(-2.094395 -1.999973 -1.570796 -1.457524 -1.396263 -1.047198 -0.6981317 -0.5263913 -0.3490659 -0.1745329 0 0.0001745329 0.0003490659 0.02792527 0.08726646 0.1745329 2.094395)
              y=(0.01412571 0.01651134 0.02591366 0.02803677 0.02912921 0.03486611 0.04040931 0.04322726 0.04643136 0.05127887 0.05926759 0.05927652 0.05928544 0.0607524 0.06428872 0.0703697 0.05770659)
        YAttachment:
          natCubicSpline: min_x=0 max_x=0 min_y=0 max_y=0 min_z=0 max_z=0
              x=(-2.094395 -1.999973 -1.570796 -1.457524 -1.396263 -1.047198 -0.6981317 -0.5263913 -0.3490659 -0.1745329 0 0.0001745329 0.0003490659 0.02792527 0.08726646 0.1745329 2.094395)
              y=(0.02128464 0.02163032 0.02296951 0.02313329 0.02316809 0.02277947 0.02212734 0.02176242 0.02138759 0.02085498 0.0193616 0.01935942 0.01935723 0.01896977 0.01780127 0.01493391 -0.0645922)
        ZAttachment:
          natCubicSpline: min_x=0 max_x=0 min_y=0 max_y=0 min_z=0 max_z=0 x=(-2.094395 2.094395)
              y=(0.01631063 0.01631063)
    Thelen2003Muscle med_gas_r: max_isometric_force=1558 optimal_fiber_length=0.0600858 tendon_slack_length=0.3905577
        pennation_angle=0.296706
      MusclePoint P1: femur_r (-0.02179756 -0.4507506 -0.02696014)
      MuscleViaPoint P2: femur_r (-0.0344172 -0.4614199 -0.02959879) range=(-0.7853982 0.1745329)
          coordinate=knee_angle_r
      MusclePoint P3: calcn_r (0 0.03183963 -0.005443549)
    Thelen2003Muscle lat_gas_r: max_isometric_force=683 optimal_fiber_length=0.06400235 tendon_slack_length=0.380014
        pennation_angle=0.1396263
      MusclePoint P1: femur_r (-0.02523928 -0.4527009 0.03120493)
      MuscleViaPoint P2: femur_r (-0.0344172 -0.460961 0.03143438) range=(-0.7853982 0.1745329) coordinate=knee_angle_r
      MusclePoint P3: calcn_r (0 0.03183963 -0.005443549)
    Thelen2003Muscle soleus_r: max_isometric_force=3549 optimal_fiber_length=0.0502888 tendon_slack_length=0.251444
        pennation_angle=0.4363323
      MusclePoint P1: tibia_r (-0.002372455 -0.1515406 0.007018513)
      MusclePoint P2: calcn_r (0 0.03183963 -0.005443549)
    Thelen2003Muscle tib_post_r: max_isometric_force=1588 optimal_fiber_length=0.03107549 tendon_slack_length=0.3107549
        pennation_angle=0.2094395
      MusclePoint P1: tibia_r (-0.009292116 -0.1332529 0.001878194)
      MusclePoint P2: tibia_r (-0.01423473 -0.4004507 -0.02263718)
      MusclePoint P3: calcn_r (0.04282943 0.03430463 -0.02937462)
      MusclePoint P4: calcn_r (0.07929094 0.01633065 -0.02886108)
    Thelen2003Muscle flex_dig_r: max_isometric_force=310 optimal_fiber_length=0.0344375 tendon_slack_length=0.4051471
        pennation_angle=0.122173
      MusclePoint P1: tibia_r (-0.008204741 -0.2022518 -0.001779341)
      MusclePoint P2: tibia_r (-0.01522325 -0.4004507 -0.01937505)
      MusclePoint P3: calcn_r (0.0447809 0.03235317 -0.02875837)
      MusclePoint P4: calcn_r (0.0727176 0.01807669 -0.02701233)
      MusclePoint P5: calcn_r (0.1702907 -0.008319387 0.01191418)
      MusclePoint P6: toes_r (-0.001951461 -0.008011261 0.01509815)
      MusclePoint P7: toes_r (0.02927192 -0.007292302 0.02208232)
      MusclePoint P8: toes_r (0.04529444 -0.006162509 0.02485545)
    Thelen2003Muscle flex_hal_r: max_isometric_force=322 optimal_fiber_length=0.04367407 tendon_slack_length=0.3859569
        pennation_angle=0.1745329
      MusclePoint P1: tibia_r (-0.007809332 -0.2307213 0.02411996)
      MusclePoint P2: tibia_r (-0.01838653 -0.4032185 -0.0172003)
      MusclePoint P3: calcn_r (0.03841297 0.02834754 -0.02475274)
      MusclePoint P4: calcn_r (0.1066114 0.006984176 -0.02629337)
      MusclePoint P5: calcn_r (0.1772748 -0.005443549 -0.02762858)
      MusclePoint P6: toes_r (0.01591981 -0.006573343 -0.02721775)
      MusclePoint P7: toes_r (0.05772216 -0.01047626 -0.01859023)
    Thelen2003Muscle tib_ant_r: max_isometric_force=905 optimal_fiber_length=0.09791263 tendon_slack_length=0.2228012
        pennation_angle=0.08726646
      MusclePoint P1: tibia_r (0.01769456 -0.1605361 0.01136801)
      MusclePoint P2: tibia_r (0.03252241 -0.3905654 -0.01749686)
      MusclePoint P3: calcn_r (0.1197581 0.01828211 -0.03132609)
    Thelen2003Muscle per_brev_r: max_isometric_force=435 optimal_fiber_length=0.05004055 tendon_slack_length=0.1611306
        pennation_angle=0.08726646
      MusclePoint P1: tibia_r (-0.006919661 -0.2615632 0.032127)
      MusclePoint P2: tibia_r (-0.01957276 -0.413598 0.0279752)
      MusclePoint P3: tibia_r (-0.01423473 -0.4245706 0.02856831)
      MusclePoint P4: calcn_r (0.04837569 0.02773129 0.02393108)
      MusclePoint P5: calcn_r (0.06953364 0.02249316 0.03522901)
    Thelen2003Muscle per_long_r: max_isometric_force=943 optimal_fiber_length=0.04918451 tendon_slack_length=0.3462991
        pennation_angle=0.1745329
      MusclePoint P1: tibia_r (0.0004942615 -0.1550004 0.03578453)
      MusclePoint P2: tibia_r (-0.02046243 -0.4156739 0.02827176)
      MusclePoint P3: tibia_r (-0.01601407 -0.4269431 0.02856831)
      MusclePoint P4: calcn_r (0.04498631 0.02362295 0.02269857)
      MusclePoint P5: calcn_r (0.06994447 0.0108871 0.02916921)
      MusclePoint P6: calcn_r (0.08750762 0.007086885 0.0121196)
      MusclePoint P7: calcn_r (0.1235583 0.008730221 -0.01889836)
    Thelen2003Muscle per_tert_r: max_isometric_force=180 optimal_fiber_length=0.07988519 tendon_slack_length=0.1011205
        pennation_angle=0.2268928
      MusclePoint P1: tibia_r (0.000988523 -0.2771818 0.02283488)
      MusclePoint P2: tibia_r (0.02263718 -0.40223 0.01571752)
      MusclePoint P3: calcn_r (0.08802116 0.02341753 0.03070983)
    Thelen2003Muscle ext_dig_r: max_isometric_force=512 optimal_fiber_length=0.102694 tendon_slack_length=0.3473473
        pennation_angle=0.1396263
      MusclePoint P1: tibia_r (0.003163274 -0.136515 0.02728323)
      MusclePoint P2: tibia_r (0.02856831 -0.3961012 0.007117366)
      MusclePoint P3: calcn_r (0.09469722 0.03985089 -0.0001027085)
      MusclePoint P4: calcn_r (0.1659769 0.005648966 0.0133521)
      MusclePoint P5: toes_r (0.0003081254 0.004827298 0.0157144)
      MusclePoint P6: toes_r (0.04549986 -0.0004108339 0.02567712)
    Thelen2003Muscle ext_hal_r: max_isometric_force=162 optimal_fiber_length=0.1119446 tendon_slack_length=0.3075954
        pennation_angle=0.1047198
      MusclePoint P1: tibia_r (0.001186228 -0.174672 0.02253832)
      MusclePoint P2: tibia_r (0.03222585 -0.3939264 -0.008402446)
      MusclePoint P3: calcn_r (0.09962722 0.0399536 -0.02167149)
      MusclePoint P4: calcn_r (0.1328021 0.03173692 -0.02639608)
      MusclePoint P5: calcn_r (0.1780965 0.01427648 -0.02875837)
      MusclePoint P6: toes_r (0.03060713 0.004211048 -0.02516358)
      MusclePoint P7: toes_r (0.05782487 0.003492088 -0.01910378)
    Thelen2003Muscle glut_med1_l: max_isometric_force=819 optimal_fiber_length=0.05640635
        tendon_slack_length=0.08223729 pennation_angle=0.1396263
      MusclePoint P1: pelvis (-0.04180274 0.03114714 -0.1238714)
      MusclePoint P2: femur_l (-0.02500983 -0.01342271 -0.06367182)
    Thelen2003Muscle glut_med2_l: max_isometric_force=573 optimal_fiber_length=0.08913177
        tendon_slack_length=0.05590513 pennation_angle=0
      MusclePoint P1: pelvis (-0.08760134 0.04559368 -0.0784826)
      MusclePoint P2: femur_l (-0.02959879 -0.006653992 -0.06045955)
    Thelen2003Muscle glut_med3_l: max_isometric_force=653 optimal_fiber_length=0.06853064
        tendon_slack_length=0.05622483 pennation_angle=0.3316126
      MusclePoint P1: pelvis (-0.1253058 0.01075806 -0.06639259)
      MusclePoint P2: femur_l (-0.03544972 -0.005392028 -0.05942703)
    Thelen2003Muscle glut_min1_l: max_isometric_force=270 optimal_fiber_length=0.07328921
        tendon_slack_length=0.01724452 pennation_angle=0.1745329
      MusclePoint P1: pelvis (-0.04784775 -0.008196616 -0.1081953)
      MusclePoint P2: femur_l (-0.008260128 -0.0119313 -0.06424544)
    Thelen2003Muscle glut_min2_l: max_isometric_force=285 optimal_fiber_length=0.06065928
        tendon_slack_length=0.02816324 pennation_angle=0
      MusclePoint P1: pelvis (-0.06485573 -0.006659751 -0.1015356)
      MusclePoint P2: femur_l (-0.0110135 -0.0119313 -0.06424544)
    Thelen2003Muscle glut_min3_l: max_isometric_force=323 optimal_fiber_length=0.04117692
        tendon_slack_length=0.05526376 pennation_angle=0.01745329
      MusclePoint P1: pelvis (-0.08544972 -0.006454835 -0.08770379)
      MusclePoint P2: femur_l (-0.01548774 -0.009522092 -0.0630982)
    Thelen2003Muscle semimem_l: max_isometric_force=1288 optimal_fiber_length=0.09098535 tendon_slack_length=0.4082968
        pennation_angle=0.2617994
      MusclePoint P1: pelvis (-0.1221296 -0.09986552 -0.0732675)
      MuscleViaPoint P2: tibia_l (-0.0344006 -0.03478612 0.01869297) range=(-0.5585054 0.1745329)
          coordinate=knee_angle_l
      MusclePoint P3: tibia_l (-0.02669012 -0.04716243 0.0193454)
    Thelen2003Muscle semiten_l: max_isometric_force=410 optimal_fiber_length=0.2252741 tendon_slack_length=0.2863559
        pennation_angle=0.08726646
      MusclePoint P1: pelvis (-0.1294553 -0.1125805 -0.06187421)
      MuscleViaPoint P2: tibia_l (-0.04154762 -0.02826187 0.02250867) range=(-0.3316126 0.1745329)
          coordinate=knee_angle_l
      MusclePoint P3: tibia_l (-0.03283873 -0.05221378 0.02261741)
      MusclePoint P4: tibia_l (-0.01117031 -0.07374382 0.02421881)
      MusclePoint P5: tibia_l (0.002669012 -0.0945028 0.01907849)
    Thelen2003Muscle bifemlh_l: max_isometric_force=896 optimal_fiber_length=0.1236311 tendon_slack_length=0.369759
        pennation_angle=0
      MusclePoint P1: pelvis (-0.1290557 -0.1050909 -0.07114663)
      MusclePoint P2: tibia_l (-0.02975454 -0.03558683 -0.02909223)
      MusclePoint P3: tibia_l (-0.02313144 -0.05565384 -0.03390634)
    Thelen2003Muscle bifemsh_l: max_isometric_force=804 optimal_fiber_length=0.1914449 tendon_slack_length=0.09848899
        pennation_angle=0.4014257
      MusclePoint P1: femur_l (0.0057362 -0.2421824 -0.02684542)
      MusclePoint P2: tibia_l (-0.02975454 -0.03558683 -0.02909223)
      MusclePoint P3: tibia_l (-0.02313144 -0.05565384 -0.03390634)
    Thelen2003Muscle sar_l: max_isometric_force=156 optimal_fiber_length=0.5742156 tendon_slack_length=0.1104261
        pennation_angle=0
      MusclePoint P1: pelvis (-0.01567603 -0.00133195 -0.1272525)
      MusclePoint P2: femur_l (-0.00344172 -0.4093352 0.0482988)
      MusclePoint P3: tibia_l (-0.005535729 -0.04141911 0.03944207)
      MusclePoint P4: tibia_l (0.005931138 -0.058224 0.03786043)
      MusclePoint P5: tibia_l (0.02402111 -0.08303593 0.02491078)
    Thelen2003Muscle add_long_l: max_isometric_force=627 optimal_fiber_length=0.1570085 tendon_slack_length=0.1251517
        pennation_angle=0.1047198
      MusclePoint P1: pelvis (-0.03237663 -0.08565464 -0.01731535)
      MusclePoint P2: femur_l (0.0057362 -0.2421824 -0.02684542)
    Thelen2003Muscle add_brev_l: max_isometric_force=429 optimal_fiber_length=0.1490375 tendon_slack_length=0.02241165
        pennation_angle=0
      MusclePoint P1: pelvis (-0.06014267 -0.0937488 -0.01680306)
      MusclePoint P2: femur_l (0.001032516 -0.1372099 -0.03372886)
    Thelen2003Muscle add_mag1_l: max_isometric_force=381 optimal_fiber_length=0.09866288 tendon_slack_length=0.06804336
        pennation_angle=0.08726646
      MusclePoint P1: pelvis (-0.07499904 -0.1202853 -0.02612671)
      MusclePoint P2: femur_l (-0.00516258 -0.1389308 -0.03889144)
    Thelen2003Muscle add_mag2_l: max_isometric_force=343 optimal_fiber_length=0.1409897 tendon_slack_length=0.1398245
        pennation_angle=0.05235988
      MusclePoint P1: pelvis (-0.08514235 -0.1221296 -0.03155697)
      MusclePoint P2: femur_l (0.006195096 -0.2621443 -0.02604235)
    Thelen2003Muscle add_mag3_l: max_isometric_force=488 optimal_fiber_length=0.1522604 tendon_slack_length=0.289411
        pennation_angle=0.08726646
      MusclePoint P1: pelvis (-0.11381 -0.116935 -0.05001985)
      MusclePoint P2: femur_l (0.00803068 -0.440196 0.03051658)
    Thelen2003Muscle tfl_l: max_isometric_force=233 optimal_fiber_length=0.1060379 tendon_slack_length=0.4743801
        pennation_angle=0.05235988
      MusclePoint P1: pelvis (-0.03186435 0.02192595 -0.12715)
      MusclePoint P2: femur_l (0.03372886 -0.1141504 -0.06849023)
      MusclePoint P3: femur_l (0.006195096 -0.4645175 -0.04095647)
      MusclePoint P4: tibia_l (0.005931138 -0.04814107 -0.02935913)
    Thelen2003Muscle pect_l: max_isometric_force=266 optimal_fiber_length=0.1116559 tendon_slack_length=0.03684646
        pennation_angle=0
      MusclePoint P1: pelvis (-0.04415927 -0.07868752 -0.04620842)
      MusclePoint P2: femur_l (-0.01399633 -0.09430313 -0.02902517)
    Thelen2003Muscle grac_l: max_isometric_force=162 optimal_fiber_length=0.3965859 tendon_slack_length=0.1419597
        pennation_angle=0.05235988
      MusclePoint P1: pelvis (-0.07582895 -0.1216173 -0.02862668)
      MuscleViaPoint P2: tibia_l (-0.02626506 -0.03153388 0.03730686) range=(-0.4363323 0.1745329)
          coordinate=knee_angle_l
      MusclePoint P3: tibia_l (-0.019207 -0.05093859 0.03538912)
      MusclePoint P4: tibia_l (0.005931138 -0.08264052 0.02253832)
    Thelen2003Muscle glut_max1_l: max_isometric_force=573 optimal_fiber_length=0.151587 tendon_slack_length=0.1334393
        pennation_angle=0.08726646
      MusclePoint P1: pelvis (-0.122437 0.06270411 -0.07172039)
      MusclePoint P2: pelvis (-0.1322729 0.001229492 -0.09077753)
      MusclePoint P3: femur_l (-0.05242887 -0.02845155 -0.04497181)
      MusclePoint P4: femur_l (-0.03177855 -0.06493378 -0.05392028)
    Thelen2003Muscle glut_max2_l: max_isometric_force=819 optimal_fiber_length=0.1593947 tendon_slack_length=0.1377084
        pennation_angle=0
      MusclePoint P1: pelvis (-0.1382154 0.01803256 -0.05768369)
      MusclePoint P2: pelvis (-0.1409818 -0.05327801 -0.09364634)
      MusclePoint P3: femur_l (-0.04887242 -0.06080372 -0.03361413)
      MusclePoint P4: femur_l (-0.01789694 -0.1165596 -0.04806936)
    Thelen2003Muscle glut_max3_l: max_isometric_force=552 optimal_fiber_length=0.1562884 tendon_slack_length=0.1573737
        pennation_angle=0.08726646
      MusclePoint P1: pelvis (-0.1594242 -0.03217172 -0.005942547)
      MusclePoint P2: pelvis (-0.1566578 -0.1077855 -0.04129045)
      MusclePoint P3: femur_l (-0.03430248 -0.1194277 -0.01548774)
      MusclePoint P4: femur_l (-0.00688344 -0.1627934 -0.04715156)
    Thelen2003Muscle iliacus_l: max_isometric_force=1073 optimal_fiber_length=0.1061641 tendon_slack_length=0.1061641
        pennation_angle=0.122173
      MusclePoint P1: pelvis (-0.06905649 0.03739706 -0.08749888)
      MusclePoint P2: pelvis (-0.02643409 -0.05635174 -0.0830932)
      MuscleViaPoint P3: pelvis (-0.02950782 -0.08247845 -0.08360549) range=(-1.570796 0.7853982)
          coordinate=hip_flexion_l
      MusclePoint P4: femur_l (0.001950308 -0.06229513 -0.006539268)
      MusclePoint P5: femur_l (-0.02214173 -0.0712436 -0.0147994)
    Thelen2003Muscle psoas_l: max_isometric_force=1113 optimal_fiber_length=0.1051723 tendon_slack_length=0.1682757
        pennation_angle=0.1396263
      MusclePoint P1: pelvis (-0.06629013 0.09087998 -0.02961028)
      MusclePoint P2: pelvis (-0.02438493 -0.05840089 -0.0777654)
      MuscleViaPoint P3: pelvis (-0.02950782 -0.08247845 -0.08360549) range=(-1.570796 0.7853982)
          coordinate=hip_flexion_l
      MusclePoint P4: femur_l (0.001835584 -0.05816507 -0.004359512)
      MusclePoint P5: femur_l (-0.02156811 -0.06849023 -0.0119313)
    Thelen2003Muscle quad_fem_l: max_isometric_force=381 optimal_fiber_length=0.05807418 tendon_slack_length=0.02581075
        pennation_angle=0
      MusclePoint P1: pelvis (-0.1171092 -0.1179288 -0.05327801)
      MusclePoint P2: femur_l (-0.04370984 -0.04118592 -0.04198898)
    Thelen2003Muscle gem_l: max_isometric_force=164 optimal_fiber_length=0.02609439 tendon_slack_length=0.04240338
        pennation_angle=0
      MusclePoint P1: pelvis (-0.1160846 -0.08401532 -0.0731548)
      MusclePoint P2: femur_l (-0.01629081 -0.003785892 -0.05082273)
    Thelen2003Muscle peri_l: max_isometric_force=444 optimal_fiber_length=0.02732926 tendon_slack_length=0.1208794
        pennation_angle=0.1745329
      MusclePoint P1: pelvis (-0.143031 0.0003073731 -0.02407756)
      MusclePoint P2: pelvis (-0.122232 -0.02827833 -0.06731471)
      MusclePoint P3: femur_l (-0.01697915 -0.004130064 -0.05013439)
    Thelen2003Muscle rect_fem_l: max_isometric_force=1169 optimal_fiber_length=0.1304623 tendon_slack_length=0.354766
        pennation_angle=0.08726646
      MusclePoint P1: pelvis (-0.03022502 -0.03186435 -0.09917906)
      MuscleViaPoint P2: femur_l (0.03831782 -0.4623377 -0.002179756) range=(-2.617994 -1.459968)
          coordinate=knee_angle_l
      MovingMusclePoint P3: tibia_l (0.05874538 0.02133741 -0.001383932) x_coordinate=knee_angle_l
          y_coordinate=knee_angle_l z_coordinate=knee_angle_l
        XAttachment:
          natCubicSpline: min_x=0 max_x=0 min_y=0 max_y=0 min_z=0 max_z=0
              x=(-2.094395 -1.999973 -1.570796 -1.457524 -1.396263 -1.047198 -0.6981317 -0.5263913 -0.3490659 -0.1745329 0 0.0001745329 0.0003490659 0.02792527 0.08726646 0.1745329 2.094395)
              y=(0.01540168 0.01778731 0.02719239 0.02931599 0.0304085 0.03614982 0.04172301 0.04457268 0.04783562 0.05281671 0.06104876 0.06105797 0.0610672 0.06258172 0.06622507 0.07246216 0.05668989)
        YAttachment:
          natCubicSpline: min_x=0 max_x=0 min_y=0 max_y=0 min_z=0 max_z=0
              x=(-2.094395 -1.999973 -1.570796 -1.457524 -1.396263 -1.047198 -0.6981317 -0.5263913 -0.3490659 -0.1745329 0 0.0001745329 0.0003490659 0.02792527 0.08726646 0.1745329 2.094395)
              y=(0.02314293 0.0234886 0.0248259 0.02498935 0.02502409 0.02463241 0.02395914 0.02357106 0.02315093 0.02250313 0.02074319 0.02074062 0.02073806 0.02028694 0.01895534 0.01577232 -0.06660408)
        ZAttachment:
          natCubicSpline: min_x=0 max_x=0 min_y=0 max_y=0 min_z=0 max_z=0 x=(-2.0944 0.1745)
              y=(-0.001383932 -0.001383932)
    Thelen2003Muscle vas_med_l: max_isometric_force=1294 optimal_fiber_length=0.1031382 tendon_slack_length=0.1460159
        pennation_angle=0.08726646
      MusclePoint P1: femur_l (0.01606136 -0.2408057 -0.02156811)
      MusclePoint P2: femur_l (0.04084174 -0.3176708 -0.001032516)
      MuscleViaPoint P3: femur_l (0.04244788 -0.4644028 0.0143405) range=(-2.617994 -1.210037) coordinate=knee_angle_l
      MuscleViaPoint P4: femur_l (0.03143438 -0.4881506 0.01502884) range=(-2.617994 -1.780061) coordinate=knee_angle_l
      MovingMusclePoint P5: tibia_l (0.0529795 0.02184593 0.01443244) x_coordinate=knee_angle_l
          y_coordinate=knee_angle_l z_coordinate=knee_angle_l
        XAttachment:
          natCubicSpline: min_x=0 max_x=0 min_y=0 max_y=0 min_z=0 max_z=0
              x=(-2.094395 -1.999973 -1.570796 -1.457524 -1.396263 -1.047198 -0.6981317 -0.5263913 -0.3490659 -0.1745329 0 0.0001745329 0.0003490659 0.02792527 0.08726646 0.1745329 2.094395)
              y=(0.009698365 0.01208399 0.02148762 0.02361096 0.02470343 0.03044245 0.03600075 0.03883616 0.04207691 0.04703038 0.05531637 0.05532576 0.05533515 0.05688147 0.06063282 0.06717044 0.06221089)
        YAttachment:
          natCubicSpline: min_x=0 max_x=0 min_y=0 max_y=0 min_z=0 max_z=0
              x=(-2.094395 -1.999973 -1.570796 -1.457524 -1.396263 -1.047198 -0.6981317 -0.5263913 -0.3490659 -0.1745329 0 0.0001745329 0.0003490659 0.02792527 0.08726646 0.1745329 2.094395)
              y=(0.02215813 0.02250381 0.02384958 0.02401451 0.0240495 0.02367142 0.02309118 0.02280293 0.02257216 0.0223764 0.02154156 0.02154022 0.02153887 0.02128931 0.0204468 0.01811654 -0.06486734)
        ZAttachment:
          natCubicSpline: min_x=0 max_x=0 min_y=0 max_y=0 min_z=0 max_z=0 x=(-2.094395 2.094395)
              y=(0.01443244 0.01443244)
    Thelen2003Muscle vas_int_l: max_isometric_force=1365 optimal_fiber_length=0.100826 tendon_slack_length=0.157613
        pennation_angle=0.05235988
      MusclePoint P1: femur_l (0.03326996 -0.220729 -0.03556444)
      MusclePoint P2: femur_l (0.03843254 -0.2390848 -0.03269634)
      MuscleViaPoint P3: femur_l (0.03935033 -0.4623377 -0.00630982) range=(-2.617994 -1.42) coordinate=knee_angle_l
      MovingMusclePoint P4: tibia_l (0.05874538 0.02133741 -0.001383932) x_coordinate=knee_angle_l
          y_coordinate=knee_angle_l z_coordinate=knee_angle_l
        XAttachment:
          natCubicSpline: min_x=0 max_x=0 min_y=0 max_y=0 min_z=0 max_z=0
              x=(-2.094395 -1.999973 -1.570796 -1.457524 -1.396263 -1.047198 -0.6981317 -0.5263913 -0.3490659 -0.1745329 0 0.0001745329 0.0003490659 0.02792527 0.08726646 0.1745329 2.094395)
              y=(0.01540168 0.01778731 0.02719239 0.02931599 0.0304085 0.03614982 0.04172301 0.04457268 0.04783562 0.05281671 0.06104876 0.06105797 0.0610672 0.06258172 0.06622507 0.07246216 0.05668989)
        YAttachment:
          natCubicSpline: min_x=0 max_x=0 min_y=0 max_y=0 min_z=0 max_z=0
              x=(-2.094395 -1.999973 -1.570796 -1.457524 -1.396263 -1.047198 -0.6981317 -0.5263913 -0.3490659 -0.1745329 0 0.0001745329 0.0003490659 0.02792527 0.08726646 0.1745329 2.094395)
              y=(0.02314293 0.0234886 0.0248259 0.02498935 0.02502409 0.02463241 0.02395914 0.02357106 0.02315093 0.02250313 0.02074319 0.02074062 0.02073806 0.02028694 0.01895534 0.01577232 -0.06660408)
        ZAttachment:
          natCubicSpline: min_x=0 max_x=0 min_y=0 max_y=0 min_z=0 max_z=0 x=(-2.0944 0.1745)
              y=(-0.001383932 -0.001383932)
    Thelen2003Muscle vas_lat_l: max_isometric_force=1871 optimal_fiber_length=0.09705652 tendon_slack_length=0.1814032
        pennation_angle=0.08726646
      MusclePoint P1: femur_l (0.005506752 -0.2126983 -0.04003868)
      MusclePoint P2: femur_l (0.03086076 -0.2972499 -0.04692212)
      MuscleViaPoint P3: femur_l (0.04141536 -0.4623377 -0.02351842) range=(-2.617994 -1.210037)
          coordinate=knee_angle_l
      MuscleViaPoint P4: femur_l (0.02902517 -0.4867739 -0.02110922) range=(-2.617994 -1.920037)
          coordinate=knee_angle_l
      MovingMusclePoint P5: tibia_l (0.05703594 0.01986768 -0.01631063) x_coordinate=knee_angle_l
          y_coordinate=knee_angle_l z_coordinate=knee_angle_l
        XAttachment:
          natCubicSpline: min_x=0 max_x=0 min_y=0 max_y=0 min_z=0 max_z=0
              x=(-2.094395 -1.999973 -1.570796 -1.457524 -1.396263 -1.047198 -0.6981317 -0.5263913 -0.3490659 -0.1745329 0 0.0001745329 0.0003490659 0.02792527 0.08726646 0.1745329 2.094395)
              y=(0.01412571 0.01651134 0.02591366 0.02803677 0.02912921 0.03486611 0.04040931 0.04322726 0.04643136 0.05127887 0.05926759 0.05927652 0.05928544 0.0607524 0.06428872 0.0703697 0.05770659)
        YAttachment:
          natCubicSpline: min_x=0 max_x=0 min_y=0 max_y=0 min_z=0 max_z=0
              x=(-2.094395 -1.999973 -1.570796 -1.457524 -1.396263 -1.047198 -0.6981317 -0.5263913 -0.3490659 -0.1745329 0 0.0001745329 0.0003490659 0.02792527 0.08726646 0.1745329 2.094395)
              y=(0.02128464 0.02163032 0.02296951 0.02313329 0.02316809 0.02277947 0.02212734 0.02176242 0.02138759 0.02085498 0.0193616 0.01935942 0.01935723 0.01896977 0.01780127 0.01493391 -0.0645922)
        ZAttachment:
          natCubicSpline: min_x=0 max_x=0 min_y=0 max_y=0 min_z=0 max_z=0 x=(-2.094395 2.094395)
              y=(-0.01631063 -0.01631063)
    Thelen2003Muscle med_gas_l: max_isometric_force=1558 optimal_fiber_length=0.0600858 tendon_slack_length=0.3905577
        pennation_angle=0.296706
      MusclePoint P1: femur_l (-0.02179756 -0.4507506 0.02696014)
      MuscleViaPoint P2: femur_l (-0.0344172 -0.4614199 0.02959879) range=(-0.7853982 0.1745329)
          coordinate=knee_angle_l
      MusclePoint P3: calcn_l (0 0.03183963 0.005443549)
    Thelen2003Muscle lat_gas_l: max_isometric_force=683 optimal_fiber_length=0.06400235 tendon_slack_length=0.380014
        pennation_angle=0.1396263
      MusclePoint P1: femur_l (-0.02523928 -0.4527009 -0.03120493)
      MuscleViaPoint P2: femur_l (-0.0344172 -0.460961 -0.03143438) range=(-0.7853982 0.1745329)
          coordinate=knee_angle_l
      MusclePoint P3: calcn_l (0 0.03183963 0.005443549)
    Thelen2003Muscle soleus_l: max_isometric_force=3549 optimal_fiber_length=0.0502888 tendon_slack_length=0.251444
        pennation_angle=0.4363323
      MusclePoint P1: tibia_l (-0.002372455 -0.1515406 -0.007018513)
      MusclePoint P2: calcn_l (0 0.03183963 0.005443549)
    Thelen2003Muscle tib_post_l: max_isometric_force=1588 optimal_fiber_length=0.03107549 tendon_slack_length=0.3107549
        pennation_angle=0.2094395
      MusclePoint P1: tibia_l (-0.009292116 -0.1332529 -0.001878194)
      MusclePoint P2: tibia_l (-0.01423473 -0.4004507 0.02263718)
      MusclePoint P3: calcn_l (0.04282943 0.03430463 0.02937462)
      MusclePoint P4: calcn_l (0.07929094 0.01633065 0.02886108)
    Thelen2003Muscle flex_dig_l: max_isometric_force=310 optimal_fiber_length=0.0344375 tendon_slack_length=0.4051471
        pennation_angle=0.122173
      MusclePoint P1: tibia_l (-0.008204741 -0.2022518 0.001779341)
      MusclePoint P2: tibia_l (-0.01522325 -0.4004507 0.01937505)
      MusclePoint P3: calcn_l (0.0447809 0.03235317 0.02875837)
      MusclePoint P4: calcn_l (0.0727176 0.01807669 0.02701233)
      MusclePoint P5: calcn_l (0.1702907 -0.008319387 -0.01191418)
      MusclePoint P6: toes_l (-0.001951461 -0.008011261 -0.01509815)
      MusclePoint P7: toes_l (0.02927192 -0.007292302 -0.02208232)
      MusclePoint P8: toes_l (0.04529444 -0.006162509 -0.02485545)
    Thelen2003Muscle flex_hal_l: max_isometric_force=322 optimal_fiber_length=0.04367407 tendon_slack_length=0.3859569
        pennation_angle=0.1745329
      MusclePoint P1: tibia_l (-0.007809332 -0.2307213 -0.02411996)
      MusclePoint P2: tibia_l (-0.01838653 -0.4032185 0.0172003)
      MusclePoint P3: calcn_l (0.03841297 0.02834754 0.02475274)
      MusclePoint P4: calcn_l (0.1066114 0.006984176 0.02629337)
      MusclePoint P5: calcn_l (0.1772748 -0.005443549 0.02762858)
      MusclePoint P6: toes_l (0.01591981 -0.006573343 0.02721775)
      MusclePoint P7: toes_l (0.05772216 -0.01047626 0.01859023)
    Thelen2003Muscle tib_ant_l: max_isometric_force=905 optimal_fiber_length=0.09791263 tendon_slack_length=0.2228012
        pennation_angle=0.08726646
      MusclePoint P1: tibia_l (0.01769456 -0.1605361 -0.01136801)
      MusclePoint P2: tibia_l (0.03252241 -0.3905654 0.01749686)
      MusclePoint P3: calcn_l (0.1197581 0.01828211 0.03132609)
    Thelen2003Muscle per_brev_l: max_isometric_force=435 optimal_fiber_length=0.05004055 tendon_slack_length=0.1611306
        pennation_angle=0.08726646
      MusclePoint P1: tibia_l (-0.006919661 -0.2615632 -0.032127)
      MusclePoint P2: tibia_l (-0.01957276 -0.413598 -0.0279752)
      MusclePoint P3: tibia_l (-0.01423473 -0.4245706 -0.02856831)
      MusclePoint P4: calcn_l (0.04837569 0.02773129 -0.02393108)
      MusclePoint P5: calcn_l (0.06953364 0.02249316 -0.03522901)
    Thelen2003Muscle per_long_l: max_isometric_force=943 optimal_fiber_length=0.04918451 tendon_slack_length=0.3462991
        pennation_angle=0.1745329
      MusclePoint P1: tibia_l (0.0004942615 -0.1550004 -0.03578453)
      MusclePoint P2: tibia_l (-0.02046243 -0.4156739 -0.02827176)
      MusclePoint P3: tibia_l (-0.01601407 -0.4269431 -0.02856831)
      MusclePoint P4: calcn_l (0.04498631 0.02362295 -0.02269857)
      MusclePoint P5: calcn_l (0.06994447 0.0108871 -0.02916921)
      MusclePoint P6: calcn_l (0.08750762 0.007086885 -0.0121196)
      MusclePoint P7: calcn_l (0.1235583 0.008730221 0.01889836)
    Thelen2003Muscle per_tert_l: max_isometric_force=180 optimal_fiber_length=0.07988519 tendon_slack_length=0.1011205
        pennation_angle=0.2268928
      MusclePoint P1: tibia_l (0.000988523 -0.2771818 -0.02283488)
      MusclePoint P2: tibia_l (0.02263718 -0.40223 -0.01571752)
      MusclePoint P3: calcn_l (0.08802116 0.02341753 -0.03070983)
    Thelen2003Muscle ext_dig_l: max_isometric_force=512 optimal_fiber_length=0.102694 tendon_slack_length=0.3473473
        pennation_angle=0.1396263
      MusclePoint P1: tibia_l (0.003163274 -0.136515 -0.02728323)
      MusclePoint P2: tibia_l (0.02856831 -0.3961012 -0.007117366)
      MusclePoint P3: calcn_l (0.09469722 0.03985089 0.0001027085)
      MusclePoint P4: calcn_l (0.1659769 0.005648966 -0.0133521)
      MusclePoint P5: toes_l (0.0003081254 0.004827298 -0.0157144)
      MusclePoint P6: toes_l (0.04549986 -0.0004108339 -0.02567712)
    Thelen2003Muscle ext_hal_l: max_isometric_force=162 optimal_fiber_length=0.1119446 tendon_slack_length=0.3075954
        pennation_angle=0.1047198
      MusclePoint P1: tibia_l (0.001186228 -0.174672 -0.02253832)
      MusclePoint P2: tibia_l (0.03222585 -0.3939264 0.008402446)
      MusclePoint P3: calcn_l (0.09962722 0.0399536 0.02167149)
      MusclePoint P4: calcn_l (0.1328021 0.03173692 0.02639608)
      MusclePoint P5: calcn_l (0.1780965 0.01427648 0.02875837)
      MusclePoint P6: toes_l (0.03060713 0.004211048 0.02516358)
      MusclePoint P7: toes_l (0.05782487 0.003492088 0.01910378)
    Thelen2003Muscle ercspn_r: max_isometric_force=2500 optimal_fiber_length=0.1278847 tendon_slack_length=0.03197118
        pennation_angle=0
      MusclePoint P1: pelvis (-0.1434408 0.04497893 0.04467156)
      MusclePoint P2: torso (-0.05938459 0.1187692 0.02602125)
    Thelen2003Muscle ercspn_l: max_isometric_force=2500 optimal_fiber_length=0.1278847 tendon_slack_length=0.03197118
        pennation_angle=0
      MusclePoint P1: pelvis (-0.1434408 0.04497893 -0.04467156)
      MusclePoint P2: torso (-0.05938459 0.1187692 -0.02602125)
    Thelen2003Muscle intobl_r: max_isometric_force=900 optimal_fiber_length=0.106202 tendon_slack_length=0.106202
        pennation_angle=0
      MusclePoint P1: pelvis (-0.04098308 0.07172039 0.1185436)
      MusclePoint P2: torso (0.07558039 0.1727552 0.0161958)
    Thelen2003Muscle intobl_l: max_isometric_force=900 optimal_fiber_length=0.106202 tendon_slack_length=0.106202
        pennation_angle=0
      MusclePoint P1: pelvis (-0.04098308 0.07172039 -0.1185436)
      MusclePoint P2: torso (0.07558039 0.1727552 -0.0161958)
    Thelen2003Muscle extobl_r: max_isometric_force=900 optimal_fiber_length=0.1263775 tendon_slack_length=0.1474404
        pennation_angle=0
      MusclePoint P1: pelvis (-0.03073731 -0.0651631 0.01024577)
      MusclePoint P2: torso (0.07018179 0.1187692 0.1187692)
    Thelen2003Muscle extobl_l: max_isometric_force=900 optimal_fiber_length=0.1263775 tendon_slack_length=0.1474404
        pennation_angle=0
      MusclePoint P1: pelvis (-0.03073731 -0.0651631 -0.01024577)
      MusclePoint P2: torso (0.07018179 0.1187692 -0.1187692)
    ObjectGroup R_hip_abd: members=(glut_max1_r glut_med1_r glut_med2_r glut_med3_r glut_min1_r glut_min2_r glut_min3_r peri_r sar_r tfl_r)
    ObjectGroup R_hip_flex: members=(add_brev_r add_long_r glut_med1_r glut_min1_r grac_r iliacus_r pect_r psoas_r rect_fem_r sar_r tfl_r)
    ObjectGroup R_hip_inrot: members=(glut_med1_r glut_min1_r iliacus_r psoas_r tfl_r)
    ObjectGroup R_hip_exrot: members=(gem_r glut_med3_r glut_min3_r peri_r quad_fem_r)
    ObjectGroup R_hip_ext: members=(add_long_r add_mag1_r add_mag2_r add_mag3_r bifemlh_r glut_max1_r glut_max2_r glut_max3_r glut_med3_r glut_min3_r semimem_r semiten_r)
    ObjectGroup R_hip_add: members=(add_brev_r add_long_r add_mag1_r add_mag2_r add_mag3_r bifemlh_r grac_r pect_r semimem_r semiten_r)
    ObjectGroup R_knee_bend: members=(bifemlh_r bifemsh_r grac_r lat_gas_r med_gas_r sar_r semimem_r semiten_r)
    ObjectGroup R_knee_ext: members=(rect_fem_r vas_int_r vas_lat_r vas_med_r)
    ObjectGroup R_ankle_pf: members=(flex_dig_r flex_hal_r lat_gas_r med_gas_r per_brev_r per_long_r soleus_r tib_post_r)
    ObjectGroup R_inverter: members=(ext_hal_r flex_dig_r flex_hal_r tib_ant_r tib_post_r)
    ObjectGroup R_ankle_df: members=(ext_dig_r ext_hal_r per_tert_r tib_ant_r)
    ObjectGroup R_everter: members=(ext_dig_r per_brev_r per_long_r per_tert_r)
    ObjectGroup L_hip_abd: members=(glut_max1_l glut_med1_l glut_med2_l glut_med3_l glut_min1_l glut_min2_l glut_min3_l peri_l sar_l tfl_l)
    ObjectGroup L_hip_flex: members=(add_brev_l add_long_l glut_med1_l glut_min1_l grac_l iliacus_l pect_l psoas_l rect_fem_l sar_l tfl_l)
    ObjectGroup L_hip_inrot: members=(glut_med1_l glut_min1_l iliacus_l psoas_l tfl_l)
    ObjectGroup L_hip_exrot: members=(gem_l glut_med3_l glut_min3_l peri_l quad_fem_l)
    ObjectGroup L_hip_ext: members=(add_long_l add_mag1_l add_mag2_l add_mag3_l bifemlh_l glut_max1_l glut_max2_l glut_max3_l glut_med3_l glut_min3_l semimem_l semiten_l)
    ObjectGroup L_hip_add: members=(add_brev_l add_long_l add_mag1_l add_mag2_l add_mag3_l bifemlh_l grac_l pect_l semimem_l semiten_l)
    ObjectGroup L_knee_bend: members=(bifemlh_l bifemsh_l grac_l lat_gas_l med_gas_l sar_l semimem_l semiten_l)
    ObjectGroup L_knee_ext: members=(rect_fem_l vas_int_l vas_lat_l vas_med_l)
    ObjectGroup L_ankle_pf: members=(flex_dig_l flex_hal_l lat_gas_l med_gas_l per_brev_l per_long_l soleus_l tib_post_l)
    ObjectGroup L_inverter: members=(ext_hal_l flex_dig_l flex_hal_l tib_ant_l tib_post_l)
    ObjectGroup L_ankle_df: members=(ext_dig_l ext_hal_l per_tert_l tib_ant_l)
    ObjectGroup L_everter: members=(ext_dig_l per_brev_l per_long_l per_tert_l)
    ObjectGroup back_ext: members=(ercspn_l ercspn_r)
    ObjectGroup back_rlb: members=(ercspn_r extobl_r intobl_r)
    ObjectGroup back_introt: members=(ercspn_r extobl_l intobl_r)
    ObjectGroup back_llb: members=(ercspn_l extobl_l intobl_l)
    ObjectGroup back_extrot: members=(ercspn_l extobl_r intobl_l)
    ObjectGroup back_flex: members=(extobl_l extobl_r intobl_l intobl_r)
