Model Tug_of_War:
  angle_units: radians
  defaults: Schutte1993Muscle default: muscle_model=4 time_scale=0.1 activation1=0.01 activation2=0.04
      max_isometric_force=1000 optimal_fiber_length=0.1 tendon_slack_length=0.2 pennation_angle=0
      max_contraction_velocity=10 damping=0.05
    tendon_force_length_curve: natCubicSpline: min_x=0 max_x=0 min_y=0 max_y=0 min_z=0 max_z=0
        x=(-10 -0.002 -0.001 0 0.00131 0.00281 0.00431 0.00581 0.00731 0.00881 0.0103 0.0118 0.0123 9.2 9.201 9.202 20)
        y=(0 0 0 0 0.0108 0.0257 0.0435 0.0652 0.0915 0.123 0.161 0.208 0.227 345 345 345 345)
    active_force_length_curve: natCubicSpline: min_x=0 max_x=0 min_y=0 max_y=0 min_z=0 max_z=0
        x=(-5.307692 -4.307692 -1.923077 -0.884615 -0.269231 0.230769 0.461538 0.52725 0.62875 0.71875 0.86125 1.045 1.2175 1.43875 1.5 1.615385 2 2.961538 3.692308 5.461538 9.901902)
        y=(0.012188 0.021899 0.036466 0.052493 0.075312 0.114158 0.157859 0.226667 0.636667 0.856667 0.95 0.993333 0.77 0.246667 0.193821 0.133252 0.072683 0.044417 0.036341 0.021899 0.007332)
    passive_force_length_curve: natCubicSpline: min_x=0 max_x=0 min_y=0 max_y=0 min_z=0 max_z=0
        x=(-5 0.998 0.999 1 1.1 1.2 1.3 1.4 1.5 1.6 1.601 1.602 5) y=(0 0 0 0 0.035 0.12 0.26 0.55 1.17 2 2 2 2)
    force_velocity_curve: natCubicSpline: min_x=0 max_x=0 min_y=0 max_y=0 min_z=0 max_z=0
        x=(-1 -0.95 -0.9 -0.85 -0.8 -0.75 -0.7 -0.65 -0.6 -0.55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)
        y=(0 0.010417 0.021739 0.034091 0.047619 0.0625 0.078947 0.097222 0.117647 0.140625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)
  ActuatorSet:
    Schutte1993Muscle muscle_1:
      MusclePoint P1: ground (0 0.05 -0.35)
      MusclePoint P2: block (0 0.05 0.05)
    Schutte1993Muscle muscle_2:
      MusclePoint P1: ground (0 0.05 0.35)
      MusclePoint P2: block (0 0.05 0.05)
  DynamicsEngine:
    SimbodyEngine: gravity=(0 0 0)
      BodySet:
        SimbodyBody ground: mass=0 mass_center=(0 0 0) inertia=(0 0 0 0 0 0 0 0 0)
            meshes=(floor_short.vtp large_block_1.vtp large_block_2.vtp)
        SimbodyBody block: mass=20 mass_center=(0 0 0) inertia=(0.001 0 0 0 0.001 0 0 0 0.001) meshes=small_block.vtp
      SimbodyCoordinate block_tz: range=(-0.3 0.3) default_value=0 tolerance=0 stiffness=0 keys=p_key clamped=true
          restraint_active=false
      SpeedSet:
        SimbodySpeed block_tz_u: default_value=0 coordinate=block_tz
      JointSet:
        SimbodyJoint ground_block: bodies=(ground block)
          DofSet:
            SimbodyTranslationDof tx:
              Value: Constant(value=0)
            SimbodyTranslationDof ty:
              Value: Constant(value=0)
            SimbodyTranslationDof tz: coordinate=block_tz
              Value:
                natCubicSpline: x=(-360 360) y=(-360 360)
            SimbodyRotationDof r1: axis=(1 0 0)
              Value: Constant(value=0)
            SimbodyRotationDof r2: axis=(0 1 0)
              Value: Constant(value=0)
            SimbodyRotationDof r3: axis=(0 0 1)
              Value: Constant(value=0)
