# OpenSim document version 10905
Model Sep Legs with Muscles:
  credits: Model authors names..
  publications: List of publications related to model...
  length_units: meters
  force_units: N
  gravity: 0 -9.80665 0
  defaults: Schutte1993Muscle default: time_scale=0 activation1=0 activation2=0 max_isometric_force=0
      optimal_fiber_length=0 tendon_slack_length=0 pennation_angle=0 max_contraction_velocity=0 damping=0.05
    tendon_force_length_curve: NaturalCubicSpline: x=(-10 -0.002 -0.001 0 0.00131 0.00281 0.00431 0.00581 0.00731 0.00881 0.0103 0.0118 0.0123 9.2 9.201 9.202 20)
        y=(0 0 0 0 0.0108 0.0257 0.0435 0.0652 0.0915 0.123 0.161 0.208 0.227 345 345 345 345)
    active_force_length_curve: NaturalCubicSpline: x=(-5 0 0.401 0.402 0.4035 0.52725 0.62875 0.71875 0.86125 1.045 1.2175 1.43875 1.61875 1.62 1.621 2.2 5)
        y=(0 0 0 0 0 0.226667 0.636667 0.856667 0.95 0.993333 0.77 0.246667 0 0 0 0 0)
    passive_force_length_curve: NaturalCubicSpline: x=(-5 0.998 0.999 1 1.1 1.2 1.3 1.4 1.5 1.6 1.601 1.602 5)
        y=(0 0 0 0 0.035 0.12 0.26 0.55 1.17 2 2 2 2)
  ForceSet:
    Schutte1993Muscle [values shared by the 96 below unless stated]: time_scale=0 activation1=0 activation2=0
        max_contraction_velocity=0 damping=0.05
      tendon_force_length_curve: NaturalCubicSpline: x=(-10 -0.002 -0.001 0 0.00131 0.00281 0.00431 0.00581 0.00731 0.00881 0.0103 0.0118 0.0123 9.2 9.201 9.202 20)
          y=(0 0 0 0 0.0108 0.0257 0.0435 0.0652 0.0915 0.123 0.161 0.208 0.227 345 345 345 345)
      active_force_length_curve: NaturalCubicSpline: x=(-5 0 0.401 0.402 0.4035 0.52725 0.62875 0.71875 0.86125 1.045 1.2175 1.43875 1.61875 1.62 1.621 2.2 5)
          y=(0 0 0 0 0 0.226667 0.636667 0.856667 0.95 0.993333 0.77 0.246667 0 0 0 0 0)
      passive_force_length_curve: NaturalCubicSpline: x=(-5 0.998 0.999 1 1.1 1.2 1.3 1.4 1.5 1.6 1.601 1.602 5)
          y=(0 0 0 0 0.035 0.12 0.26 0.55 1.17 2 2 2 2)
    Schutte1993Muscle GMED1: max_isometric_force=546 optimal_fiber_length=0.0535 tendon_slack_length=0.078
        pennation_angle=0.1396263
      PathPoint P1: rpelvis (-0.0408 0.0304 0.1209)
      PathPoint P2: femur2 (-0.0218 -0.0117 0.0555)
    Schutte1993Muscle GMED2: max_isometric_force=382 optimal_fiber_length=0.0845 tendon_slack_length=0.053
        pennation_angle=0
      PathPoint P1: rpelvis (-0.0855 0.0445 0.0766)
      PathPoint P2: femur2 (-0.0258 -0.0058 0.0527)
    Schutte1993Muscle GMED3: max_isometric_force=435 optimal_fiber_length=0.0646 tendon_slack_length=0.053
        pennation_angle=0.3316126
      PathPoint P1: rpelvis (-0.1223 0.0105 0.0648)
      PathPoint P2: femur2 (-0.0309 -0.0047 0.0518)
    Schutte1993Muscle GMIN1: max_isometric_force=180 optimal_fiber_length=0.068 tendon_slack_length=0.016
        pennation_angle=0.1745329
      PathPoint P1: rpelvis (-0.0467 -0.008 0.1056)
      PathPoint P2: femur2 (-0.0072 -0.0104 0.056)
    Schutte1993Muscle GMIN2: max_isometric_force=190 optimal_fiber_length=0.056 tendon_slack_length=0.026
        pennation_angle=0
      PathPoint P1: rpelvis (-0.0633 -0.0065 0.0991)
      PathPoint P2: femur2 (-0.0096 -0.0104 0.056)
    Schutte1993Muscle GMIN3: max_isometric_force=215 optimal_fiber_length=0.038 tendon_slack_length=0.051
        pennation_angle=0.3665191
      PathPoint P1: rpelvis (-0.0834 -0.0063 0.0856)
      PathPoint P2: femur2 (-0.0135 -0.0083 0.055)
    Schutte1993Muscle SEMIMEM: max_isometric_force=1030 optimal_fiber_length=0.08 tendon_slack_length=0.359
        pennation_angle=0.2617994
      PathPoint P1: rpelvis (-0.1192 -0.1015 0.0695)
      PathPoint P2: tibia (-0.0243 -0.0536 -0.0194)
    Schutte1993Muscle SEMITEN: max_isometric_force=328 optimal_fiber_length=0.201 tendon_slack_length=0.262
        pennation_angle=0.08726646
      PathPoint P1: rpelvis (-0.1237 -0.1043 0.0603)
      PathPoint P2: tibia (-0.0314 -0.0545 -0.0146)
      PathPoint P3: tibia (-0.0113 -0.0746 -0.0245)
      PathPoint P4: tibia (0.0027 -0.0956 -0.0193)
    Schutte1993Muscle BIFEMLH: max_isometric_force=717 optimal_fiber_length=0.109 tendon_slack_length=0.341
        pennation_angle=0
      PathPoint P1: rpelvis (-0.1244 -0.1001 0.0666)
      PathPoint P2: tibia (-0.0081 -0.0729 0.0423)
    Schutte1993Muscle HAMSTRINGS: max_isometric_force=2075 optimal_fiber_length=0.109 tendon_slack_length=0.337
        pennation_angle=0.1396263
      PathPoint P1: rpelvis (-0.1217 -0.1015 0.067)
      PathPoint P2: tibia (-0.0198 -0.0604 0.0027)
    Schutte1993Muscle BIFEMSH: max_isometric_force=402 optimal_fiber_length=0.173 tendon_slack_length=0.1
        pennation_angle=0.4014257
      PathPoint P1: femur2 (0.005 -0.2111 0.0234)
      PathPoint P2: tibia (-0.0101 -0.0725 0.0406)
    Schutte1993Muscle SAR: max_isometric_force=104 optimal_fiber_length=0.579 tendon_slack_length=0.04
        pennation_angle=0
      PathPoint P1: rpelvis (-0.0153 -0.0013 0.1242)
      PathPoint P2: femur2 (-0.003 -0.3568 -0.0421)
      PathPoint P3: tibia (-0.0056 -0.0419 -0.0399)
      PathPoint P4: tibia (0.006 -0.0589 -0.0383)
      PathPoint P5: tibia (0.0243 -0.084 -0.0252)
    Schutte1993Muscle RF: max_isometric_force=779 optimal_fiber_length=0.084 tendon_slack_length=0.346
        pennation_angle=0.08726646
      PathPoint P1: rpelvis (-0.0295 -0.0311 0.0968)
      ConditionalPathPoint P2: femur2 (0.0334 -0.403 0.0019) range=(-2.617994 -1.459968) coordinate=r_knee_angle
      PathPoint P3: patella (0.0121 0.0437 -0.001)
    Schutte1993Muscle ADDLONG: max_isometric_force=418 optimal_fiber_length=0.138 tendon_slack_length=0.11
        pennation_angle=0.1047198
      PathPoint P1: rpelvis (-0.0316 -0.0836 0.0169)
      PathPoint P2: femur2 (0.005 -0.2111 0.0234)
    Schutte1993Muscle ADDBREV: max_isometric_force=286 optimal_fiber_length=0.133 tendon_slack_length=0.02
        pennation_angle=0
      PathPoint P1: rpelvis (-0.0587 -0.0915 0.0164)
      PathPoint P2: femur2 (0.0009 -0.1196 0.0294)
    Schutte1993Muscle AMAG1: max_isometric_force=346 optimal_fiber_length=0.087 tendon_slack_length=0.06
        pennation_angle=0.08726646
      PathPoint P1: rpelvis (-0.0732 -0.1174 0.0255)
      PathPoint P2: femur2 (-0.0045 -0.1211 0.0339)
    Schutte1993Muscle AMAG2: max_isometric_force=312 optimal_fiber_length=0.121 tendon_slack_length=0.13
        pennation_angle=0.05235988
      PathPoint P1: rpelvis (-0.0831 -0.1192 0.0308)
      PathPoint P2: femur2 (0.0054 -0.2285 0.0227)
    Schutte1993Muscle AMAG3: max_isometric_force=444 optimal_fiber_length=0.131 tendon_slack_length=0.26
        pennation_angle=0.08726646
      PathPoint P1: rpelvis (-0.0771 -0.1181 0.0276)
      PathPoint P2: femur2 (0.007 -0.3837 -0.0266)
    Schutte1993Muscle TFL: max_isometric_force=155 optimal_fiber_length=0.095 tendon_slack_length=0.425
        pennation_angle=0.05235988
      PathPoint P1: rpelvis (-0.0311 0.0214 0.1241)
      PathPoint P2: femur2 (0.0294 -0.0995 0.0597)
      PathPoint P3: femur2 (0.0054 -0.4049 0.0357)
      PathPoint P4: tibia (0.006 -0.0487 0.0297)
    Schutte1993Muscle PECT: max_isometric_force=177 optimal_fiber_length=0.133 tendon_slack_length=0.001
        pennation_angle=0
      PathPoint P1: rpelvis (-0.0431 -0.0768 0.0451)
      PathPoint P2: femur2 (-0.0122 -0.0822 0.0253)
    Schutte1993Muscle GRA: max_isometric_force=108 optimal_fiber_length=0.352 tendon_slack_length=0.14
        pennation_angle=0.05235988
      PathPoint P1: rpelvis (-0.0563 -0.1038 0.0079)
      PathPoint P2: tibia (-0.0154 -0.0475 -0.0358)
      PathPoint P3: tibia (0.006 -0.0836 -0.0228)
    Schutte1993Muscle GMAX1: max_isometric_force=382 optimal_fiber_length=0.142 tendon_slack_length=0.125
        pennation_angle=0.08726646
      PathPoint P1: rpelvis (-0.1195 0.0612 0.07)
      PathPoint P2: rpelvis (-0.1291 0.0012 0.0886)
      PathPoint P3: femur2 (-0.0457 -0.0248 0.0392)
      PathPoint P4: femur2 (-0.0277 -0.0566 0.047)
    Schutte1993Muscle GMAX2: max_isometric_force=546 optimal_fiber_length=0.147 tendon_slack_length=0.127
        pennation_angle=0
      PathPoint P1: rpelvis (-0.1349 0.0176 0.0563)
      PathPoint P2: rpelvis (-0.1376 -0.052 0.0914)
      PathPoint P3: femur2 (-0.0426 -0.053 0.0293)
      PathPoint P4: femur2 (-0.0156 -0.1016 0.0419)
    Schutte1993Muscle GMAX3: max_isometric_force=368 optimal_fiber_length=0.144 tendon_slack_length=0.145
        pennation_angle=0.08726646
      PathPoint P1: rpelvis (-0.1556 -0.0314 0.0058)
      PathPoint P2: rpelvis (-0.1529 -0.1052 0.0403)
      PathPoint P3: femur2 (-0.0299 -0.1041 0.0135)
      PathPoint P4: femur2 (-0.006 -0.1419 0.0411)
    Schutte1993Muscle ILIACUS: max_isometric_force=429 optimal_fiber_length=0.1 tendon_slack_length=0.09
        pennation_angle=0.1221731
      PathPoint P1: rpelvis (-0.0674 0.0365 0.0854)
      PathPoint P2: rpelvis (-0.0218 -0.055 0.0851)
      PathPoint P3: femur2 (0.0017 -0.0543 0.0057)
      PathPoint P4: femur2 (-0.0193 -0.0621 0.0129)
    Schutte1993Muscle PSOAS: max_isometric_force=371 optimal_fiber_length=0.104 tendon_slack_length=0.13
        pennation_angle=0.1396263
      PathPoint P1: rpelvis (-0.0647 0.0887 0.0289)
      PathPoint P2: rpelvis (-0.0238 -0.057 0.0759)
      PathPoint P3: femur2 (0.0016 -0.0507 0.0038)
      PathPoint P4: femur2 (-0.0188 -0.0597 0.0104)
    Schutte1993Muscle QUADFEM: max_isometric_force=254 optimal_fiber_length=0.054 tendon_slack_length=0.024
        pennation_angle=0
      PathPoint P1: rpelvis (-0.1143 -0.1151 0.052)
      PathPoint P2: femur2 (-0.0381 -0.0359 0.0366)
    Schutte1993Muscle GLEM: max_isometric_force=109 optimal_fiber_length=0.024 tendon_slack_length=0.039
        pennation_angle=0
      PathPoint P1: rpelvis (-0.1133 -0.082 0.0714)
      PathPoint P2: femur2 (-0.0142 -0.0033 0.0443)
    Schutte1993Muscle PERI: max_isometric_force=296 optimal_fiber_length=0.026 tendon_slack_length=0.115
        pennation_angle=0.1745329
      PathPoint P1: rpelvis (-0.1396 0.0003 0.0235)
      PathPoint P2: rpelvis (-0.1193 -0.0276 0.0657)
      PathPoint P3: femur2 (-0.0148 -0.0036 0.0437)
    Schutte1993Muscle VASMED: max_isometric_force=1294 optimal_fiber_length=0.089 tendon_slack_length=0.126
        pennation_angle=0.08726646
      PathPoint P1: femur2 (0.014 -0.2099 0.0188)
      PathPoint P2: femur2 (0.0356 -0.2769 0.0009)
      ConditionalPathPoint P3: femur2 (0.037 -0.4048 -0.0125) range=(-2.617994 -1.209862) coordinate=r_knee_angle
      ConditionalPathPoint P4: femur2 (0.0274 -0.4255 -0.0131) range=(-2.617994 -1.780061) coordinate=r_knee_angle
      PathPoint P5: patella (0.0063 0.0445 -0.017)
    Schutte1993Muscle VASINT: max_isometric_force=1365 optimal_fiber_length=0.087 tendon_slack_length=0.136
        pennation_angle=0.05235988
      PathPoint P1: femur2 (0.029 -0.1924 0.031)
      PathPoint P2: femur2 (0.0335 -0.2084 0.0285)
      ConditionalPathPoint P3: femur2 (0.0343 -0.403 0.0055) range=(-2.617994 -1.42) coordinate=r_knee_angle
      PathPoint P4: patella (0.0058 0.048 -0.0006)
    Schutte1993Muscle VASLAT: max_isometric_force=1871 optimal_fiber_length=0.084 tendon_slack_length=0.157
        pennation_angle=0.08726646
      PathPoint P1: femur2 (0.0048 -0.1854 0.0349)
      PathPoint P2: femur2 (0.0269 -0.2591 0.0409)
      ConditionalPathPoint P3: femur2 (0.0361 -0.403 0.0205) range=(-2.617994 -1.209862) coordinate=r_knee_angle
      ConditionalPathPoint P4: femur2 (0.0253 -0.4243 0.0184) range=(-2.617994 -1.919862) coordinate=r_knee_angle
      PathPoint P5: patella (0.0103 0.0423 0.0141)
    Schutte1993Muscle MEDGAS: max_isometric_force=1113 optimal_fiber_length=0.045 tendon_slack_length=0.408
        pennation_angle=0.296706
      PathPoint P1: femur2 (-0.0127 -0.3929 -0.0235)
      ConditionalPathPoint P2: femur2 (-0.0239 -0.4022 -0.0258) range=(-0.7700393 0.1000074) coordinate=r_knee_angle
      PathPoint P3: tibia (-0.0217 -0.0487 -0.0295)
      PathPoint P4: calcn (0.0044 0.031 -0.0053)
    Schutte1993Muscle LATGAS: max_isometric_force=488 optimal_fiber_length=0.064 tendon_slack_length=0.385
        pennation_angle=0.1396263
      PathPoint P1: femur2 (-0.0155 -0.3946 0.0272)
      ConditionalPathPoint P2: femur2 (-0.0254 -0.4018 0.0274) range=(-0.7700393 0.1000074) coordinate=r_knee_angle
      PathPoint P3: tibia (-0.0242 -0.0481 0.0235)
      PathPoint P4: calcn (0.0044 0.031 -0.0053)
    Schutte1993Muscle GASTROC: max_isometric_force=1601 optimal_fiber_length=0.0508 tendon_slack_length=0.401
        pennation_angle=0.2487094
      PathPoint P1: femur2 (-0.0135 -0.3934 -0.008)
      ConditionalPathPoint P2: femur2 (-0.0244 -0.4021 -0.0096) range=(-0.7700393 0.1000074) coordinate=r_knee_angle
      PathPoint P3: tibia (-0.0225 -0.0485 -0.0133)
      PathPoint P4: calcn (0.0044 0.031 -0.0053)
    Schutte1993Muscle SOL: max_isometric_force=2839 optimal_fiber_length=0.03 tendon_slack_length=0.268
        pennation_angle=0.4363323
      PathPoint P1: tibia (-0.0024 -0.1533 0.0071)
      PathPoint P2: calcn (0.0044 0.031 -0.0053)
    Schutte1993Muscle SOLSTIF: max_isometric_force=2839 optimal_fiber_length=0.03 tendon_slack_length=0.268
        pennation_angle=0.4363323
      PathPoint P1: tibia (-0.0024 -0.1533 0.0071)
      PathPoint P2: calcn (0.0044 0.031 -0.0053)
      tendon_force_length_curve: NaturalCubicSpline: x=(-10 -0.002 -0.001 0 0.00131 0.00281 0.00431 0.00581 0.00731 0.00881 0.0103 0.0118 0.0123 9.2 9.201 9.202 20)
          y=(0 0 0 0 1.08 2.57 4.35 6.52 9.15 12.3 16.1 20.8 22.7 34500 34500 34500 34500)
    Schutte1993Muscle TIBPOST: max_isometric_force=1270 optimal_fiber_length=0.031 tendon_slack_length=0.31
        pennation_angle=0.2094395
      PathPoint P1: tibia (-0.0094 -0.1348 0.0019)
      PathPoint P2: tibia (-0.0144 -0.4051 -0.0229)
      PathPoint P3: calcn (0.0417 0.0334 -0.0286)
      PathPoint P4: calcn (0.0772 0.0159 -0.0281)
    Schutte1993Muscle FLEXDIG: max_isometric_force=310 optimal_fiber_length=0.034 tendon_slack_length=0.4
        pennation_angle=0.1221731
      PathPoint P1: tibia (-0.0083 -0.2046 -0.0018)
      PathPoint P2: tibia (-0.0154 -0.4051 -0.0196)
      PathPoint P3: calcn (0.0436 0.0315 -0.028)
      PathPoint P4: calcn (0.0708 0.0176 -0.0263)
      PathPoint P5: calcn (0.1658 -0.0081 0.0116)
      PathPoint P6: toes (-0.0019 -0.0078 0.0147)
      PathPoint P7: toes (0.0285 -0.0071 0.0215)
      PathPoint P8: toes (0.0441 -0.006 0.0242)
    Schutte1993Muscle FLEXHAL: max_isometric_force=322 optimal_fiber_length=0.043 tendon_slack_length=0.38
        pennation_angle=0.1745329
      PathPoint P1: tibia (-0.0079 -0.2334 0.0244)
      PathPoint P2: tibia (-0.0186 -0.4079 -0.0174)
      PathPoint P3: calcn (0.0374 0.0276 -0.0241)
      PathPoint P4: calcn (0.1038 0.0068 -0.0256)
      PathPoint P5: calcn (0.1726 -0.0053 -0.0269)
      PathPoint P6: toes (0.0155 -0.0064 -0.0265)
      PathPoint P7: toes (0.0562 -0.0102 -0.0181)
    Schutte1993Muscle TIBANT: max_isometric_force=603 optimal_fiber_length=0.098 tendon_slack_length=0.223
        pennation_angle=0.08726646
      PathPoint P1: tibia (0.0179 -0.1624 0.0115)
      PathPoint P2: tibia (0.0329 -0.3951 -0.0177)
      PathPoint P3: calcn (0.1166 0.0178 -0.0305)
    Schutte1993Muscle PERBREV: max_isometric_force=348 optimal_fiber_length=0.05 tendon_slack_length=0.161
        pennation_angle=0.08726646
      PathPoint P1: tibia (-0.007 -0.2646 0.0325)
      PathPoint P2: tibia (-0.0198 -0.4184 0.0283)
      PathPoint P3: tibia (-0.0144 -0.4295 0.0289)
      PathPoint P4: calcn (0.0471 0.027 0.0233)
      PathPoint P5: calcn (0.0677 0.0219 0.0343)
    Schutte1993Muscle PERLONG: max_isometric_force=754 optimal_fiber_length=0.049 tendon_slack_length=0.345
        pennation_angle=0.1745329
      PathPoint P1: tibia (0.0005 -0.1568 0.0362)
      PathPoint P2: tibia (-0.0207 -0.4205 0.0286)
      PathPoint P3: tibia (-0.0162 -0.4319 0.0289)
      PathPoint P4: calcn (0.0438 0.023 0.0221)
      PathPoint P5: calcn (0.0681 0.0106 0.0284)
      PathPoint P6: calcn (0.0852 0.0069 0.0118)
      PathPoint P7: calcn (0.1203 0.0085 -0.0184)
    Schutte1993Muscle PERTERT: max_isometric_force=90 optimal_fiber_length=0.079 tendon_slack_length=0.1
        pennation_angle=0.2268928
      PathPoint P1: tibia (0.001 -0.2804 0.0231)
      PathPoint P2: tibia (0.0229 -0.4069 0.0159)
      PathPoint P3: calcn (0.0857 0.0228 0.0299)
    Schutte1993Muscle EXTDIG: max_isometric_force=341 optimal_fiber_length=0.102 tendon_slack_length=0.345
        pennation_angle=0.1396263
      PathPoint P1: tibia (0.0032 -0.1381 0.0276)
      PathPoint P2: tibia (0.0289 -0.4007 0.0072)
      PathPoint P3: calcn (0.0922 0.0388 -0.0001)
      PathPoint P4: calcn (0.1616 0.0055 0.013)
      PathPoint P5: toes (0.0003 0.0047 0.0153)
      PathPoint P6: toes (0.0443 -0.0004 0.025)
    Schutte1993Muscle EXTHAL: max_isometric_force=108 optimal_fiber_length=0.111 tendon_slack_length=0.305
        pennation_angle=0.1047198
      PathPoint P1: tibia (0.0012 -0.1767 0.0228)
      PathPoint P2: tibia (0.0326 -0.3985 -0.0085)
      PathPoint P3: calcn (0.097 0.0389 -0.0211)
      PathPoint P4: calcn (0.1293 0.0309 -0.0257)
      PathPoint P5: calcn (0.1734 0.0139 -0.028)
      PathPoint P6: toes (0.0298 0.0041 -0.0245)
      PathPoint P7: toes (0.0563 0.0034 -0.0186)
    Schutte1993Muscle LIGPAT: max_isometric_force=100 optimal_fiber_length=0.05 tendon_slack_length=0.005
        pennation_angle=0
      PathPoint P1: tibia (0.039 -0.0822 0)
      PathPoint P2: patella (0.0021 0.0015 0.0001)
    Schutte1993Muscle TPOST2: max_isometric_force=1270 optimal_fiber_length=0.031 tendon_slack_length=0.31
        pennation_angle=0.2094395
      PathPoint P1: tibia (-0.0094 -0.1348 0.0019)
      PathPoint P2: tibia (0.0063 -0.3505 0.0146)
      PathPoint P3: tibia (0.0165 -0.3904 0.0176)
      PathPoint P4: calcn (0.0912 0.0463 0.0086)
      PathPoint P5: calcn (0.105 0.0325 0.0093)
    Schutte1993Muscle LGMED1: max_isometric_force=546 optimal_fiber_length=0.0535 tendon_slack_length=0.078
        pennation_angle=0.1396263
      PathPoint P1: lpelvis (-0.0408 0.0304 -0.1209)
      PathPoint P2: lfemur (-0.0218 -0.0117 -0.0555)
    Schutte1993Muscle LGMED2: max_isometric_force=382 optimal_fiber_length=0.0845 tendon_slack_length=0.053
        pennation_angle=0
      PathPoint P1: lpelvis (-0.0855 0.0445 -0.0766)
      PathPoint P2: lfemur (-0.0258 -0.0058 -0.0527)
    Schutte1993Muscle LGMED3: max_isometric_force=435 optimal_fiber_length=0.0646 tendon_slack_length=0.053
        pennation_angle=0.3316126
      PathPoint P1: lpelvis (-0.1223 0.0105 -0.0648)
      PathPoint P2: lfemur (-0.0309 -0.0047 -0.0518)
    Schutte1993Muscle LGMIN1: max_isometric_force=180 optimal_fiber_length=0.068 tendon_slack_length=0.016
        pennation_angle=0.1745329
      PathPoint P1: lpelvis (-0.0467 -0.008 -0.1056)
      PathPoint P2: lfemur (-0.0072 -0.0104 -0.056)
    Schutte1993Muscle LGMIN2: max_isometric_force=190 optimal_fiber_length=0.056 tendon_slack_length=0.026
        pennation_angle=0
      PathPoint P1: lpelvis (-0.0633 -0.0065 -0.0991)
      PathPoint P2: lfemur (-0.0096 -0.0104 -0.056)
    Schutte1993Muscle LGMIN3: max_isometric_force=215 optimal_fiber_length=0.038 tendon_slack_length=0.051
        pennation_angle=0.3665191
      PathPoint P1: lpelvis (-0.0834 -0.0063 -0.0856)
      PathPoint P2: lfemur (-0.0135 -0.0083 -0.055)
    Schutte1993Muscle LSEMIMEM: max_isometric_force=1030 optimal_fiber_length=0.08 tendon_slack_length=0.359
        pennation_angle=0.2617994
      PathPoint P1: lpelvis (-0.1192 -0.1015 -0.0695)
      PathPoint P2: ltibia (-0.0243 -0.0536 0.0194)
    Schutte1993Muscle LSEMITEN: max_isometric_force=328 optimal_fiber_length=0.201 tendon_slack_length=0.262
        pennation_angle=0.08726646
      PathPoint P1: lpelvis (-0.1237 -0.1043 -0.0603)
      PathPoint P2: ltibia (-0.0314 -0.0545 0.0146)
      PathPoint P3: ltibia (-0.0113 -0.0746 0.0245)
      PathPoint P4: ltibia (0.0027 -0.0956 0.0193)
    Schutte1993Muscle LBIFEMLH: max_isometric_force=717 optimal_fiber_length=0.109 tendon_slack_length=0.341
        pennation_angle=0
      PathPoint P1: lpelvis (-0.1244 -0.1001 -0.0666)
      PathPoint P2: ltibia (-0.0081 -0.0729 -0.0423)
    Schutte1993Muscle LHAMSTRINGS: max_isometric_force=2075 optimal_fiber_length=0.109 tendon_slack_length=0.337
        pennation_angle=0.1396263
      PathPoint P1: lpelvis (-0.1217 -0.1015 -0.067)
      PathPoint P2: ltibia (-0.0198 -0.0604 -0.0027)
    Schutte1993Muscle LBIFEMSH: max_isometric_force=402 optimal_fiber_length=0.173 tendon_slack_length=0.1
        pennation_angle=0.4014257
      PathPoint P1: lfemur (0.005 -0.2111 -0.0234)
      PathPoint P2: ltibia (-0.0101 -0.0725 -0.0406)
    Schutte1993Muscle lSAR: max_isometric_force=104 optimal_fiber_length=0.579 tendon_slack_length=0.04
        pennation_angle=0
      PathPoint P1: lpelvis (-0.0153 -0.0013 -0.1242)
      PathPoint P2: lfemur (-0.003 -0.3568 0.0421)
      PathPoint P3: ltibia (-0.0056 -0.0419 0.0399)
      PathPoint P4: ltibia (0.006 -0.0589 0.0383)
      PathPoint P5: ltibia (0.0243 -0.084 0.0252)
    Schutte1993Muscle LRF: max_isometric_force=779 optimal_fiber_length=0.084 tendon_slack_length=0.346
        pennation_angle=0.08726646
      PathPoint P1: lpelvis (-0.0295 -0.0311 -0.0968)
      ConditionalPathPoint P2: lfemur (0.0334 -0.403 -0.0019) range=(-2.617994 -1.459968) coordinate=l_knee_angle
      PathPoint P3: lpatella (0.0121 0.0437 0.001)
    Schutte1993Muscle LADDLONG: max_isometric_force=418 optimal_fiber_length=0.138 tendon_slack_length=0.11
        pennation_angle=0.1047198
      PathPoint P1: lpelvis (-0.0316 -0.0836 -0.0169)
      PathPoint P2: lfemur (0.005 -0.2111 -0.0234)
    Schutte1993Muscle LADDBREV: max_isometric_force=286 optimal_fiber_length=0.133 tendon_slack_length=0.02
        pennation_angle=0
      PathPoint P1: lpelvis (-0.0587 -0.0915 -0.0164)
      PathPoint P2: lfemur (0.0009 -0.1196 -0.0294)
    Schutte1993Muscle LAMAG1: max_isometric_force=346 optimal_fiber_length=0.087 tendon_slack_length=0.06
        pennation_angle=0.08726646
      PathPoint P1: lpelvis (-0.0732 -0.1174 -0.0255)
      PathPoint P2: lfemur (-0.0045 -0.1211 -0.0339)
    Schutte1993Muscle LAMAG2: max_isometric_force=312 optimal_fiber_length=0.121 tendon_slack_length=0.13
        pennation_angle=0.05235988
      PathPoint P1: lpelvis (-0.0831 -0.1192 -0.0308)
      PathPoint P2: lfemur (0.0054 -0.2285 -0.0227)
    Schutte1993Muscle LAMAG3: max_isometric_force=444 optimal_fiber_length=0.131 tendon_slack_length=0.26
        pennation_angle=0.08726646
      PathPoint P1: lpelvis (-0.0771 -0.1181 -0.0276)
      PathPoint P2: lfemur (0.007 -0.3837 0.0266)
    Schutte1993Muscle LTFL: max_isometric_force=155 optimal_fiber_length=0.095 tendon_slack_length=0.425
        pennation_angle=0.05235988
      PathPoint P1: lpelvis (-0.0311 0.0214 -0.1241)
      PathPoint P2: lfemur (0.0294 -0.0995 -0.0597)
      PathPoint P3: lfemur (0.0054 -0.4049 -0.0357)
      PathPoint P4: ltibia (0.006 -0.0487 -0.0297)
    Schutte1993Muscle LPECT: max_isometric_force=177 optimal_fiber_length=0.133 tendon_slack_length=0.001
        pennation_angle=0
      PathPoint P1: lpelvis (-0.0431 -0.0768 -0.0451)
      PathPoint P2: lfemur (-0.0122 -0.0822 -0.0253)
    Schutte1993Muscle LGRA: max_isometric_force=108 optimal_fiber_length=0.352 tendon_slack_length=0.14
        pennation_angle=0.05235988
      PathPoint P1: lpelvis (-0.0563 -0.1038 -0.0079)
      PathPoint P2: ltibia (-0.0154 -0.0475 0.0358)
      PathPoint P3: ltibia (0.006 -0.0836 0.0228)
    Schutte1993Muscle LGMAX1: max_isometric_force=382 optimal_fiber_length=0.142 tendon_slack_length=0.125
        pennation_angle=0.08726646
      PathPoint P1: lpelvis (-0.1195 0.0612 -0.07)
      PathPoint P2: lpelvis (-0.1291 0.0012 -0.0886)
      PathPoint P3: lfemur (-0.0457 -0.0248 -0.0392)
      PathPoint P4: lfemur (-0.0277 -0.0566 -0.047)
    Schutte1993Muscle LGMAX2: max_isometric_force=546 optimal_fiber_length=0.147 tendon_slack_length=0.127
        pennation_angle=0
      PathPoint P1: lpelvis (-0.1349 0.0176 -0.0563)
      PathPoint P2: lpelvis (-0.1376 -0.052 -0.0914)
      PathPoint P3: lfemur (-0.0426 -0.053 -0.0293)
      PathPoint P4: lfemur (-0.0156 -0.1016 -0.0419)
    Schutte1993Muscle LGMAX3: max_isometric_force=368 optimal_fiber_length=0.144 tendon_slack_length=0.145
        pennation_angle=0.08726646
      PathPoint P1: lpelvis (-0.1556 -0.0314 -0.0058)
      PathPoint P2: lpelvis (-0.1529 -0.1052 -0.0403)
      PathPoint P3: lfemur (-0.0299 -0.1041 -0.0135)
      PathPoint P4: lfemur (-0.006 -0.1419 -0.0411)
    Schutte1993Muscle LILIACUS: max_isometric_force=429 optimal_fiber_length=0.1 tendon_slack_length=0.09
        pennation_angle=0.1221731
      PathPoint P1: lpelvis (-0.0674 0.0365 -0.0854)
      PathPoint P2: lpelvis (-0.0218 -0.055 -0.0851)
      PathPoint P3: lfemur (0.0017 -0.0543 -0.0057)
      PathPoint P4: lfemur (-0.0193 -0.0621 -0.0129)
    Schutte1993Muscle LPSOAS: max_isometric_force=371 optimal_fiber_length=0.104 tendon_slack_length=0.13
        pennation_angle=0.1396263
      PathPoint P1: lpelvis (-0.0647 0.0887 -0.0289)
      PathPoint P2: lpelvis (-0.0238 -0.057 -0.0759)
      PathPoint P3: lfemur (0.0016 -0.0507 -0.0038)
      PathPoint P4: lfemur (-0.0188 -0.0597 -0.0104)
    Schutte1993Muscle LQUADFEM: max_isometric_force=254 optimal_fiber_length=0.054 tendon_slack_length=0.024
        pennation_angle=0
      PathPoint P1: lpelvis (-0.1143 -0.1151 -0.052)
      PathPoint P2: lfemur (-0.0381 -0.0359 -0.0366)
    Schutte1993Muscle LGLEM: max_isometric_force=109 optimal_fiber_length=0.024 tendon_slack_length=0.039
        pennation_angle=0
      PathPoint P1: lpelvis (-0.1133 -0.082 -0.0714)
      PathPoint P2: lfemur (-0.0142 -0.0033 -0.0443)
    Schutte1993Muscle LPERI: max_isometric_force=296 optimal_fiber_length=0.026 tendon_slack_length=0.115
        pennation_angle=0.1745329
      PathPoint P1: lpelvis (-0.1396 0.0003 -0.0235)
      PathPoint P2: lpelvis (-0.1193 -0.0276 -0.0657)
      PathPoint P3: lfemur (-0.0148 -0.0036 -0.0437)
    Schutte1993Muscle lVASMED: max_isometric_force=1294 optimal_fiber_length=0.089 tendon_slack_length=0.126
        pennation_angle=0.08726646
      PathPoint P1: lfemur (0.014 -0.2099 -0.0188)
      PathPoint P2: lfemur (0.0356 -0.2769 -0.0009)
      ConditionalPathPoint P3: lfemur (0.037 -0.4048 0.0125) range=(-2.617994 -1.209862) coordinate=l_knee_angle
      ConditionalPathPoint P4: lfemur (0.0274 -0.4255 0.0131) range=(-2.617994 -1.780061) coordinate=l_knee_angle
      PathPoint P5: lpatella (0.0063 0.0445 0.017)
    Schutte1993Muscle LVASINT: max_isometric_force=1365 optimal_fiber_length=0.087 tendon_slack_length=0.136
        pennation_angle=0.05235988
      PathPoint P1: lfemur (0.029 -0.1924 -0.031)
      PathPoint P2: lfemur (0.0335 -0.2084 -0.0285)
      ConditionalPathPoint P3: lfemur (0.0343 -0.403 -0.0055) range=(-2.617994 -1.42) coordinate=l_knee_angle
      PathPoint P4: lpatella (0.0058 0.048 0.0006)
    Schutte1993Muscle LVASLAT: max_isometric_force=1871 optimal_fiber_length=0.084 tendon_slack_length=0.157
        pennation_angle=0.08726646
      PathPoint P1: lfemur (0.0048 -0.1854 -0.0349)
      PathPoint P2: lfemur (0.0269 -0.2591 -0.0409)
      ConditionalPathPoint P3: lfemur (0.0361 -0.403 -0.0205) range=(-2.617994 -1.209862) coordinate=l_knee_angle
      ConditionalPathPoint P4: lfemur (0.0253 -0.4243 -0.0184) range=(-2.617994 -1.919862) coordinate=l_knee_angle
      PathPoint P5: lpatella (0.0103 0.0423 -0.0141)
    Schutte1993Muscle LMEDGAS: max_isometric_force=1113 optimal_fiber_length=0.045 tendon_slack_length=0.408
        pennation_angle=0.296706
      PathPoint P1: lfemur (-0.0127 -0.3929 0.0235)
      ConditionalPathPoint P2: lfemur (-0.0239 -0.4022 0.0258) range=(-0.7700393 0.1000074) coordinate=l_knee_angle
      PathPoint P3: ltibia (-0.0217 -0.0487 0.0295)
      PathPoint P4: lcalcn (0.0044 0.031 0.0053)
    Schutte1993Muscle LLATGAS: max_isometric_force=488 optimal_fiber_length=0.064 tendon_slack_length=0.385
        pennation_angle=0.1396263
      PathPoint P1: lfemur (-0.0155 -0.3946 -0.0272)
      ConditionalPathPoint P2: lfemur (-0.0254 -0.4018 -0.0274) range=(-0.7700393 0.1000074) coordinate=l_knee_angle
      PathPoint P3: ltibia (-0.0242 -0.0481 -0.0235)
      PathPoint P4: lcalcn (0.0044 0.031 0.0053)
    Schutte1993Muscle LGASTROC: max_isometric_force=1601 optimal_fiber_length=0.0508 tendon_slack_length=0.401
        pennation_angle=0.2487094
      PathPoint P1: lfemur (-0.0135 -0.3934 0.008)
      ConditionalPathPoint P2: lfemur (-0.0244 -0.4021 0.0096) range=(-0.7700393 0.1000074) coordinate=l_knee_angle
      PathPoint P3: ltibia (-0.0225 -0.0485 0.0133)
      PathPoint P4: lcalcn (0.0044 0.031 0.0053)
    Schutte1993Muscle LSOL: max_isometric_force=2839 optimal_fiber_length=0.03 tendon_slack_length=0.268
        pennation_angle=0.4363323
      PathPoint P1: ltibia (-0.0024 -0.1533 -0.0071)
      PathPoint P2: lcalcn (0.0044 0.031 0.0053)
    Schutte1993Muscle LSOLSTIF: max_isometric_force=2839 optimal_fiber_length=0.03 tendon_slack_length=0.268
        pennation_angle=0.4363323
      PathPoint P1: ltibia (-0.0024 -0.1533 -0.0071)
      PathPoint P2: lcalcn (0.0044 0.031 0.0053)
      tendon_force_length_curve: NaturalCubicSpline: x=(-10 -0.002 -0.001 0 0.00131 0.00281 0.00431 0.00581 0.00731 0.00881 0.0103 0.0118 0.0123 9.2 9.201 9.202 20)
          y=(0 0 0 0 1.08 2.57 4.35 6.52 9.15 12.3 16.1 20.8 22.7 34500 34500 34500 34500)
    Schutte1993Muscle LTIBPOST: max_isometric_force=1270 optimal_fiber_length=0.031 tendon_slack_length=0.31
        pennation_angle=0.2094395
      PathPoint P1: ltibia (-0.0094 -0.1348 -0.0019)
      PathPoint P2: ltibia (-0.0144 -0.4051 0.0229)
      PathPoint P3: lcalcn (0.0417 0.0334 0.0286)
      PathPoint P4: lcalcn (0.0772 0.0159 0.0281)
    Schutte1993Muscle LFLEXDIG: max_isometric_force=310 optimal_fiber_length=0.034 tendon_slack_length=0.4
        pennation_angle=0.1221731
      PathPoint P1: ltibia (-0.0083 -0.2046 0.0018)
      PathPoint P2: ltibia (-0.0154 -0.4051 0.0196)
      PathPoint P3: lcalcn (0.0436 0.0315 0.028)
      PathPoint P4: lcalcn (0.0708 0.0176 0.0263)
      PathPoint P5: lcalcn (0.1658 -0.0081 -0.0116)
      PathPoint P6: ltoes (-0.0019 -0.0078 -0.0147)
      PathPoint P7: ltoes (0.0285 -0.0071 -0.0215)
      PathPoint P8: ltoes (0.0441 -0.006 -0.0242)
    Schutte1993Muscle LFLEXHAL: max_isometric_force=322 optimal_fiber_length=0.043 tendon_slack_length=0.38
        pennation_angle=0.1745329
      PathPoint P1: ltibia (-0.0079 -0.2334 -0.0244)
      PathPoint P2: ltibia (-0.0186 -0.4079 0.0174)
      PathPoint P3: lcalcn (0.0374 0.0276 0.0241)
      PathPoint P4: lcalcn (0.1038 0.0068 0.0256)
      PathPoint P5: lcalcn (0.1726 -0.0053 0.0269)
      PathPoint P6: ltoes (0.0155 -0.0064 0.0265)
      PathPoint P7: ltoes (0.0562 -0.0102 0.0181)
    Schutte1993Muscle LTIBANT: max_isometric_force=603 optimal_fiber_length=0.098 tendon_slack_length=0.223
        pennation_angle=0.08726646
      PathPoint P1: ltibia (0.0179 -0.1624 -0.0115)
      PathPoint P2: ltibia (0.0329 -0.3951 0.0177)
      PathPoint P3: lcalcn (0.1166 0.0178 0.0305)
    Schutte1993Muscle LPERBREV: max_isometric_force=348 optimal_fiber_length=0.05 tendon_slack_length=0.161
        pennation_angle=0.08726646
      PathPoint P1: ltibia (-0.007 -0.2646 -0.0325)
      PathPoint P2: ltibia (-0.0198 -0.4184 -0.0283)
      PathPoint P3: ltibia (-0.0144 -0.4295 -0.0289)
      PathPoint P4: lcalcn (0.0471 0.027 -0.0233)
      PathPoint P5: lcalcn (0.0677 0.0219 -0.0343)
    Schutte1993Muscle LPERLONG: max_isometric_force=754 optimal_fiber_length=0.049 tendon_slack_length=0.345
        pennation_angle=0.1745329
      PathPoint P1: ltibia (0.0005 -0.1568 -0.0362)
      PathPoint P2: ltibia (-0.0207 -0.4205 -0.0286)
      PathPoint P3: ltibia (-0.0162 -0.4319 -0.0289)
      PathPoint P4: lcalcn (0.0438 0.023 -0.0221)
      PathPoint P5: lcalcn (0.0681 0.0106 -0.0284)
      PathPoint P6: lcalcn (0.0852 0.0069 -0.0118)
      PathPoint P7: lcalcn (0.1203 0.0085 0.0184)
    Schutte1993Muscle LPERTERT: max_isometric_force=90 optimal_fiber_length=0.079 tendon_slack_length=0.1
        pennation_angle=0.2268928
      PathPoint P1: ltibia (0.001 -0.2804 -0.0231)
      PathPoint P2: ltibia (0.0229 -0.4069 -0.0159)
      PathPoint P3: lcalcn (0.0857 0.0228 -0.0299)
    Schutte1993Muscle LEXTDIG: max_isometric_force=341 optimal_fiber_length=0.102 tendon_slack_length=0.345
        pennation_angle=0.1396263
      PathPoint P1: ltibia (0.0032 -0.1381 -0.0276)
      PathPoint P2: ltibia (0.0289 -0.4007 -0.0072)
      PathPoint P3: lcalcn (0.0922 0.0388 0.0001)
      PathPoint P4: lcalcn (0.1616 0.0055 -0.013)
      PathPoint P5: ltoes (0.0003 0.0047 -0.0153)
      PathPoint P6: ltoes (0.0443 -0.0004 -0.025)
    Schutte1993Muscle LEXTHAL: max_isometric_force=108 optimal_fiber_length=0.111 tendon_slack_length=0.305
        pennation_angle=0.1047198
      PathPoint P1: ltibia (0.0012 -0.1767 -0.0228)
      PathPoint P2: ltibia (0.0326 -0.3985 0.0085)
      PathPoint P3: lcalcn (0.097 0.0389 0.0211)
      PathPoint P4: lcalcn (0.1293 0.0309 0.0257)
      PathPoint P5: lcalcn (0.1734 0.0139 0.028)
      PathPoint P6: ltoes (0.0298 0.0041 0.0245)
      PathPoint P7: ltoes (0.0563 0.0034 0.0186)
    Schutte1993Muscle LLIGPAT: max_isometric_force=100 optimal_fiber_length=0.05 tendon_slack_length=0.005
        pennation_angle=0
      PathPoint P1: ltibia (0.039 -0.0822 0)
      PathPoint P2: lpatella (0.0021 0.0015 -0.0001)
    Schutte1993Muscle LTPOST2: max_isometric_force=1270 optimal_fiber_length=0.031 tendon_slack_length=0.31
        pennation_angle=0.2094395
      PathPoint P1: ltibia (-0.0094 -0.1348 -0.0019)
      PathPoint P2: ltibia (0.0063 -0.3505 -0.0146)
      PathPoint P3: ltibia (0.0165 -0.3904 -0.0176)
      PathPoint P4: lcalcn (0.0912 0.0463 -0.0086)
      PathPoint P5: lcalcn (0.105 0.0325 -0.0093)
    ObjectGroup hip_abd: members=(GMAX1 GMED1 GMED2 GMED3 GMIN1 GMIN2 GMIN3 PERI SAR TFL)
    ObjectGroup hip_flex: members=(ADDBREV ADDLONG GMED1 GMIN1 GRA ILIACUS PECT PSOAS RF SAR TFL)
    ObjectGroup hip_inrot: members=(GMED1 GMIN1 ILIACUS PSOAS TFL)
    ObjectGroup hip_exrot: members=(GLEM GMED3 GMIN3 PERI QUADFEM)
    ObjectGroup hip_ext: members=(ADDLONG AMAG1 AMAG2 AMAG3 BIFEMLH GMAX1 GMAX2 GMAX3 GMED3 GMIN3 HAMSTRINGS SEMIMEM SEMITEN)
    ObjectGroup hip_add: members=(ADDBREV ADDLONG AMAG1 AMAG2 AMAG3 BIFEMLH GRA HAMSTRINGS PECT SEMIMEM SEMITEN)
    ObjectGroup knee_bend: members=(BIFEMLH BIFEMSH GASTROC GRA HAMSTRINGS LATGAS MEDGAS SAR SEMIMEM SEMITEN)
    ObjectGroup knee_ext: members=(LIGPAT RF VASINT VASLAT VASMED)
    ObjectGroup ankle_pf: members=(FLEXDIG FLEXHAL GASTROC LATGAS MEDGAS PERBREV PERLONG SOL TIBPOST)
    ObjectGroup inverter: members=(EXTHAL FLEXDIG FLEXHAL TIBANT TIBPOST)
    ObjectGroup ankle_df: members=(EXTDIG EXTHAL PERTERT TIBANT TPOST2)
    ObjectGroup everter: members=(EXTDIG PERBREV PERLONG PERTERT TPOST2)
    ObjectGroup lhip_abd: members=(LGMAX1 LGMED1 LGMED2 LGMED3 LGMIN1 LGMIN2 LGMIN3 LPERI LTFL lSAR)
    ObjectGroup lhip_flex: members=(LADDBREV LADDLONG LGMED1 LGMIN1 LGRA LILIACUS LPECT LPSOAS LRF LTFL lSAR)
    ObjectGroup lhip_inrot: members=(LGMED1 LGMIN1 LILIACUS LPSOAS LTFL)
    ObjectGroup lhip_exrot: members=(LGLEM LGMED3 LGMIN3 LPERI LQUADFEM)
    ObjectGroup lhip_ext: members=(LADDLONG LAMAG1 LAMAG2 LAMAG3 LBIFEMLH LGMAX1 LGMAX2 LGMAX3 LGMED3 LGMIN3 LHAMSTRINGS LSEMIMEM LSEMITEN)
    ObjectGroup lhip_add: members=(LADDBREV LADDLONG LAMAG1 LAMAG2 LAMAG3 LBIFEMLH LGRA LHAMSTRINGS LPECT LSEMIMEM LSEMITEN)
    ObjectGroup lknee_bend: members=(LBIFEMLH LBIFEMSH LGASTROC LGRA LHAMSTRINGS LLATGAS LMEDGAS LSEMIMEM LSEMITEN lSAR)
    ObjectGroup lknee_ext: members=(LLIGPAT LRF LVASINT LVASLAT lVASMED)
    ObjectGroup lankle_pf: members=(LFLEXDIG LFLEXHAL LGASTROC LLATGAS LMEDGAS LPERBREV LPERLONG LSOL LTIBPOST)
    ObjectGroup linverter: members=(LEXTHAL LFLEXDIG LFLEXHAL LTIBANT LTIBPOST)
    ObjectGroup lankle_df: members=(LEXTDIG LEXTHAL LPERTERT LTIBANT LTPOST2)
    ObjectGroup leverter: members=(LEXTDIG LPERBREV LPERLONG LPERTERT LTPOST2)
  BodySet:
    Body ground: mass=0 mass_center=(0 0 0) inertia_xx=0 inertia_yy=0 inertia_zz=0
    Body sacrum: mass=0 mass_center=(0 0 0) inertia_xx=0 inertia_yy=0 inertia_zz=0 meshes=sacrum.vtp
      WeldJoint sacrum: parent_body=ground location_in_parent=(0 0 0) location=(0 0 0)
    Body rpelvis: mass=0 mass_center=(0 0 0) inertia_xx=0 inertia_yy=0 inertia_zz=0 meshes=pelvis.vtp
      CustomJoint rpelvis: parent_body=sacrum location_in_parent=(0 0 0) location=(0 0 0)
        Coordinate rZ: motion_type=rotational default_value=0 initial_value=0 range=(-3.141593 3.141593) clamped=false
        Coordinate rX: motion_type=rotational default_value=0 initial_value=0 range=(-3.141593 3.141593) clamped=false
        Coordinate rY: motion_type=rotational default_value=0 initial_value=0 range=(-3.141593 3.141593) clamped=false
        SpatialTransform: axes_held_at_zero=(translation1 translation2 translation3)
          TransformAxis rotation1: coordinates=rZ axis=(0 0 1) LinearFunction(coefficients=1 0)
          TransformAxis rotation2: coordinates=rX axis=(1 0 0) LinearFunction(coefficients=1 0)
          TransformAxis rotation3: coordinates=rY axis=(0 1 0) LinearFunction(coefficients=1 0)
    Body femur2: mass=0 mass_center=(0 0 0) inertia_xx=0 inertia_yy=0 inertia_zz=0 meshes=femur.vtp
      CustomJoint hip: parent_body=rpelvis location_in_parent=(-0.0707 -0.0661 0.0835) location=(0 0 0)
        Coordinate r_hip_flexion: motion_type=rotational default_value=0 initial_value=0 range=(-0.5235988 1.658063)
            clamped=false
        Coordinate r_hip_adduction: motion_type=rotational default_value=0 initial_value=0 range=(-0.8726646 0.3141593)
            clamped=false
        Coordinate r_hip_rotation: motion_type=rotational default_value=0 initial_value=0 range=(-0.3490659 0.7853982)
            clamped=false
        SpatialTransform: axes_held_at_zero=(translation1 translation2 translation3)
          TransformAxis rotation1: coordinates=r_hip_flexion axis=(0 0 1) LinearFunction(coefficients=1 0)
          TransformAxis rotation2: coordinates=r_hip_adduction axis=(1 0 0) LinearFunction(coefficients=1 0)
          TransformAxis rotation3: coordinates=r_hip_rotation axis=(0 1 0) LinearFunction(coefficients=1 0)
    Body tibia: mass=0 mass_center=(0 0 0) inertia_xx=0 inertia_yy=0 inertia_zz=0 meshes=(tibia.vtp fibula.vtp)
      CustomJoint femoral-tibial: parent_body=femur2 location_in_parent=(0 0 0) location=(0 0 0)
        Coordinate r_knee_angle: motion_type=rotational default_value=0 initial_value=0 range=(-2.094395 0.05235988)
            clamped=false
        SpatialTransform: axes_held_at_zero=(rotation2 rotation3 translation3)
          TransformAxis rotation1: coordinates=r_knee_angle axis=(0 0 1) LinearFunction(coefficients=1 0)
          TransformAxis translation1: coordinates=r_knee_angle axis=(1 0 0)
            NaturalCubicSpline: x=(-2.094395 -1.745329 -1.396263 -1.047198 -0.6981317 -0.3490659 -0.1745329 0 0.08726646)
                y=(-0.0032 0.00179 0.00411 0.0041 0.00212 -0.001 -0.0031 -0.00525 -0.0063)
          TransformAxis translation2: coordinates=r_knee_angle axis=(0 1 0)
            NaturalCubicSpline: x=(-2.094395 -1.22173 -0.5235988 -0.3490659 -0.1745329 0 0.1308997)
                y=(-0.4226 -0.4082 -0.399 -0.3976 -0.3966 -0.396 -0.396)
    Body patella: mass=0 mass_center=(0 0 0) inertia_xx=0 inertia_yy=0 inertia_zz=0 meshes=pat.vtp
      CustomJoint tp: parent_body=tibia location_in_parent=(0 0 0) location=(0 0 0)
        Coordinate tp_r3: motion_type=rotational default_value=0 initial_value=0 range=(-99999.9 99999.9) clamped=false
        Coordinate tp_tx: motion_type=translational default_value=0 initial_value=0 range=(-99999.9 99999.9)
            clamped=false
        Coordinate tp_ty: motion_type=translational default_value=0 initial_value=0 range=(-99999.9 99999.9)
            clamped=false
        Coordinate tp_tz: motion_type=translational default_value=0 initial_value=0 range=(-99999.9 99999.9)
            clamped=false
        SpatialTransform: axes_held_at_zero=(rotation2 rotation3)
          TransformAxis rotation1: coordinates=tp_r3 axis=(0 0 1) LinearFunction(coefficients=1 0)
          TransformAxis translation1: coordinates=tp_tx axis=(1 0 0) LinearFunction(coefficients=1 0)
          TransformAxis translation2: coordinates=tp_ty axis=(0 1 0) LinearFunction(coefficients=1 0)
          TransformAxis translation3: coordinates=tp_tz axis=(0 0 1) LinearFunction(coefficients=1 0)
    Body talus: mass=0 mass_center=(0 0 0) inertia_xx=0 inertia_yy=0 inertia_zz=0 meshes=talus.vtp
      CustomJoint ankle: parent_body=tibia location_in_parent=(0 -0.43 0) location=(0 0 0)
        Coordinate r_ankle_angle: motion_type=rotational default_value=0 initial_value=0 range=(-0.5235988 0.6108652)
            clamped=false
        SpatialTransform: axes_held_at_zero=(rotation2 rotation3 translation1 translation2 translation3)
          TransformAxis rotation1: coordinates=r_ankle_angle axis=(-0.1045294 -0.173649 0.9792444)
              LinearFunction(coefficients=1 0)
    Body calcn: mass=0 mass_center=(0 0 0) inertia_xx=0 inertia_yy=0 inertia_zz=0 meshes=foot.vtp
      CustomJoint subtalar: parent_body=talus location_in_parent=(-0.04877 -0.04195 0.00792) location=(0 0 0)
        Coordinate r_subt_angle: motion_type=rotational default_value=0 initial_value=0 range=(-0.3490659 0.3490659)
            clamped=false
        SpatialTransform: axes_held_at_zero=(rotation2 rotation3 translation1 translation2 translation3)
          TransformAxis rotation1: coordinates=r_subt_angle axis=(0.7871796 0.6047475 -0.1209495)
              LinearFunction(coefficients=1 0)
    Body toes: mass=0 mass_center=(0 0 0) inertia_xx=0 inertia_yy=0 inertia_zz=0 meshes=bofoot.vtp
      CustomJoint toe: parent_body=calcn location_in_parent=(0.1788 -0.002 0.00108) location=(0 0 0)
        Coordinate r_mtp_angle: motion_type=rotational default_value=0 initial_value=0 range=(-0.5235988 0.5235988)
            clamped=false
        SpatialTransform: axes_held_at_zero=(rotation2 rotation3 translation1 translation2 translation3)
          TransformAxis rotation1: coordinates=r_mtp_angle axis=(0.5808219 0 -0.8140307)
              LinearFunction(coefficients=1 0)
    Body lpelvis: mass=0 mass_center=(0 0 0) inertia_xx=0 inertia_yy=0 inertia_zz=0 meshes=l_pelvis.vtp
      CustomJoint lpelvis: parent_body=sacrum location_in_parent=(0 0 0) location=(0 0 0)
        Coordinate l_rZ: motion_type=rotational default_value=0 initial_value=0 range=(-3.141593 3.141593)
            clamped=false
        Coordinate l_rX: motion_type=rotational default_value=0 initial_value=0 range=(-3.141593 3.141593)
            clamped=false
        Coordinate l_rY: motion_type=rotational default_value=0 initial_value=0 range=(-3.141593 3.141593)
            clamped=false
        SpatialTransform: axes_held_at_zero=(translation1 translation2 translation3)
          TransformAxis rotation1: coordinates=l_rZ axis=(0 0 1) LinearFunction(coefficients=1 0)
          TransformAxis rotation2: coordinates=l_rX axis=(1 0 0) LinearFunction(coefficients=1 0)
          TransformAxis rotation3: coordinates=l_rY axis=(0 1 0) LinearFunction(coefficients=1 0)
    Body lfemur: mass=0 mass_center=(0 0 0) inertia_xx=0 inertia_yy=0 inertia_zz=0 meshes=l_femur.vtp
      CustomJoint lhip: parent_body=lpelvis location_in_parent=(-0.0707 -0.0661 -0.0835) location=(0 0 0)
        Coordinate l_hip_flexion: motion_type=rotational default_value=0 initial_value=0 range=(-0.5235988 1.658063)
            clamped=false
        Coordinate l_hip_adduction: motion_type=rotational default_value=0 initial_value=0 range=(-0.8726646 0.3141593)
            clamped=false
        Coordinate l_hip_rotation: motion_type=rotational default_value=0 initial_value=0 range=(-0.3490659 0.7853982)
            clamped=false
        SpatialTransform: axes_held_at_zero=(translation1 translation2 translation3)
          TransformAxis rotation1: coordinates=l_hip_flexion axis=(0 0 1) LinearFunction(coefficients=1 0)
          TransformAxis rotation2: coordinates=l_hip_adduction axis=(1 0 0)
            NaturalCubicSpline: x=(-6.283185 6.283185) y=(6.283185 -6.283185)
          TransformAxis rotation3: coordinates=l_hip_rotation axis=(0 1 0)
            NaturalCubicSpline: x=(-6.283185 6.283185) y=(6.283185 -6.283185)
    Body ltibia: mass=0 mass_center=(0 0 0) inertia_xx=0 inertia_yy=0 inertia_zz=0 meshes=(l_tibia.vtp l_fibula.vtp)
      CustomJoint lfemoral-tibial: parent_body=lfemur location_in_parent=(0 0 0) location=(0 0 0)
        Coordinate l_knee_angle: motion_type=rotational default_value=0 initial_value=0 range=(-2.094395 0)
            clamped=false
        SpatialTransform: axes_held_at_zero=(rotation2 rotation3 translation3)
          TransformAxis rotation1: coordinates=l_knee_angle axis=(0 0 1) LinearFunction(coefficients=1 0)
          TransformAxis translation1: coordinates=l_knee_angle axis=(1 0 0)
            NaturalCubicSpline: x=(-2.094395 -1.745329 -1.396263 -1.047198 -0.6981317 -0.3490659 -0.1745329 0)
                y=(-0.0032 0.00179 0.00411 0.0041 0.00212 -0.001 -0.0031 -0.00525)
          TransformAxis translation2: coordinates=l_knee_angle axis=(0 1 0)
            NaturalCubicSpline: x=(-2.094395 -1.22173 -0.5235988 -0.3490659 -0.1745329 0)
                y=(-0.4226 -0.4082 -0.399 -0.3976 -0.3966 -0.396)
    Body lpatella: mass=0 mass_center=(0 0 0) inertia_xx=0 inertia_yy=0 inertia_zz=0 meshes=l_pat.vtp
      CustomJoint ltp: parent_body=ltibia location_in_parent=(0 0 0) location=(0 0 0)
        Coordinate ltp_r3: motion_type=rotational default_value=0 initial_value=0 range=(-99999.9 99999.9)
            clamped=false
        Coordinate ltp_tx: motion_type=translational default_value=0 initial_value=0 range=(-99999.9 99999.9)
            clamped=false
        Coordinate ltp_ty: motion_type=translational default_value=0 initial_value=0 range=(-99999.9 99999.9)
            clamped=false
        Coordinate ltp_tz: motion_type=translational default_value=0 initial_value=0 range=(-99999.9 99999.9)
            clamped=false
        SpatialTransform: axes_held_at_zero=(rotation2 rotation3)
          TransformAxis rotation1: coordinates=ltp_r3 axis=(0 0 1) LinearFunction(coefficients=1 0)
          TransformAxis translation1: coordinates=ltp_tx axis=(1 0 0) LinearFunction(coefficients=1 0)
          TransformAxis translation2: coordinates=ltp_ty axis=(0 1 0) LinearFunction(coefficients=1 0)
          TransformAxis translation3: coordinates=ltp_tz axis=(0 0 1) LinearFunction(coefficients=1 0)
    Body ltalus: mass=0 mass_center=(0 0 0) inertia_xx=0 inertia_yy=0 inertia_zz=0 meshes=l_talus.vtp
      CustomJoint lankle: parent_body=ltibia location_in_parent=(0 -0.43 0) location=(0 0 0)
        Coordinate l_ankle_angle: motion_type=rotational default_value=0 initial_value=0 range=(-0.5235988 0.6108652)
            clamped=false
        SpatialTransform: axes_held_at_zero=(rotation2 rotation3 translation1 translation2 translation3)
          TransformAxis rotation1: coordinates=l_ankle_angle axis=(-0.1045294 -0.173649 -0.9792444)
            NaturalCubicSpline: x=(-6.283185 6.283185) y=(6.283185 -6.283185)
    Body lcalcn: mass=0 mass_center=(0 0 0) inertia_xx=0 inertia_yy=0 inertia_zz=0 meshes=l_foot.vtp
      CustomJoint lsubtalar: parent_body=ltalus location_in_parent=(-0.04877 -0.04195 -0.00792) location=(0 0 0)
        Coordinate l_subt_angle: motion_type=rotational default_value=0 initial_value=0 range=(-0.3490659 0.3490659)
            clamped=false
        SpatialTransform: axes_held_at_zero=(rotation2 rotation3 translation1 translation2 translation3)
          TransformAxis rotation1: coordinates=l_subt_angle axis=(0.7871796 0.6047475 0.1209495)
            NaturalCubicSpline: x=(-6.283185 6.283185) y=(6.283185 -6.283185)
    Body ltoes: mass=0 mass_center=(0 0 0) inertia_xx=0 inertia_yy=0 inertia_zz=0 meshes=l_bofoot.vtp
      CustomJoint ltoe: parent_body=lcalcn location_in_parent=(0.1788 -0.002 -0.00108) location=(0 0 0)
        Coordinate l_mtp_angle: motion_type=rotational default_value=0 initial_value=0 range=(-0.5235988 0.5235988)
            clamped=false
        SpatialTransform: axes_held_at_zero=(rotation2 rotation3 translation1 translation2 translation3)
          TransformAxis rotation1: coordinates=l_mtp_angle axis=(0.5808219 0 0.8140307)
            NaturalCubicSpline: x=(-6.283185 6.283185) y=(6.283185 -6.283185)
  ConstraintSet:
    CoordinateCouplerConstraint tp_r3_con: independent_coordinate_names=r_knee_angle dependent_coordinate_name=tp_r3
        scale_factor=1
      coupled_coordinates_function: NaturalCubicSpline f9: x=(-2.094395 -1.999973 -1.457524 -0.5263913 0.02792527 0.1745329)
          y=(0.3080506 0.3080506 0.3063053 0.270177 -0.03700098 -0.2799508)
    CoordinateCouplerConstraint tp_tx_con: independent_coordinate_names=r_knee_angle dependent_coordinate_name=tp_tx
        scale_factor=1
      coupled_coordinates_function: NaturalCubicSpline f7: x=(-2.094395 -1.396263 -1.047198 -0.6981317 -0.3490659 -0.1745329 0 0.08726646)
          y=(0.0173 0.0324 0.0381 0.043 0.0469 0.0484 0.0496 0.05)
    CoordinateCouplerConstraint tp_ty_con: independent_coordinate_names=r_knee_angle dependent_coordinate_name=tp_ty
        scale_factor=1
      coupled_coordinates_function: NaturalCubicSpline f8: x=(-2.094395 -1.570796 -1.396263 -1.047198 -0.6981317 -0.3490659 -0.1745329 0.00499164 0.08726646)
          y=(-0.0219 -0.0202 -0.02 -0.0204 -0.0211 -0.0219 -0.0223 -0.0227 -0.0229)
    CoordinateCouplerConstraint tp_tz_con: independent_coordinate_names=r_knee_angle dependent_coordinate_name=tp_tz
        scale_factor=1
      coupled_coordinates_function: NaturalCubicSpline f33: x=(-17453.29 17453.29) y=(0.0024 0.0024)
    CoordinateCouplerConstraint ltp_r3_con: independent_coordinate_names=l_knee_angle dependent_coordinate_name=ltp_r3
        scale_factor=1
      coupled_coordinates_function: NaturalCubicSpline f21: x=(-2.094395 -1.999973 -1.457524 -0.5263913 0.02792527 0.1745329)
          y=(0.3080506 0.3080506 0.3063053 0.270177 -0.03700098 -0.2799508)
    CoordinateCouplerConstraint ltp_tx_con: independent_coordinate_names=l_knee_angle dependent_coordinate_name=ltp_tx
        scale_factor=1
      coupled_coordinates_function: NaturalCubicSpline f19: x=(-2.094395 -1.396263 -1.047198 -0.6981317 -0.3490659 -0.1745329 0)
          y=(0.0173 0.0324 0.0381 0.043 0.0469 0.0484 0.0496)
    CoordinateCouplerConstraint ltp_ty_con: independent_coordinate_names=l_knee_angle dependent_coordinate_name=ltp_ty
        scale_factor=1
      coupled_coordinates_function: NaturalCubicSpline f20: x=(-2.094395 -1.570796 -1.396263 -1.047198 -0.6981317 -0.3490659 -0.1745329 0.00499164)
          y=(-0.0219 -0.0202 -0.02 -0.0204 -0.0211 -0.0219 -0.0223 -0.0227)
    CoordinateCouplerConstraint ltp_tz_con: independent_coordinate_names=l_knee_angle dependent_coordinate_name=ltp_tz
        scale_factor=1
      coupled_coordinates_function: NaturalCubicSpline f34: x=(-17453.29 17453.29) y=(-0.0024 -0.0024)
