Model Wrist Model:
  angle_units: radians
  defaults: Schutte1993Muscle defaultmuscle: max_isometric_force=546 optimal_fiber_length=0.0535
      tendon_slack_length=0.078 pennation_angle=0.1396263 max_contraction_velocity=10
    tendon_force_length_curve: natCubicSpline: x=(-10 -0.002 -0.001 0 0.00131 0.00281 0.00431 0.00581 0.00731 0.00881 0.0103 0.0118 0.0123 9.2 9.201 9.202 20)
        y=(0 0 0 0 0.0108 0.0257 0.0435 0.0652 0.0915 0.123 0.161 0.208 0.227 345 345 345 345)
    active_force_length_curve: natCubicSpline: x=(-35 0 0.401 0.402 0.4035 0.52725 0.62875 0.71875 0.86125 1.045 1.2175 1.43875 1.61875 1.62 1.621 2.2 35)
        y=(0 0 0 0 0 0.226667 0.636667 0.856667 0.95 0.993333 0.77 0.246667 0 0 0 0 0)
    passive_force_length_curve: natCubicSpline: x=(-35 0.998 0.999 1.15 1.25 1.35 1.45 1.55 1.65 1.75 1.7501 1.7502 35)
        y=(0 0 0 0 0.035 0.12 0.26 0.55 1.17 2 2 2 2)
  ActuatorSet:
    ObjectGroup transfer: members=(ECRB ECUpre)
    ObjectGroup final: members=ECUpost
    ObjectGroup flexors: members=(APL EPB FCR FCU FDPI FDPL FDPM FDPR FDSI FDSL FDSM FDSR FPL PL)
    ObjectGroup extensors: members=(ECRB ECRL ECUpost ECUpre EDCI EDCL EDCM EDCR EDM EIP EPL)
    ObjectGroup radial: members=(APL ECRB ECRL EDCI EIP EPB EPL FCR FDPI FDSI FPL PL)
    ObjectGroup ulnar: members=(ECUpost ECUpre EDCL EDCR EDM FCU FDPL FDPM FDPR FDSL FDSR)
    ObjectGroup wrist: members=(ECRB ECRL ECUpost ECUpre FCR FCU)
    ObjectGroup hand: members=(EDCI EDCL EDCM EDCR EDM EIP FDPI FDPL FDPM FDPR FDSI FDSL FDSM FDSR FPL PL)
    ObjectGroup thumb: members=(APL EPB EPL)
    Schutte1993Muscle FCR: max_isometric_force=59.7 optimal_fiber_length=0.0628 tendon_slack_length=0.2185
        pennation_angle=0.05410521
      MusclePoint: humerus (0.00639 -0.27761 0.01313)
      MusclePoint: radius (0.00953 -0.21667 0.05024)
      MuscleViaPoint: trapezoid (0.01546 0.01451 -0.01399) coordinate=flexion range=(0 0)
      MusclePoint: trapezoid (0.01395 -0.0012 -0.0067)
      MusclePoint: metacarpal2 (0.00592 0.00269 0.01328)
    Schutte1993Muscle FCU: max_isometric_force=102.6 optimal_fiber_length=0.0509 tendon_slack_length=0.242
        pennation_angle=0.2111848
      MusclePoint: humerus (0.00463 -0.27768 0.01318)
      MuscleViaPoint: ulna (-0.00465 -0.22771 0.05589) coordinate=flexion range=(0.6108652 1.570796)
      MuscleViaPoint: ulna (-0.01368 -0.22899 0.05805) coordinate=flexion range=(-1.570796 -0.6108652)
      MuscleViaPoint: hamate (0.01901 0.0109 0.00261) coordinate=flexion range=(-1.570796 0)
      MuscleViaPoint: hamate (0.01899 0.0024 0.0012) coordinate=flexion range=(-1.570796 0.6108652)
      MusclePoint: metacarpal5 (0.00845 -0.0091 -0.01963)
    Schutte1993Muscle ECUpre: max_isometric_force=117 optimal_fiber_length=0.0622 tendon_slack_length=0.231
        pennation_angle=0.06108652
      MusclePoint: humerus (0.02268 -0.26804 0.06679)
      MusclePoint: radius (-0.00239 -0.01019 0.01329)
      MusclePoint: radius (-0.01094 -0.03546 0.01362)
      MusclePoint: ulna (-0.02457 -0.09422 0.03348)
      MusclePoint: ulna (-0.02793 -0.23106 0.05873)
      MusclePoint: triquetrum (-0.00094 -0.00436 -0.00442)
      MusclePoint: metacarpal5 (-0.00458 -0.00734 -0.02848)
    Schutte1993Muscle ECUpost: max_isometric_force=117 optimal_fiber_length=0.0622 tendon_slack_length=0.231
        pennation_angle=0.06108652
      MusclePoint: humerus (0.02268 -0.26804 0.06679)
      MusclePoint: radius (-0.00239 -0.01019 0.01329)
      MusclePoint: radius (-0.01094 -0.03546 0.01362)
      MusclePoint: ulna (-0.02457 -0.09422 0.03348)
      MusclePoint: ulna (-0.02463 -0.1364 0.04159)
      MusclePoint: ulna (-0.02953 -0.18933 0.07846)
      MusclePoint: radius (-0.01789 -0.19788 0.06459)
      MusclePoint: radius (-0.01779 -0.20954 0.07234)
      MusclePoint: trapezoid (-0.01575 0.00302 0.00216)
      MusclePoint: metacarpal3 (-0.01502 -0.00464 0.01507)
    Schutte1993Muscle EDM: max_isometric_force=28.8 optimal_fiber_length=0.0675 tendon_slack_length=0.347
        pennation_angle=0.05235988
      MusclePoint: humerus (0.02257 -0.26792 0.06683)
      MusclePoint: radius (-0.00523 -0.01802 0.01357)
      MusclePoint: radius (-0.01075 -0.07282 0.01237)
      MusclePoint: ulna (-0.03277 -0.22628 0.07769)
      MuscleViaPoint: triquetrum (-0.00965 -0.00461 0.00733) coordinate=deviation range=(0 0)
      MusclePoint: metacarpal5 (-0.00895 -0.00546 -0.02267)
      MusclePoint: metacarpal5 (-0.00709 -0.06329 -0.03424)
      MusclePoint: littlefinger (-0.00281 -0.10702 -0.03713)
      MusclePoint: littlefinger (-0.00027 -0.13243 -0.0357)
    Schutte1993Muscle ECRB: max_isometric_force=122.9 optimal_fiber_length=0.0585 tendon_slack_length=0.2205
        pennation_angle=0.1553343
      MusclePoint: humerus (0.02254 -0.26813 0.06679)
      MusclePoint: radius (-0.00384 -0.1248 0.05482)
      MusclePoint: radius (-0.01733 -0.20892 0.0704)
      MusclePoint: trapezoid (-0.01598 0.00257 0.00197)
      MusclePoint: metacarpal3 (-0.01528 -0.00506 0.01554)
    Schutte1993Muscle ECRL: max_isometric_force=65.7 optimal_fiber_length=0.0936 tendon_slack_length=0.2026
        pennation_angle=0.04363323
      MusclePoint: humerus (0.01337 -0.26111 0.07069)
      MusclePoint: humerus (0.02239 -0.26834 0.06679)
      MusclePoint: radius (-0.00136 -0.12953 0.05532)
      MusclePoint: radius (-0.0083 -0.21052 0.0752)
      MuscleViaPoint: trapezoid (-0.00906 0.01121 0.00572) coordinate=flexion range=(0 0)
      MuscleViaPoint: metacarpal2 (-0.01349 0.01118 0.02204) coordinate=deviation range=(0 0)
      MusclePoint: metacarpal2 (-0.01108 -0.01106 0.02568)
    Schutte1993Muscle FDSI: max_isometric_force=51.3 optimal_fiber_length=0.0835 tendon_slack_length=0.338
        pennation_angle=0.1047198
      MusclePoint: humerus (0.0035 -0.29455 0.03226)
      MuscleViaPoint: radius (0.01091 -0.21436 0.04048) coordinate=flexion range=(0.4363323 1.570796)
      MuscleViaPoint: radius (0.00183 -0.21671 0.04253) coordinate=flexion range=(-1.570796 -0.08726646)
      MuscleViaPoint: capitate (0.02244 0.01397 0.00139) coordinate=flexion range=(-1.570796 -0.6981317)
      MuscleViaPoint: capitate (0.02703 0.00411 0.00444) coordinate=flexion range=(-1.570796 -0.3490659)
      MusclePoint: capitate (0.02944 -0.01143 0.00869)
      MusclePoint: metacarpal2 (0.01297 -0.01437 0.02183)
      MusclePoint: metacarpal2 (0.00543 -0.06688 0.04728)
      MusclePoint: iphalanx1 (0.00596 -0.04624 0.00883)
      MusclePoint: iphalanx3 (0.00581 -0.0059 0.00263)
    Schutte1993Muscle FDSM: max_isometric_force=75.9 optimal_fiber_length=0.0749 tendon_slack_length=0.354
        pennation_angle=0.122173
      MusclePoint: humerus (0.0035 -0.29455 0.03226)
      MuscleViaPoint: radius (0.01048 -0.21423 0.03978) coordinate=flexion range=(0.4363323 1.570796)
      MuscleViaPoint: radius (0.0019 -0.2167 0.0438) coordinate=flexion range=(-1.570796 -0.08726646)
      MuscleViaPoint: capitate (0.02277 0.01364 0.00172) coordinate=flexion range=(-1.570796 -0.6981317)
      MuscleViaPoint: capitate (0.0269 0.0054 0.0037) coordinate=flexion range=(-1.570796 -0.3490659)
      MusclePoint: capitate (0.03 -0.0118 0.0084)
      MusclePoint: metacarpal3 (0.0144 -0.01632 0.01008)
      MusclePoint: metacarpal3 (0.00429 -0.08012 0.01596)
      MusclePoint: midfinger (-0.00048 -0.12516 0.01851)
      MusclePoint: midfinger (0.00028 -0.17254 0.02483)
    Schutte1993Muscle FDSR: max_isometric_force=48.3 optimal_fiber_length=0.0736 tendon_slack_length=0.3535
        pennation_angle=0.06981317
      MusclePoint: humerus (0.0035 -0.29455 0.03226)
      MuscleViaPoint: radius (0.01037 -0.21504 0.03862) coordinate=flexion range=(0.4363323 1.570796)
      MuscleViaPoint: radius (-0.00037 -0.21764 0.0409) coordinate=flexion range=(-1.570796 0)
      MuscleViaPoint: capitate (0.02189 0.01306 0.00048) coordinate=flexion range=(-1.570796 -0.6981317)
      MuscleViaPoint: capitate (0.02545 0.00479 0.0023) coordinate=flexion range=(-1.570796 -0.3490659)
      MusclePoint: capitate (0.0289 -0.0155 0.0073)
      MusclePoint: metacarpal3 (0.0144 -0.0252 -0.00101)
      MusclePoint: metacarpal4 (0.00807 -0.07635 -0.00696)
      MusclePoint: ringfinger (0.0033 -0.12455 -0.00441)
      MusclePoint: ringfinger (0.00672 -0.17283 0.00102)
    Schutte1993Muscle FDSL: max_isometric_force=12 optimal_fiber_length=0.0515 tendon_slack_length=0.343
        pennation_angle=0.08726646
      MusclePoint: humerus (0.0035 -0.29455 0.03226)
      MuscleViaPoint: radius (0.01048 -0.21423 0.03978) coordinate=flexion range=(0.4363323 1.570796)
      MuscleViaPoint: radius (0.001 -0.2177 0.0418) coordinate=flexion range=(-1.570796 0)
      MuscleViaPoint: capitate (0.02201 0.01258 -0.00027) coordinate=flexion range=(-1.570796 -0.6981317)
      MuscleViaPoint: capitate (0.0255 0.0021 0.0025) coordinate=flexion range=(-1.570796 -0.3490659)
      MusclePoint: capitate (0.0268 -0.0129 0.0061)
      MusclePoint: metacarpal4 (0.01463 -0.02498 -0.01151)
      MusclePoint: metacarpal5 (0.00674 -0.06152 -0.0347)
      MusclePoint: littlefinger (0.0073 -0.10135 -0.0357)
      MusclePoint: littlefinger (0.00983 -0.13986 -0.03115)
    Schutte1993Muscle FDPI: max_isometric_force=53.1 optimal_fiber_length=0.0749 tendon_slack_length=0.322
        pennation_angle=0.122173
      MusclePoint: ulna (-0.0113 -0.03157 0.00208)
      MuscleViaPoint: radius (0.00797 -0.21647 0.04395) coordinate=flexion range=(0.3490659 1.570796)
      MuscleViaPoint: radius (0.0013 -0.21659 0.04619) coordinate=flexion range=(-1.570796 0)
      MuscleViaPoint: capitate (0.02269 0.01117 0.00347) coordinate=flexion range=(-1.570796 -0.4363323)
      MuscleViaPoint: capitate (0.02499 0.00065 0.00589) coordinate=flexion range=(-1.570796 -0.3490659)
      MusclePoint: metacarpal2 (0.013 -0.0048 0.01072)
      MusclePoint: metacarpal2 (0.00363 -0.06662 0.0449)
      MusclePoint: iphalanx1 (0.00494 -0.0506 0.00914)
      MusclePoint: iphalanx2 (0.0095 -0.03028 0.00343)
    Schutte1993Muscle FDPM: max_isometric_force=66.9 optimal_fiber_length=0.0835 tendon_slack_length=0.32
        pennation_angle=0.1047198
      MusclePoint: ulna (-0.0113 -0.03157 0.00208)
      MuscleViaPoint: radius (0.00433 -0.21689 0.0427) coordinate=flexion range=(0.2617994 1.570796)
      MuscleViaPoint: radius (-0.00152 -0.21639 0.04445) coordinate=flexion range=(-1.570796 0)
      MuscleViaPoint: capitate (0.02125 0.01055 0.00154) coordinate=flexion range=(-1.570796 -0.4363323)
      MuscleViaPoint: capitate (0.02346 0.00125 0.00384) coordinate=flexion range=(-1.570796 -0.1745329)
      MusclePoint: metacarpal3 (0.01168 -0.00745 0.00755)
      MusclePoint: metacarpal3 (0.00765 -0.07598 0.01288)
      MusclePoint: midfinger (0.00087 -0.1259 0.01853)
      MusclePoint: midfinger (0.00142 -0.16485 0.0224)
    Schutte1993Muscle FDPR: max_isometric_force=51.6 optimal_fiber_length=0.0798 tendon_slack_length=0.314
        pennation_angle=0.122173
      MusclePoint: ulna (-0.0113 -0.03157 0.00208)
      MuscleViaPoint: radius (0.00438 -0.21834 0.03741) coordinate=flexion range=(0.3141593 1.570796)
      MuscleViaPoint: radius (-0.00261 -0.217 0.04286) coordinate=flexion range=(-1.570796 -0.296706)
      MuscleViaPoint: capitate (0.0238 0.01117 -0.00097) coordinate=flexion range=(-1.570796 -0.4363323)
      MuscleViaPoint: capitate (0.02829 0.00175 0.00473) coordinate=flexion range=(-1.570796 0.1745329)
      MusclePoint: metacarpal3 (0.01263 -0.0153 0.00166)
      MusclePoint: metacarpal4 (0.00788 -0.07665 -0.0056)
      MusclePoint: ringfinger (0.00288 -0.12885 -0.0044)
      MusclePoint: ringfinger (0.00609 -0.15981 -0.0023)
    Schutte1993Muscle FDPL: max_isometric_force=66 optimal_fiber_length=0.0749 tendon_slack_length=0.3036
        pennation_angle=0.1396263
      MusclePoint: ulna (-0.0113 -0.03157 0.00208)
      MuscleViaPoint: radius (0.00377 -0.21886 0.03584) coordinate=flexion range=(0.3490659 1.570796)
      MuscleViaPoint: radius (-0.0015 -0.217 0.0433) coordinate=flexion range=(-1.570796 -0.296706)
      MuscleViaPoint: capitate (0.02424 0.01233 0.0008) coordinate=flexion range=(-1.570796 -0.4363323)
      MuscleViaPoint: capitate (0.02829 0.00175 0.00473) coordinate=flexion range=(-1.570796 0.1745329)
      MusclePoint: metacarpal4 (0.01286 -0.01597 -0.00617)
      MusclePoint: metacarpal5 (0.00655 -0.06359 -0.03689)
      MusclePoint: littlefinger (0.00865 -0.10564 -0.03479)
      MusclePoint: littlefinger (0.0092 -0.13216 -0.03269)
    Schutte1993Muscle EDCL: max_isometric_force=18 optimal_fiber_length=0.065 tendon_slack_length=0.3495
        pennation_angle=0.03490659
      MusclePoint: humerus (0.01056 -0.26789 0.07127)
      MusclePoint: radius (-0.0082 -0.04004 0.01668)
      MusclePoint: radius (-0.01974 -0.18469 0.04807)
      MusclePoint: radius (-0.02211 -0.21097 0.05287)
      MuscleViaPoint: scaphoid (-0.01357 -0.0079 -0.01241) coordinate=deviation range=(0 0)
      MuscleViaPoint: capitate (-0.00192 -0.01151 0.00084) coordinate=deviation range=(0 0)
      MuscleViaPoint: metacarpal3 (-0.01096 -0.02472 -0.01035) coordinate=flexion range=(-0.06981317 1.745329)
      MusclePoint: metacarpal5 (-0.00801 -0.06389 -0.03508)
      MusclePoint: littlefinger (-0.00303 -0.10372 -0.03765)
      MusclePoint: littlefinger (0.00129 -0.13957 -0.03333)
    Schutte1993Muscle EDCR: max_isometric_force=38.7 optimal_fiber_length=0.0626 tendon_slack_length=0.39
        pennation_angle=0.05235988
      MusclePoint: humerus (0.01011 -0.26789 0.07127)
      MusclePoint: radius (-0.0082 -0.04004 0.01668)
      MusclePoint: radius (-0.01766 -0.18446 0.04898)
      MusclePoint: radius (-0.02021 -0.21054 0.05596)
      MuscleViaPoint: scaphoid (-0.01286 -0.0042 -0.01106) coordinate=deviation range=(0 0)
      MuscleViaPoint: metacarpal3 (-0.00903 0.00837 -0.00741) coordinate=flexion range=(0.2268928 1.745329)
      MusclePoint: metacarpal4 (-0.01378 -0.07606 -0.01001)
      MusclePoint: ringfinger (-0.0088 -0.12604 -0.00859)
      MusclePoint: ringfinger (-0.00093 -0.16987 -0.00249)
    Schutte1993Muscle EDCM: max_isometric_force=45.9 optimal_fiber_length=0.0724 tendon_slack_length=0.39
        pennation_angle=0.05235988
      MusclePoint: humerus (0.01011 -0.26789 0.07127)
      MusclePoint: radius (-0.0082 -0.04004 0.01668)
      MusclePoint: radius (-0.01675 -0.18466 0.04682)
      MusclePoint: radius (-0.01933 -0.21054 0.05152)
      MuscleViaPoint: scaphoid (-0.01198 -0.00332 -0.01283) coordinate=deviation range=(0 0)
      MuscleViaPoint: metacarpal3 (-0.01257 0.00659 -0.00208) coordinate=flexion range=(-0.3141593 1.745329)
      MusclePoint: metacarpal3 (-0.01348 -0.07696 0.01108)
      MusclePoint: midfinger (-0.01347 -0.13109 0.01966)
      MusclePoint: midfinger (-0.00737 -0.17492 0.02576)
    Schutte1993Muscle EDCI: max_isometric_force=23.4 optimal_fiber_length=0.07 tendon_slack_length=0.385
        pennation_angle=0.05235988
      MusclePoint: humerus (0.01011 -0.26789 0.07127)
      MusclePoint: radius (-0.0082 -0.04004 0.01668)
      MusclePoint: radius (-0.02209 -0.18446 0.04898)
      MusclePoint: radius (-0.02376 -0.21054 0.0533)
      MuscleViaPoint: scaphoid (-0.01359 -0.00761 -0.01108) coordinate=deviation range=(0 0)
      MuscleViaPoint: capitate (-0.00196 -0.00655 0.00232) coordinate=deviation range=(0 0)
      MuscleViaPoint: metacarpal3 (-0.01421 -0.01886 0.0078) coordinate=flexion range=(0 1.745329)
      MusclePoint: metacarpal2 (-0.01225 -0.06926 0.04042)
      MusclePoint: iphalanx1 (-0.00658 -0.04852 0.0044)
      MusclePoint: iphalanx3 (-0.00291 -0.01043 0.00007)
    Schutte1993Muscle FPL: max_isometric_force=62.4 optimal_fiber_length=0.0552 tendon_slack_length=0.1988
        pennation_angle=0.122173
      MusclePoint: radius (-0.00284 -0.09605 0.02992)
      MusclePoint: radius (-0.00166 -0.13532 0.04257)
      MusclePoint: radius (-0.00037 -0.16882 0.04439)
      MuscleViaPoint: radius (0.00345 -0.21433 0.04621) coordinate=flexion range=(-1.570796 0.1745329)
      MuscleViaPoint: thumb (0.00577 0.01018 -0.01528) coordinate=flexion range=(-1.570796 0)
      MusclePoint: thumb (0.0063 -0.0177 0.0199)
      MusclePoint: thumb (0.00009 -0.04175 0.03446)
      MusclePoint: thumb (0.00081 -0.04594 0.03877)
      MusclePoint: thumb (0.00577 -0.06923 0.04948)
      MusclePoint: thumb (0.00493 -0.07776 0.05542)
    Schutte1993Muscle APL: max_isometric_force=57.9 optimal_fiber_length=0.0713 tendon_slack_length=0.125
        pennation_angle=0.1308997
      MusclePoint: radius (-0.00494 -0.09677 0.03004)
      MusclePoint: radius (-0.00892 -0.13772 0.05255)
      MusclePoint: radius (-0.0066 -0.15947 0.06132)
      MusclePoint: radius (-0.00682 -0.17731 0.06462)
      MusclePoint: radius (-0.00282 -0.20831 0.07607)
      MuscleViaPoint: radius (0.00117 -0.21506 0.07845) coordinate=flexion range=(-1.570796 -0.4712389)
      MuscleViaPoint: trapezium (0.00722 0.00906 0.01082) coordinate=flexion range=(-1.570796 0.6981317)
      MusclePoint: thumb (0.00384 0.00196 0.01452)
      MusclePoint: thumb (0.00816 -0.02324 0.03082)
    Schutte1993Muscle EPB: max_isometric_force=14.1 optimal_fiber_length=0.0675 tendon_slack_length=0.11
        pennation_angle=0.1256637
      MusclePoint: radius (-0.00294 -0.13573 0.04196)
      MusclePoint: radius (-0.00701 -0.14896 0.04387)
      MusclePoint: radius (-0.01283 -0.17881 0.05817)
      MusclePoint: radius (-0.00547 -0.19041 0.06961)
      MusclePoint: radius (0.00469 -0.21769 0.0756)
      MuscleViaPoint: trapezium (-0.00078 0.00458 0.01475) coordinate=flexion range=(-1.570796 -0.4886922)
      MusclePoint: thumb (-0.00387 0.00011 0.01647)
      MusclePoint: thumb (0.00452 -0.02214 0.03593)
      MusclePoint: thumb (0.0073 -0.03012 0.04408)
      MusclePoint: thumb (0.00871 -0.03603 0.048)
    Schutte1993Muscle EPL: max_isometric_force=44.1 optimal_fiber_length=0.054 tendon_slack_length=0.22
        pennation_angle=0.1047198
      MusclePoint: ulna (-0.02127 -0.0916 0.03268)
      MusclePoint: radius (-0.01652 -0.16952 0.03814)
      MusclePoint: radius (-0.01762 -0.20537 0.0523)
      MusclePoint: scaphoid (-0.008 0.00038 -0.00774)
      MusclePoint: scaphoid (-0.0084 -0.00663 0.00319)
      MusclePoint: thumb (-0.0133 -0.00263 0.01214)
      MusclePoint: thumb (-0.00352 -0.03198 0.04462)
      MusclePoint: thumb (0.00081 -0.04107 0.05071)
      MusclePoint: thumb (0.00966 -0.06693 0.06022)
      MusclePoint: thumb (0.01228 -0.07282 0.06269)
    Schutte1993Muscle EIP: max_isometric_force=25.2 optimal_fiber_length=0.0589 tendon_slack_length=0.24804
        pennation_angle=0.1047198
      MusclePoint: ulna (-0.01974 -0.14668 0.04449)
      MusclePoint: radius (-0.01612 -0.20811 0.05228)
      MusclePoint: scaphoid (-0.01119 -0.00448 -0.00483)
      MusclePoint: metacarpal2 (-0.01312 0.00595 0.0075)
      MusclePoint: metacarpal2 (-0.01022 -0.07179 0.04293)
      MusclePoint: iphalanx3 (-0.00452 -0.0182 0.00396)
    Schutte1993Muscle PL: max_isometric_force=20.7 optimal_fiber_length=0.0638 tendon_slack_length=0.236
        pennation_angle=0.06981317
      MusclePoint: humerus (0.00468 -0.27698 0.01316)
      MusclePoint: radius (0.01122 -0.20758 0.04487)
      MuscleViaPoint: capitate (0.03689 0.00135 0.00732) coordinate=flexion range=(-1.570796 0.6108652)
      MusclePoint: metacarpal3 (0.00932 -0.02377 0.00981)
  DynamicsEngine:
    SimmKinematicsEngine: gravity=(0 -9.80665 0)
      BodySet:
        SimmBody [values shared by the 28 below unless stated]: mass=0 mass_center=(0 0 0) inertia=(0 0 0 0 0 0 0 0 0)
        SimmBody humerus: meshes=humerus.vtp
        SimmBody ulna: meshes=ulna.vtp
        SimmBody radius: meshes=radius.vtp
        SimmBody trapezium: meshes=r_trpzm.vtp
        SimmBody trapezoid: meshes=r_trpzd.vtp
        SimmBody scaphoid: meshes=r_scaph.vtp
        SimmBody capitate: meshes=r_cap.vtp
        SimmBody hamate: meshes=r_ham.vtp
        SimmBody lunate: meshes=r_lun.vtp
        SimmBody pisiform: meshes=r_pis.vtp
        SimmBody triquetrum: meshes=r_triq.vtp
        SimmBody rotaxis
        SimmBody auxprfem
        SimmBody auxprrud
        SimmBody auxdrfem
        SimmBody auxdrrud
        SimmBody carp_metacarp
        SimmBody metacarpal2: meshes=fingers1.vtp
        SimmBody iphalanx1: meshes=fingers2.vtp
        SimmBody iphalanx2: meshes=fingers3.vtp
        SimmBody iphalanx3: meshes=fingers4.vtp
        SimmBody metacarpal3: meshes=fingers8.vtp
        SimmBody midfinger: meshes=(fingers6.vtp fingers7.vtp fingers5.vtp)
        SimmBody metacarpal4: meshes=fingers12.vtp
        SimmBody ringfinger: meshes=(fingers10.vtp fingers11.vtp fingers9.vtp)
        SimmBody metacarpal5: meshes=fingers16.vtp
        SimmBody littlefinger: meshes=(fingers14.vtp fingers15.vtp fingers13.vtp)
        SimmBody thumb: meshes=(fingers17.vtp fingers18.vtp fingers19.vtp)
      SimmCoordinate [values shared by the 10 below unless stated]: default_value=0 tolerance=0 stiffness=0
          clamped=true restraint_active=false
      SimmCoordinate elbow_flexion: range=(0 2.268928) keys=(e_key leftmouse_button)
      SimmCoordinate flexion: range=(-1.22173 1.22173) keys=(f_key leftmouse_button)
      SimmCoordinate pro_sup: range=(-1.570796 1.570796) keys=(p_key leftmouse_button)
      SimmCoordinate deviation: range=(-0.4363323 0.6108652) keys=(v_key leftmouse_button)
      SimmCoordinate MCP2_lateral: range=(-0.3490659 0.3490659)
      SimmCoordinate MCP2_flex: range=(-0.1745329 1.570796) keys=m_key
      SimmCoordinate PIP_flex: range=(-0.08726646 1.570796)
      SimmCoordinate DIP_flex: range=(-0.08726646 1.570796)
      SimmCoordinate thumb_abd: range=(-0.7853982 0.2617994)
      SimmCoordinate thumb_flex: range=(-0.7853982 1.570796)
      JointSet:
        SimmJoint elbow: bodies=(humerus ulna)
          DofSet:
            SimmTranslationDof tx:
              Value: Constant(value=0.0127)
            SimmTranslationDof ty:
              Value: Constant(value=-0.274)
            SimmTranslationDof tz:
              Value: Constant(value=0.0389)
            SimmRotationDof r1: axis=(0.2260469 0.1910399 0.9551997) coordinate=elbow_flexion
              Value:
                natCubicSpline: x=(-6.283185 6.283185) y=(-6.283185 6.283185)
            SimmRotationDof r2: axis=(0 1 0)
              Value: Constant(value=0)
            SimmRotationDof r3: axis=(1 0 0)
              Value: Constant(value=0)
        SimmJoint radioulnar: bodies=(ulna radius)
          DofSet:
            SimmTranslationDof tx:
              Value: Constant(value=-0.0065)
            SimmTranslationDof ty:
              Value: Constant(value=-0.008)
            SimmTranslationDof tz:
              Value: Constant(value=0.027)
            SimmRotationDof r1: axis=(0 0 1)
              Value: Constant(value=0)
            SimmRotationDof r2: axis=(0.05639802 0.9835774 -0.1714491) coordinate=pro_sup
              Value:
                natCubicSpline: x=(-6.283185 6.283185) y=(-6.283185 6.283185)
            SimmRotationDof r3: axis=(1 0 0)
              Value: Constant(value=0)
        SimmJoint rad-rotaxis: bodies=(radius rotaxis)
          DofSet:
            SimmTranslationDof tx:
              Value: Constant(value=-0.0085)
            SimmTranslationDof ty:
              Value: Constant(value=-0.2313)
            SimmTranslationDof tz:
              Value: Constant(value=0.0561)
            SimmRotationDof r1: axis=(1 0 0)
              Value: Constant(value=-0.2617994)
            SimmRotationDof r2: axis=(0 1 0)
              Value: Constant(value=0.3926991)
            SimmRotationDof r3: axis=(0 0 1)
              Value: Constant(value=0)
        SimmJoint rotaxis-auxprfem: bodies=(rotaxis auxprfem)
          DofSet:
            SimmTranslationDof tx:
              Value: Constant(value=-0.001)
            SimmTranslationDof ty:
              Value: Constant(value=0.009)
            SimmTranslationDof tz:
              Value: Constant(value=0)
            SimmRotationDof r1: axis=(1 0 0)
              Value: Constant(value=0)
            SimmRotationDof r2: axis=(0 1 0)
              Value: Constant(value=0)
            SimmRotationDof r3: axis=(0 0 1) coordinate=flexion
              Value:
                natCubicSpline: x=(-1.570796 1.570796) y=(-0.7853982 0.7853982)
        SimmJoint auxprfem-auxprrud: bodies=(auxprfem auxprrud)
          DofSet:
            SimmTranslationDof tx:
              Value: Constant(value=0)
            SimmTranslationDof ty:
              Value: Constant(value=0)
            SimmTranslationDof tz:
              Value: Constant(value=0)
            SimmRotationDof r1: axis=(1 0 0) coordinate=deviation
              Value:
                natCubicSpline: x=(-0.4363323 0 0.6108652) y=(-0.1636246 0 0.3054326)
            SimmRotationDof r2: axis=(0 1 0)
              Value: Constant(value=0)
            SimmRotationDof r3: axis=(0 0 1)
              Value: Constant(value=0)
        SimmJoint auxprrud-auxdrfem: bodies=(auxprrud auxdrfem)
          DofSet:
            SimmTranslationDof tx:
              Value: Constant(value=0.001)
            SimmTranslationDof ty:
              Value: Constant(value=-0.02)
            SimmTranslationDof tz:
              Value: Constant(value=0)
            SimmRotationDof r1: axis=(1 0 0)
              Value: Constant(value=0)
            SimmRotationDof r2: axis=(0 1 0)
              Value: Constant(value=0)
            SimmRotationDof r3: axis=(0 0 1) coordinate=flexion
              Value:
                natCubicSpline: x=(-1.22173 1.22173) y=(-0.6108652 0.6108652)
        SimmJoint auxdrfem-auxdrrud: bodies=(auxdrfem auxdrrud)
          DofSet:
            SimmTranslationDof tx:
              Value: Constant(value=0)
            SimmTranslationDof ty:
              Value: Constant(value=0)
            SimmTranslationDof tz:
              Value: Constant(value=0)
            SimmRotationDof r1: axis=(1 0 0) coordinate=deviation
              Value:
                natCubicSpline: x=(-0.4363323 0 0.6108652) y=(-0.2727077 0 0.3054326)
            SimmRotationDof r2: axis=(0 1 0)
              Value: Constant(value=0)
            SimmRotationDof r3: axis=(0 0 1)
              Value: Constant(value=0)
        SimmJoint prox-scaph: bodies=(auxprrud scaphoid)
          DofSet:
            SimmTranslationDof tx:
              Value: Constant(value=-0.0035)
            SimmTranslationDof ty:
              Value: Constant(value=-0.0025)
            SimmTranslationDof tz:
              Value: Constant(value=0.009)
            SimmRotationDof r1: axis=(1 0 0)
              Value: Constant(value=0.4014257)
            SimmRotationDof r2: axis=(0 1 0)
              Value: Constant(value=0)
            SimmRotationDof r3: axis=(0 0 1)
              Value: Constant(value=0)
        SimmJoint prox-lun: bodies=(auxprrud lunate)
          DofSet:
            SimmTranslationDof tx:
              Value: Constant(value=-0.004)
            SimmTranslationDof ty:
              Value: Constant(value=-0.0015)
            SimmTranslationDof tz:
              Value: Constant(value=-0.007)
            SimmRotationDof r1: axis=(1 0 0)
              Value: Constant(value=0)
            SimmRotationDof r2: axis=(0 1 0)
              Value: Constant(value=0)
            SimmRotationDof r3: axis=(0 0 1)
              Value: Constant(value=0)
        SimmJoint dist-trpzm: bodies=(auxdrrud trapezium)
          DofSet:
            SimmTranslationDof tx:
              Value: Constant(value=0.0035)
            SimmTranslationDof ty:
              Value: Constant(value=-0.0035)
            SimmTranslationDof tz:
              Value: Constant(value=0.02)
            SimmRotationDof r1: axis=(1 0 0)
              Value: Constant(value=-0.2617994)
            SimmRotationDof r2: axis=(0 1 0)
              Value: Constant(value=0)
            SimmRotationDof r3: axis=(0 0 1)
              Value: Constant(value=0)
        SimmJoint dist-trpzd: bodies=(auxdrrud trapezoid)
          DofSet:
            SimmTranslationDof tx:
              Value: Constant(value=-0.0015)
            SimmTranslationDof ty:
              Value: Constant(value=-0.0044)
            SimmTranslationDof tz:
              Value: Constant(value=0.0134)
            SimmRotationDof r1: axis=(1 0 0)
              Value: Constant(value=0.3490659)
            SimmRotationDof r2: axis=(0 1 0)
              Value: Constant(value=-0.1745329)
            SimmRotationDof r3: axis=(0 0 1)
              Value: Constant(value=0)
        SimmJoint dist-cap: bodies=(auxdrrud capitate)
          DofSet:
            SimmTranslationDof tx:
              Value: Constant(value=-0.0155)
            SimmTranslationDof ty:
              Value: Constant(value=-0.0018)
            SimmTranslationDof tz:
              Value: Constant(value=-0.0055)
            SimmRotationDof r1: axis=(1 0 0)
              Value: Constant(value=0.1745329)
            SimmRotationDof r2: axis=(0 1 0)
              Value: Constant(value=0)
            SimmRotationDof r3: axis=(0 0 1)
              Value: Constant(value=0)
        SimmJoint prox-pis: bodies=(auxprrud pisiform)
          DofSet:
            SimmTranslationDof tx:
              Value: Constant(value=0.005)
            SimmTranslationDof ty:
              Value: Constant(value=-0.015)
            SimmTranslationDof tz:
              Value: Constant(value=-0.0201)
            SimmRotationDof r1: axis=(1 0 0)
              Value: Constant(value=0)
            SimmRotationDof r2: axis=(0 1 0)
              Value: Constant(value=0)
            SimmRotationDof r3: axis=(0 0 1)
              Value: Constant(value=0)
        SimmJoint prox-triq: bodies=(auxprrud triquetrum)
          DofSet:
            SimmTranslationDof tx:
              Value: Constant(value=-0.0055)
            SimmTranslationDof ty:
              Value: Constant(value=-0.01)
            SimmTranslationDof tz:
              Value: Constant(value=-0.021)
            SimmRotationDof r1: axis=(1 0 0)
              Value: Constant(value=0)
            SimmRotationDof r2: axis=(0 1 0)
              Value: Constant(value=0)
            SimmRotationDof r3: axis=(0 0 1)
              Value: Constant(value=0)
        SimmJoint dist-ham: bodies=(auxdrrud hamate)
          DofSet:
            SimmTranslationDof tx:
              Value: Constant(value=-0.006)
            SimmTranslationDof ty:
              Value: Constant(value=-0.005)
            SimmTranslationDof tz:
              Value: Constant(value=-0.0175)
            SimmRotationDof r1: axis=(1 0 0)
              Value: Constant(value=-0.2094395)
            SimmRotationDof r2: axis=(0 1 0)
              Value: Constant(value=0)
            SimmRotationDof r3: axis=(0 0 1)
              Value: Constant(value=0)
        SimmJoint auxCMC: bodies=(auxdrrud carp_metacarp)
          DofSet:
            SimmTranslationDof tx:
              Value: Constant(value=0)
            SimmTranslationDof ty:
              Value: Constant(value=0)
            SimmTranslationDof tz:
              Value: Constant(value=0)
            SimmRotationDof r1: axis=(1 0 0)
              Value: Constant(value=0)
            SimmRotationDof r2: axis=(0 1 0)
              Value: Constant(value=0)
            SimmRotationDof r3: axis=(0 0 1)
              Value: Constant(value=0)
        SimmJoint CMC2: bodies=(carp_metacarp metacarpal2)
          DofSet:
            SimmTranslationDof tx:
              Value: Constant(value=-0.0047)
            SimmTranslationDof ty:
              Value: Constant(value=-0.0095)
            SimmTranslationDof tz:
              Value: Constant(value=-0.005)
            SimmRotationDof r1: axis=(1 0 0)
              Value: Constant(value=0.1745329)
            SimmRotationDof r2: axis=(0 1 0)
              Value: Constant(value=0.2617994)
            SimmRotationDof r3: axis=(0 0 1)
              Value: Constant(value=0)
        SimmJoint MCP2: bodies=(metacarpal2 iphalanx1)
          DofSet:
            SimmTranslationDof tx:
              Value: Constant(value=-0.002402)
            SimmTranslationDof ty:
              Value: Constant(value=-0.0685)
            SimmTranslationDof tz:
              Value: Constant(value=0.045)
            SimmRotationDof r1: axis=(1 0 0) coordinate=MCP2_lateral
              Value:
                natCubicSpline: x=(-6.283185 6.283185) y=(-6.283185 6.283185)
            SimmRotationDof r2: axis=(0 1 0)
              Value: Constant(value=0)
            SimmRotationDof r3: axis=(0 0 1) coordinate=MCP2_flex
              Value:
                natCubicSpline: x=(-6.283185 6.283185) y=(-6.283185 6.283185)
        SimmJoint PIP: bodies=(iphalanx1 iphalanx2)
          DofSet:
            SimmTranslationDof tx:
              Value: Constant(value=0.0005)
            SimmTranslationDof ty:
              Value: Constant(value=-0.04826)
            SimmTranslationDof tz:
              Value: Constant(value=0.00799)
            SimmRotationDof r1: axis=(1 0 0)
              Value: Constant(value=0)
            SimmRotationDof r2: axis=(0 1 0)
              Value: Constant(value=0)
            SimmRotationDof r3: axis=(0 0 1) coordinate=PIP_flex
              Value:
                natCubicSpline: x=(-6.283185 6.283185) y=(-6.283185 6.283185)
        SimmJoint DIP: bodies=(iphalanx2 iphalanx3)
          DofSet:
            SimmTranslationDof tx:
              Value: Constant(value=0.00193)
            SimmTranslationDof ty:
              Value: Constant(value=-0.03277)
            SimmTranslationDof tz:
              Value: Constant(value=0.00472)
            SimmRotationDof r1: axis=(1 0 0)
              Value: Constant(value=0)
            SimmRotationDof r2: axis=(0 1 0)
              Value: Constant(value=0)
            SimmRotationDof r3: axis=(0 0 1) coordinate=DIP_flex
              Value:
                natCubicSpline: x=(-6.283185 6.283185) y=(-6.283185 6.283185)
        SimmJoint CMC3: bodies=(carp_metacarp metacarpal3)
          DofSet:
            SimmTranslationDof tx:
              Value: Constant(value=-0.0047)
            SimmTranslationDof ty:
              Value: Constant(value=-0.0085)
            SimmTranslationDof tz:
              Value: Constant(value=-0.005)
            SimmRotationDof r1: axis=(1 0 0)
              Value: Constant(value=0.08726646)
            SimmRotationDof r2: axis=(0 1 0)
              Value: Constant(value=0.1745329)
            SimmRotationDof r3: axis=(0 0 1)
              Value: Constant(value=0.08726646)
        SimmJoint MCP3: bodies=(metacarpal3 midfinger)
          DofSet:
            SimmTranslationDof tx:
              Value: Constant(value=0)
            SimmTranslationDof ty:
              Value: Constant(value=-0.003)
            SimmTranslationDof tz:
              Value: Constant(value=0)
            SimmRotationDof r1: axis=(1 0 0)
              Value: Constant(value=0)
            SimmRotationDof r2: axis=(0 1 0)
              Value: Constant(value=0)
            SimmRotationDof r3: axis=(0 0 1)
              Value: Constant(value=0)
        SimmJoint CMC4: bodies=(carp_metacarp metacarpal4)
          DofSet:
            SimmTranslationDof tx:
              Value: Constant(value=-0.0047)
            SimmTranslationDof ty:
              Value: Constant(value=-0.008)
            SimmTranslationDof tz:
              Value: Constant(value=-0.0033)
            SimmRotationDof r1: axis=(1 0 0)
              Value: Constant(value=0.08726646)
            SimmRotationDof r2: axis=(0 1 0)
              Value: Constant(value=0.1745329)
            SimmRotationDof r3: axis=(0 0 1)
              Value: Constant(value=0.08726646)
        SimmJoint MCP4: bodies=(metacarpal4 ringfinger)
          DofSet:
            SimmTranslationDof tx:
              Value: Constant(value=0)
            SimmTranslationDof ty:
              Value: Constant(value=-0.0025)
            SimmTranslationDof tz:
              Value: Constant(value=0)
            SimmRotationDof r1: axis=(1 0 0)
              Value: Constant(value=0)
            SimmRotationDof r2: axis=(0 1 0)
              Value: Constant(value=0)
            SimmRotationDof r3: axis=(0 0 1)
              Value: Constant(value=0)
        SimmJoint CMC5: bodies=(carp_metacarp metacarpal5)
          DofSet:
            SimmTranslationDof tx:
              Value: Constant(value=-0.002)
            SimmTranslationDof ty:
              Value: Constant(value=-0.01)
            SimmTranslationDof tz:
              Value: Constant(value=0.0035)
            SimmRotationDof r1: axis=(1 0 0)
              Value: Constant(value=0.08726646)
            SimmRotationDof r2: axis=(0 1 0)
              Value: Constant(value=0.1745329)
            SimmRotationDof r3: axis=(0 0 1)
              Value: Constant(value=0.08726646)
        SimmJoint MCP5: bodies=(metacarpal5 littlefinger)
          DofSet:
            SimmTranslationDof tx:
              Value: Constant(value=0)
            SimmTranslationDof ty:
              Value: Constant(value=-0.002)
            SimmTranslationDof tz:
              Value: Constant(value=0)
            SimmRotationDof r1: axis=(1 0 0)
              Value: Constant(value=0)
            SimmRotationDof r2: axis=(0 1 0)
              Value: Constant(value=0)
            SimmRotationDof r3: axis=(0 0 1)
              Value: Constant(value=0)
        SimmJoint CMC1: bodies=(carp_metacarp thumb)
          DofSet:
            SimmTranslationDof tx:
              Value: Constant(value=0.008)
            SimmTranslationDof ty:
              Value: Constant(value=-0.0045)
            SimmTranslationDof tz:
              Value: Constant(value=0.0219)
            SimmRotationDof r1: axis=(1 0 0) coordinate=thumb_abd
              Value:
                natCubicSpline: x=(-6.283185 6.283185) y=(-6.283185 6.283185)
            SimmRotationDof r2: axis=(0.05639802 0.9835774 -0.1714491) coordinate=thumb_flex
              Value:
                natCubicSpline: x=(-6.283185 6.283185) y=(-6.283185 6.283185)
            SimmRotationDof r3: axis=(0 0 1)
              Value: Constant(value=0)
