Model Sep Legs with Muscles:
  angle_units: radians
  credits:
    Delp, S.L., Loan, J.P., Hoy, M.G., Zajac, F.E., Topp E.L., Rosen, J.M.
  publications:
    An interactive graphics-based model of the lower extremity to study orthopaedic surgical procedures. IEEE Transactions on Biomedical Engineering, vol. 37, pp. 757-767, 1990.
  defaults: SimmZajacHill defaultmuscle:
    tendon_force_length_curve: natCubicSpline: x=(-10 -0.002 -0.001 0 0.00131 0.00281 0.00431 0.00581 0.00731 0.00881 0.0103 0.0118 0.0123 9.2 9.201 9.202 20)
        y=(0 0 0 0 0.0108 0.0257 0.0435 0.0652 0.0915 0.123 0.161 0.208 0.227 345 345 345 345)
    active_force_length_curve: natCubicSpline: x=(-5 0 0.401 0.402 0.4035 0.52725 0.62875 0.71875 0.86125 1.045 1.2175 1.43875 1.61875 1.62 1.621 2.2 5)
        y=(0 0 0 0 0 0.226667 0.636667 0.856667 0.95 0.993333 0.77 0.246667 0 0 0 0 0)
    passive_force_length_curve: natCubicSpline: x=(-5 0.998 0.999 1 1.1 1.2 1.3 1.4 1.5 1.6 1.601 1.602 5)
        y=(0 0 0 0 0.035 0.12 0.26 0.55 1.17 2 2 2 2)
  ActuatorSet:
    ObjectGroup r hip abductors: members=(GMAX1 GMED1 GMED2 GMED3 GMIN1 GMIN2 GMIN3 PERI SAR TFL)
    ObjectGroup r hip flexors: members=(ADDBREV ADDLONG GMED1 GMIN1 GRA ILIACUS PECT PSOAS RF SAR TFL)
    ObjectGroup r hip int rotators: members=(GMED1 GMIN1 ILIACUS PSOAS TFL)
    ObjectGroup r hip ext rotators: members=(GLEM GMED3 GMIN3 PERI QUADFEM)
    ObjectGroup r hip extensors: members=(ADDLONG AMAG1 AMAG2 AMAG3 BIFEMLH GMAX1 GMAX2 GMAX3 GMED3 GMIN3 HAMSTRINGS SEMIMEM SEMITEN)
    ObjectGroup r hip adductors: members=(ADDBREV ADDLONG AMAG1 AMAG2 AMAG3 BIFEMLH GRA HAMSTRINGS PECT SEMIMEM SEMITEN)
    ObjectGroup r knee flexors: members=(BIFEMLH BIFEMSH GASTROC GRA HAMSTRINGS LATGAS MEDGAS SAR SEMIMEM SEMITEN)
    ObjectGroup r knee extensors: members=(LIGPAT RF VASINT VASLAT VASMED)
    ObjectGroup r ankle plantar flexors: members=(FLEXDIG FLEXHAL GASTROC LATGAS MEDGAS PERBREV PERLONG SOL TIBPOST)
    ObjectGroup r ankle dorsiflexors: members=(EXTDIG EXTHAL PERTERT TIBANT TPOST2)
    ObjectGroup r invertors: members=(EXTHAL FLEXDIG FLEXHAL TIBANT TIBPOST)
    ObjectGroup r evertors: members=(EXTDIG PERBREV PERLONG PERTERT TPOST2)
    ObjectGroup l hip abductors: members=(LGMAX1 LGMED1 LGMED2 LGMED3 LGMIN1 LGMIN2 LGMIN3 LPERI LTFL LSAR)
    ObjectGroup l hip flexors: members=(LADDBREV LADDLONG LGMED1 LGMIN1 LGRA LILIACUS LPECT LPSOAS LRF LTFL LSAR)
    ObjectGroup l hip int rotators: members=(LGMED1 LGMIN1 LILIACUS LPSOAS LTFL)
    ObjectGroup l hip ext rotators: members=(LGLEM LGMED3 LGMIN3 LPERI LQUADFEM)
    ObjectGroup l hip extensors: members=(LADDLONG LAMAG1 LAMAG2 LAMAG3 LBIFEMLH LGMAX1 LGMAX2 LGMAX3 LGMED3 LGMIN3 LHAMSTRINGS LSEMIMEM LSEMITEN)
    ObjectGroup l hip adductors: members=(LADDBREV LADDLONG LAMAG1 LAMAG2 LAMAG3 LBIFEMLH LGRA LHAMSTRINGS LPECT LSEMIMEM LSEMITEN)
    ObjectGroup l knee flexors: members=(LBIFEMLH LBIFEMSH LGASTROC LGRA LHAMSTRINGS LLATGAS LMEDGAS LSEMIMEM LSEMITEN LSAR)
    ObjectGroup l knee extensors: members=(LLIGPAT LRF LVASINT LVASLAT LVASMED)
    ObjectGroup l ankle plantar flexors: members=(LFLEXDIG LFLEXHAL LGASTROC LLATGAS LMEDGAS LPERBREV LPERLONG LSOL LTIBPOST)
    ObjectGroup l ankle dorsiflexors: members=(LEXTDIG LEXTHAL LPERTERT LTIBANT LTPOST2)
    ObjectGroup l invertors: members=(LEXTHAL LFLEXDIG LFLEXHAL LTIBANT LTIBPOST)
    ObjectGroup l evertors: members=(LEXTDIG LPERBREV LPERLONG LPERTERT LTPOST2)
    SimmZajacHill GMED1: max_isometric_force=546 optimal_fiber_length=0.0535 tendon_slack_length=0.078
        pennation_angle=0.1396263
      MusclePoint: r_pelvis (-0.0408 0.0304 0.1209)
      MusclePoint: r_femur (-0.0218 -0.0117 0.0555)
    SimmZajacHill GMED2: max_isometric_force=382 optimal_fiber_length=0.0845 tendon_slack_length=0.053
        pennation_angle=0
      MusclePoint: r_pelvis (-0.0855 0.0445 0.0766)
      MusclePoint: r_femur (-0.0258 -0.0058 0.0527)
    SimmZajacHill GMED3: max_isometric_force=435 optimal_fiber_length=0.0646 tendon_slack_length=0.053
        pennation_angle=0.3316126
      MusclePoint: r_pelvis (-0.1223 0.0105 0.0648)
      MusclePoint: r_femur (-0.0309 -0.0047 0.0518)
    SimmZajacHill GMIN1: max_isometric_force=180 optimal_fiber_length=0.068 tendon_slack_length=0.016
        pennation_angle=0.1745329
      MusclePoint: r_pelvis (-0.0467 -0.008 0.1056)
      MusclePoint: r_femur (-0.0072 -0.0104 0.056)
    SimmZajacHill GMIN2: max_isometric_force=190 optimal_fiber_length=0.056 tendon_slack_length=0.026 pennation_angle=0
      MusclePoint: r_pelvis (-0.0633 -0.0065 0.0991)
      MusclePoint: r_femur (-0.0096 -0.0104 0.056)
    SimmZajacHill GMIN3: max_isometric_force=215 optimal_fiber_length=0.038 tendon_slack_length=0.051
        pennation_angle=0.3665191
      MusclePoint: r_pelvis (-0.0834 -0.0063 0.0856)
      MusclePoint: r_femur (-0.0135 -0.0083 0.055)
    SimmZajacHill SEMIMEM: max_isometric_force=1030 optimal_fiber_length=0.08 tendon_slack_length=0.359
        pennation_angle=0.2617994
      MusclePoint: r_pelvis (-0.1192 -0.1015 0.0695)
      MusclePoint: r_tibia (-0.0243 -0.0536 -0.0194)
    SimmZajacHill SEMITEN: max_isometric_force=328 optimal_fiber_length=0.201 tendon_slack_length=0.262
        pennation_angle=0.08726646
      MusclePoint: r_pelvis (-0.1237 -0.1043 0.0603)
      MusclePoint: r_tibia (-0.0314 -0.0545 -0.0146)
      MusclePoint: r_tibia (-0.0113 -0.0746 -0.0245)
      MusclePoint: r_tibia (0.0027 -0.0956 -0.0193)
    SimmZajacHill BIFEMLH: max_isometric_force=717 optimal_fiber_length=0.109 tendon_slack_length=0.341
        pennation_angle=0
      MusclePoint: r_pelvis (-0.1244 -0.1001 0.0666)
      MusclePoint: r_tibia (-0.0081 -0.0729 0.0423)
    SimmZajacHill HAMSTRINGS: max_isometric_force=2075 optimal_fiber_length=0.109 tendon_slack_length=0.337
        pennation_angle=0.1396263
      MusclePoint: r_pelvis (-0.1217 -0.1015 0.067)
      MusclePoint: r_tibia (-0.0198 -0.0604 0.0027)
    SimmZajacHill BIFEMSH: max_isometric_force=402 optimal_fiber_length=0.173 tendon_slack_length=0.1
        pennation_angle=0.4014257
      MusclePoint: r_femur (0.005 -0.2111 0.0234)
      MusclePoint: r_tibia (-0.0101 -0.0725 0.0406)
    SimmZajacHill SAR: max_isometric_force=104 optimal_fiber_length=0.579 tendon_slack_length=0.04 pennation_angle=0
      MusclePoint: r_pelvis (-0.0153 -0.0013 0.1242)
      MusclePoint: r_femur (-0.003 -0.3568 -0.0421)
      MusclePoint: r_tibia (-0.0056 -0.0419 -0.0399)
      MusclePoint: r_tibia (0.006 -0.0589 -0.0383)
      MusclePoint: r_tibia (0.0243 -0.084 -0.0252)
    SimmZajacHill RF: max_isometric_force=779 optimal_fiber_length=0.084 tendon_slack_length=0.346
        pennation_angle=0.08726646
      MusclePoint: r_pelvis (-0.0295 -0.0311 0.0968)
      MuscleViaPoint: r_femur (0.0334 -0.403 0.0019) coordinate=r_knee_angle range=(-2.617994 -1.459968)
      MusclePoint: r_patella (0.0121 0.0437 -0.001)
    SimmZajacHill ADDLONG: max_isometric_force=418 optimal_fiber_length=0.138 tendon_slack_length=0.11
        pennation_angle=0.1047198
      MusclePoint: r_pelvis (-0.0316 -0.0836 0.0169)
      MusclePoint: r_femur (0.005 -0.2111 0.0234)
    SimmZajacHill ADDBREV: max_isometric_force=286 optimal_fiber_length=0.133 tendon_slack_length=0.02
        pennation_angle=0
      MusclePoint: r_pelvis (-0.0587 -0.0915 0.0164)
      MusclePoint: r_femur (0.0009 -0.1196 0.0294)
    SimmZajacHill AMAG1: max_isometric_force=346 optimal_fiber_length=0.087 tendon_slack_length=0.06
        pennation_angle=0.08726646
      MusclePoint: r_pelvis (-0.0732 -0.1174 0.0255)
      MusclePoint: r_femur (-0.0045 -0.1211 0.0339)
    SimmZajacHill AMAG2: max_isometric_force=312 optimal_fiber_length=0.121 tendon_slack_length=0.13
        pennation_angle=0.05235988
      MusclePoint: r_pelvis (-0.0831 -0.1192 0.0308)
      MusclePoint: r_femur (0.0054 -0.2285 0.0227)
    SimmZajacHill AMAG3: max_isometric_force=444 optimal_fiber_length=0.131 tendon_slack_length=0.26
        pennation_angle=0.08726646
      MusclePoint: r_pelvis (-0.0771 -0.1181 0.0276)
      MusclePoint: r_femur (0.007 -0.3837 -0.0266)
    SimmZajacHill TFL: max_isometric_force=155 optimal_fiber_length=0.095 tendon_slack_length=0.425
        pennation_angle=0.05235988
      MusclePoint: r_pelvis (-0.0311 0.0214 0.1241)
      MusclePoint: r_femur (0.0294 -0.0995 0.0597)
      MusclePoint: r_femur (0.0054 -0.4049 0.0357)
      MusclePoint: r_tibia (0.006 -0.0487 0.0297)
    SimmZajacHill PECT: max_isometric_force=177 optimal_fiber_length=0.133 tendon_slack_length=0.001 pennation_angle=0
      MusclePoint: r_pelvis (-0.0431 -0.0768 0.0451)
      MusclePoint: r_femur (-0.0122 -0.0822 0.0253)
    SimmZajacHill GRA: max_isometric_force=108 optimal_fiber_length=0.352 tendon_slack_length=0.14
        pennation_angle=0.05235988
      MusclePoint: r_pelvis (-0.0563 -0.1038 0.0079)
      MusclePoint: r_tibia (-0.0154 -0.0475 -0.0358)
      MusclePoint: r_tibia (0.006 -0.0836 -0.0228)
    SimmZajacHill GMAX1: max_isometric_force=382 optimal_fiber_length=0.142 tendon_slack_length=0.125
        pennation_angle=0.08726646
      MusclePoint: r_pelvis (-0.1195 0.0612 0.07)
      MusclePoint: r_pelvis (-0.1291 0.0012 0.0886)
      MusclePoint: r_femur (-0.0457 -0.0248 0.0392)
      MusclePoint: r_femur (-0.0277 -0.0566 0.047)
    SimmZajacHill GMAX2: max_isometric_force=546 optimal_fiber_length=0.147 tendon_slack_length=0.127 pennation_angle=0
      MusclePoint: r_pelvis (-0.1349 0.0176 0.0563)
      MusclePoint: r_pelvis (-0.1376 -0.052 0.0914)
      MusclePoint: r_femur (-0.0426 -0.053 0.0293)
      MusclePoint: r_femur (-0.0156 -0.1016 0.0419)
    SimmZajacHill GMAX3: max_isometric_force=368 optimal_fiber_length=0.144 tendon_slack_length=0.145
        pennation_angle=0.08726646
      MusclePoint: r_pelvis (-0.1556 -0.0314 0.0058)
      MusclePoint: r_pelvis (-0.1529 -0.1052 0.0403)
      MusclePoint: r_femur (-0.0299 -0.1041 0.0135)
      MusclePoint: r_femur (-0.006 -0.1419 0.0411)
    SimmZajacHill ILIACUS: max_isometric_force=429 optimal_fiber_length=0.1 tendon_slack_length=0.09
        pennation_angle=0.122173
      MusclePoint: r_pelvis (-0.0674 0.0365 0.0854)
      MusclePoint: r_pelvis (-0.0218 -0.055 0.0851)
      MusclePoint: r_femur (0.0017 -0.0543 0.0057)
      MusclePoint: r_femur (-0.0193 -0.0621 0.0129)
    SimmZajacHill PSOAS: max_isometric_force=371 optimal_fiber_length=0.104 tendon_slack_length=0.13
        pennation_angle=0.1396263
      MusclePoint: r_pelvis (-0.0647 0.0887 0.0289)
      MusclePoint: r_pelvis (-0.0238 -0.057 0.0759)
      MusclePoint: r_femur (0.0016 -0.0507 0.0038)
      MusclePoint: r_femur (-0.0188 -0.0597 0.0104)
    SimmZajacHill QUADFEM: max_isometric_force=254 optimal_fiber_length=0.054 tendon_slack_length=0.024
        pennation_angle=0
      MusclePoint: r_pelvis (-0.1143 -0.1151 0.052)
      MusclePoint: r_femur (-0.0381 -0.0359 0.0366)
    SimmZajacHill GLEM: max_isometric_force=109 optimal_fiber_length=0.024 tendon_slack_length=0.039 pennation_angle=0
      MusclePoint: r_pelvis (-0.1133 -0.082 0.0714)
      MusclePoint: r_femur (-0.0142 -0.0033 0.0443)
    SimmZajacHill PERI: max_isometric_force=296 optimal_fiber_length=0.026 tendon_slack_length=0.115
        pennation_angle=0.1745329
      MusclePoint: r_pelvis (-0.1396 0.0003 0.0235)
      MusclePoint: r_pelvis (-0.1193 -0.0276 0.0657)
      MusclePoint: r_femur (-0.0148 -0.0036 0.0437)
    SimmZajacHill VASMED: max_isometric_force=1294 optimal_fiber_length=0.089 tendon_slack_length=0.126
        pennation_angle=0.08726646
      MusclePoint: r_femur (0.014 -0.2099 0.0188)
      MusclePoint: r_femur (0.0356 -0.2769 0.0009)
      MuscleViaPoint: r_femur (0.037 -0.4048 -0.0125) coordinate=r_knee_angle range=(-2.617994 -1.209862)
      MuscleViaPoint: r_femur (0.0274 -0.4255 -0.0131) coordinate=r_knee_angle range=(-2.617994 -1.780061)
      MusclePoint: r_patella (0.0063 0.0445 -0.017)
    SimmZajacHill VASINT: max_isometric_force=1365 optimal_fiber_length=0.087 tendon_slack_length=0.136
        pennation_angle=0.05235988
      MusclePoint: r_femur (0.029 -0.1924 0.031)
      MusclePoint: r_femur (0.0335 -0.2084 0.0285)
      MuscleViaPoint: r_femur (0.0343 -0.403 0.0055) coordinate=r_knee_angle range=(-2.617994 -1.42)
      MusclePoint: r_patella (0.0058 0.048 -0.0006)
    SimmZajacHill VASLAT: max_isometric_force=1871 optimal_fiber_length=0.084 tendon_slack_length=0.157
        pennation_angle=0.08726646
      MusclePoint: r_femur (0.0048 -0.1854 0.0349)
      MusclePoint: r_femur (0.0269 -0.2591 0.0409)
      MuscleViaPoint: r_femur (0.0361 -0.403 0.0205) coordinate=r_knee_angle range=(-2.617994 -1.209862)
      MuscleViaPoint: r_femur (0.0253 -0.4243 0.0184) coordinate=r_knee_angle range=(-2.617994 -1.919862)
      MusclePoint: r_patella (0.0103 0.0423 0.0141)
    SimmZajacHill MEDGAS: max_isometric_force=1113 optimal_fiber_length=0.045 tendon_slack_length=0.408
        pennation_angle=0.296706
      MusclePoint: r_femur (-0.0127 -0.3929 -0.0235)
      MuscleViaPoint: r_femur (-0.0239 -0.4022 -0.0258) coordinate=r_knee_angle range=(-0.7700393 0.1000074)
      MusclePoint: r_tibia (-0.0217 -0.0487 -0.0295)
      MusclePoint: r_calcaneus (0.0044 0.031 -0.0053)
    SimmZajacHill LATGAS: max_isometric_force=488 optimal_fiber_length=0.064 tendon_slack_length=0.385
        pennation_angle=0.1396263
      MusclePoint: r_femur (-0.0155 -0.3946 0.0272)
      MuscleViaPoint: r_femur (-0.0254 -0.4018 0.0274) coordinate=r_knee_angle range=(-0.7700393 0.1000074)
      MusclePoint: r_tibia (-0.0242 -0.0481 0.0235)
      MusclePoint: r_calcaneus (0.0044 0.031 -0.0053)
    SimmZajacHill GASTROC: max_isometric_force=1601 optimal_fiber_length=0.0508 tendon_slack_length=0.401
        pennation_angle=0.2487094
      MusclePoint: r_femur (-0.0135 -0.3934 -0.008)
      MuscleViaPoint: r_femur (-0.0244 -0.4021 -0.0096) coordinate=r_knee_angle range=(-0.7700393 0.1000074)
      MusclePoint: r_tibia (-0.0225 -0.0485 -0.0133)
      MusclePoint: r_calcaneus (0.0044 0.031 -0.0053)
    SimmZajacHill SOL: max_isometric_force=2839 optimal_fiber_length=0.03 tendon_slack_length=0.268
        pennation_angle=0.4363323
      MusclePoint: r_tibia (-0.0024 -0.1533 0.0071)
      MusclePoint: r_calcaneus (0.0044 0.031 -0.0053)
    SimmZajacHill SOLSTIF: max_isometric_force=2839 optimal_fiber_length=0.03 tendon_slack_length=0.268
        pennation_angle=0.4363323
      MusclePoint: r_tibia (-0.0024 -0.1533 0.0071)
      MusclePoint: r_calcaneus (0.0044 0.031 -0.0053)
      tendon_force_length_curve: natCubicSpline: x=(-10 -0.002 -0.001 0 0.00131 0.00281 0.00431 0.00581 0.00731 0.00881 0.0103 0.0118 0.0123 9.2 9.201 9.202 20)
          y=(0 0 0 0 1.08 2.57 4.35 6.52 9.15 12.3 16.1 20.8 22.7 34500 34500 34500 34500)
    SimmZajacHill TIBPOST: max_isometric_force=1270 optimal_fiber_length=0.031 tendon_slack_length=0.31
        pennation_angle=0.2094395
      MusclePoint: r_tibia (-0.0094 -0.1348 0.0019)
      MusclePoint: r_tibia (-0.0144 -0.4051 -0.0229)
      MusclePoint: r_calcaneus (0.0417 0.0334 -0.0286)
      MusclePoint: r_calcaneus (0.0772 0.0159 -0.0281)
    SimmZajacHill FLEXDIG: max_isometric_force=310 optimal_fiber_length=0.034 tendon_slack_length=0.4
        pennation_angle=0.122173
      MusclePoint: r_tibia (-0.0083 -0.2046 -0.0018)
      MusclePoint: r_tibia (-0.0154 -0.4051 -0.0196)
      MusclePoint: r_calcaneus (0.0436 0.0315 -0.028)
      MusclePoint: r_calcaneus (0.0708 0.0176 -0.0263)
      MusclePoint: r_calcaneus (0.1658 -0.0081 0.0116)
      MusclePoint: r_toes (-0.0019 -0.0078 0.0147)
      MusclePoint: r_toes (0.0285 -0.0071 0.0215)
      MusclePoint: r_toes (0.0441 -0.006 0.0242)
    SimmZajacHill FLEXHAL: max_isometric_force=322 optimal_fiber_length=0.043 tendon_slack_length=0.38
        pennation_angle=0.1745329
      MusclePoint: r_tibia (-0.0079 -0.2334 0.0244)
      MusclePoint: r_tibia (-0.0186 -0.4079 -0.0174)
      MusclePoint: r_calcaneus (0.0374 0.0276 -0.0241)
      MusclePoint: r_calcaneus (0.1038 0.0068 -0.0256)
      MusclePoint: r_calcaneus (0.1726 -0.0053 -0.0269)
      MusclePoint: r_toes (0.0155 -0.0064 -0.0265)
      MusclePoint: r_toes (0.0562 -0.0102 -0.0181)
    SimmZajacHill TIBANT: max_isometric_force=603 optimal_fiber_length=0.098 tendon_slack_length=0.223
        pennation_angle=0.08726646
      MusclePoint: r_tibia (0.0179 -0.1624 0.0115)
      MusclePoint: r_tibia (0.0329 -0.3951 -0.0177)
      MusclePoint: r_calcaneus (0.1166 0.0178 -0.0305)
    SimmZajacHill PERBREV: max_isometric_force=348 optimal_fiber_length=0.05 tendon_slack_length=0.161
        pennation_angle=0.08726646
      MusclePoint: r_tibia (-0.007 -0.2646 0.0325)
      MusclePoint: r_tibia (-0.0198 -0.4184 0.0283)
      MusclePoint: r_tibia (-0.0144 -0.4295 0.0289)
      MusclePoint: r_calcaneus (0.0471 0.027 0.0233)
      MusclePoint: r_calcaneus (0.0677 0.0219 0.0343)
    SimmZajacHill PERLONG: max_isometric_force=754 optimal_fiber_length=0.049 tendon_slack_length=0.345
        pennation_angle=0.1745329
      MusclePoint: r_tibia (0.0005 -0.1568 0.0362)
      MusclePoint: r_tibia (-0.0207 -0.4205 0.0286)
      MusclePoint: r_tibia (-0.0162 -0.4319 0.0289)
      MusclePoint: r_calcaneus (0.0438 0.023 0.0221)
      MusclePoint: r_calcaneus (0.0681 0.0106 0.0284)
      MusclePoint: r_calcaneus (0.0852 0.0069 0.0118)
      MusclePoint: r_calcaneus (0.1203 0.0085 -0.0184)
    SimmZajacHill PERTERT: max_isometric_force=90 optimal_fiber_length=0.079 tendon_slack_length=0.1
        pennation_angle=0.2268928
      MusclePoint: r_tibia (0.001 -0.2804 0.0231)
      MusclePoint: r_tibia (0.0229 -0.4069 0.0159)
      MusclePoint: r_calcaneus (0.0857 0.0228 0.0299)
    SimmZajacHill EXTDIG: max_isometric_force=341 optimal_fiber_length=0.102 tendon_slack_length=0.345
        pennation_angle=0.1396263
      MusclePoint: r_tibia (0.0032 -0.1381 0.0276)
      MusclePoint: r_tibia (0.0289 -0.4007 0.0072)
      MusclePoint: r_calcaneus (0.0922 0.0388 -0.0001)
      MusclePoint: r_calcaneus (0.1616 0.0055 0.013)
      MusclePoint: r_toes (0.0003 0.0047 0.0153)
      MusclePoint: r_toes (0.0443 -0.0004 0.025)
    SimmZajacHill EXTHAL: max_isometric_force=108 optimal_fiber_length=0.111 tendon_slack_length=0.305
        pennation_angle=0.1047198
      MusclePoint: r_tibia (0.0012 -0.1767 0.0228)
      MusclePoint: r_tibia (0.0326 -0.3985 -0.0085)
      MusclePoint: r_calcaneus (0.097 0.0389 -0.0211)
      MusclePoint: r_calcaneus (0.1293 0.0309 -0.0257)
      MusclePoint: r_calcaneus (0.1734 0.0139 -0.028)
      MusclePoint: r_toes (0.0298 0.0041 -0.0245)
      MusclePoint: r_toes (0.0563 0.0034 -0.0186)
    SimmZajacHill LIGPAT: max_isometric_force=100 optimal_fiber_length=0.05 tendon_slack_length=0.005 pennation_angle=0
      MusclePoint: r_tibia (0.039 -0.0822 0)
      MusclePoint: r_patella (0.0021 0.0015 0.0001)
    SimmZajacHill TPOST2: max_isometric_force=1270 optimal_fiber_length=0.031 tendon_slack_length=0.31
        pennation_angle=0.2094395
      MusclePoint: r_tibia (-0.0094 -0.1348 0.0019)
      MusclePoint: r_tibia (0.0063 -0.3505 0.0146)
      MusclePoint: r_tibia (0.0165 -0.3904 0.0176)
      MusclePoint: r_calcaneus (0.0912 0.0463 0.0086)
      MusclePoint: r_calcaneus (0.105 0.0325 0.0093)
    SimmZajacHill LGMED1: max_isometric_force=546 optimal_fiber_length=0.0535 tendon_slack_length=0.078
        pennation_angle=0.1396263
      MusclePoint: l_pelvis (-0.0408 0.0304 -0.1209)
      MusclePoint: l_femur (-0.0218 -0.0117 -0.0555)
    SimmZajacHill LGMED2: max_isometric_force=382 optimal_fiber_length=0.0845 tendon_slack_length=0.053
        pennation_angle=0
      MusclePoint: l_pelvis (-0.0855 0.0445 -0.0766)
      MusclePoint: l_femur (-0.0258 -0.0058 -0.0527)
    SimmZajacHill LGMED3: max_isometric_force=435 optimal_fiber_length=0.0646 tendon_slack_length=0.053
        pennation_angle=0.3316126
      MusclePoint: l_pelvis (-0.1223 0.0105 -0.0648)
      MusclePoint: l_femur (-0.0309 -0.0047 -0.0518)
    SimmZajacHill LGMIN1: max_isometric_force=180 optimal_fiber_length=0.068 tendon_slack_length=0.016
        pennation_angle=0.1745329
      MusclePoint: l_pelvis (-0.0467 -0.008 -0.1056)
      MusclePoint: l_femur (-0.0072 -0.0104 -0.056)
    SimmZajacHill LGMIN2: max_isometric_force=190 optimal_fiber_length=0.056 tendon_slack_length=0.026
        pennation_angle=0
      MusclePoint: l_pelvis (-0.0633 -0.0065 -0.0991)
      MusclePoint: l_femur (-0.0096 -0.0104 -0.056)
    SimmZajacHill LGMIN3: max_isometric_force=215 optimal_fiber_length=0.038 tendon_slack_length=0.051
        pennation_angle=0.3665191
      MusclePoint: l_pelvis (-0.0834 -0.0063 -0.0856)
      MusclePoint: l_femur (-0.0135 -0.0083 -0.055)
    SimmZajacHill LSEMIMEM: max_isometric_force=1030 optimal_fiber_length=0.08 tendon_slack_length=0.359
        pennation_angle=0.2617994
      MusclePoint: l_pelvis (-0.1192 -0.1015 -0.0695)
      MusclePoint: l_tibia (-0.0243 -0.0536 0.0194)
    SimmZajacHill LSEMITEN: max_isometric_force=328 optimal_fiber_length=0.201 tendon_slack_length=0.262
        pennation_angle=0.08726646
      MusclePoint: l_pelvis (-0.1237 -0.1043 -0.0603)
      MusclePoint: l_tibia (-0.0314 -0.0545 0.0146)
      MusclePoint: l_tibia (-0.0113 -0.0746 0.0245)
      MusclePoint: l_tibia (0.0027 -0.0956 0.0193)
    SimmZajacHill LBIFEMLH: max_isometric_force=717 optimal_fiber_length=0.109 tendon_slack_length=0.341
        pennation_angle=0
      MusclePoint: l_pelvis (-0.1244 -0.1001 -0.0666)
      MusclePoint: l_tibia (-0.0081 -0.0729 -0.0423)
    SimmZajacHill LHAMSTRINGS: max_isometric_force=2075 optimal_fiber_length=0.109 tendon_slack_length=0.337
        pennation_angle=0.1396263
      MusclePoint: l_pelvis (-0.1217 -0.1015 -0.067)
      MusclePoint: l_tibia (-0.0198 -0.0604 -0.0027)
    SimmZajacHill LBIFEMSH: max_isometric_force=402 optimal_fiber_length=0.173 tendon_slack_length=0.1
        pennation_angle=0.4014257
      MusclePoint: l_femur (0.005 -0.2111 -0.0234)
      MusclePoint: l_tibia (-0.0101 -0.0725 -0.0406)
    SimmZajacHill LSAR: max_isometric_force=104 optimal_fiber_length=0.579 tendon_slack_length=0.04 pennation_angle=0
      MusclePoint: l_pelvis (-0.0153 -0.0013 -0.1242)
      MusclePoint: l_femur (-0.003 -0.3568 0.0421)
      MusclePoint: l_tibia (-0.0056 -0.0419 0.0399)
      MusclePoint: l_tibia (0.006 -0.0589 0.0383)
      MusclePoint: l_tibia (0.0243 -0.084 0.0252)
    SimmZajacHill LRF: max_isometric_force=779 optimal_fiber_length=0.084 tendon_slack_length=0.346
        pennation_angle=0.08726646
      MusclePoint: l_pelvis (-0.0295 -0.0311 -0.0968)
      MuscleViaPoint: l_femur (0.0334 -0.403 -0.0019) coordinate=l_knee_angle range=(-2.617994 -1.459968)
      MusclePoint: l_patella (0.0121 0.0437 0.001)
    SimmZajacHill LADDLONG: max_isometric_force=418 optimal_fiber_length=0.138 tendon_slack_length=0.11
        pennation_angle=0.1047198
      MusclePoint: l_pelvis (-0.0316 -0.0836 -0.0169)
      MusclePoint: l_femur (0.005 -0.2111 -0.0234)
    SimmZajacHill LADDBREV: max_isometric_force=286 optimal_fiber_length=0.133 tendon_slack_length=0.02
        pennation_angle=0
      MusclePoint: l_pelvis (-0.0587 -0.0915 -0.0164)
      MusclePoint: l_femur (0.0009 -0.1196 -0.0294)
    SimmZajacHill LAMAG1: max_isometric_force=346 optimal_fiber_length=0.087 tendon_slack_length=0.06
        pennation_angle=0.08726646
      MusclePoint: l_pelvis (-0.0732 -0.1174 -0.0255)
      MusclePoint: l_femur (-0.0045 -0.1211 -0.0339)
    SimmZajacHill LAMAG2: max_isometric_force=312 optimal_fiber_length=0.121 tendon_slack_length=0.13
        pennation_angle=0.05235988
      MusclePoint: l_pelvis (-0.0831 -0.1192 -0.0308)
      MusclePoint: l_femur (0.0054 -0.2285 -0.0227)
    SimmZajacHill LAMAG3: max_isometric_force=444 optimal_fiber_length=0.131 tendon_slack_length=0.26
        pennation_angle=0.08726646
      MusclePoint: l_pelvis (-0.0771 -0.1181 -0.0276)
      MusclePoint: l_femur (0.007 -0.3837 0.0266)
    SimmZajacHill LTFL: max_isometric_force=155 optimal_fiber_length=0.095 tendon_slack_length=0.425
        pennation_angle=0.05235988
      MusclePoint: l_pelvis (-0.0311 0.0214 -0.1241)
      MusclePoint: l_femur (0.0294 -0.0995 -0.0597)
      MusclePoint: l_femur (0.0054 -0.4049 -0.0357)
      MusclePoint: l_tibia (0.006 -0.0487 -0.0297)
    SimmZajacHill LPECT: max_isometric_force=177 optimal_fiber_length=0.133 tendon_slack_length=0.001 pennation_angle=0
      MusclePoint: l_pelvis (-0.0431 -0.0768 -0.0451)
      MusclePoint: l_femur (-0.0122 -0.0822 -0.0253)
    SimmZajacHill LGRA: max_isometric_force=108 optimal_fiber_length=0.352 tendon_slack_length=0.14
        pennation_angle=0.05235988
      MusclePoint: l_pelvis (-0.0563 -0.1038 -0.0079)
      MusclePoint: l_tibia (-0.0154 -0.0475 0.0358)
      MusclePoint: l_tibia (0.006 -0.0836 0.0228)
    SimmZajacHill LGMAX1: max_isometric_force=382 optimal_fiber_length=0.142 tendon_slack_length=0.125
        pennation_angle=0.08726646
      MusclePoint: l_pelvis (-0.1195 0.0612 -0.07)
      MusclePoint: l_pelvis (-0.1291 0.0012 -0.0886)
      MusclePoint: l_femur (-0.0457 -0.0248 -0.0392)
      MusclePoint: l_femur (-0.0277 -0.0566 -0.047)
    SimmZajacHill LGMAX2: max_isometric_force=546 optimal_fiber_length=0.147 tendon_slack_length=0.127
        pennation_angle=0
      MusclePoint: l_pelvis (-0.1349 0.0176 -0.0563)
      MusclePoint: l_pelvis (-0.1376 -0.052 -0.0914)
      MusclePoint: l_femur (-0.0426 -0.053 -0.0293)
      MusclePoint: l_femur (-0.0156 -0.1016 -0.0419)
    SimmZajacHill LGMAX3: max_isometric_force=368 optimal_fiber_length=0.144 tendon_slack_length=0.145
        pennation_angle=0.08726646
      MusclePoint: l_pelvis (-0.1556 -0.0314 -0.0058)
      MusclePoint: l_pelvis (-0.1529 -0.1052 -0.0403)
      MusclePoint: l_femur (-0.0299 -0.1041 -0.0135)
      MusclePoint: l_femur (-0.006 -0.1419 -0.0411)
    SimmZajacHill LILIACUS: max_isometric_force=429 optimal_fiber_length=0.1 tendon_slack_length=0.09
        pennation_angle=0.122173
      MusclePoint: l_pelvis (-0.0674 0.0365 -0.0854)
      MusclePoint: l_pelvis (-0.0218 -0.055 -0.0851)
      MusclePoint: l_femur (0.0017 -0.0543 -0.0057)
      MusclePoint: l_femur (-0.0193 -0.0621 -0.0129)
    SimmZajacHill LPSOAS: max_isometric_force=371 optimal_fiber_length=0.104 tendon_slack_length=0.13
        pennation_angle=0.1396263
      MusclePoint: l_pelvis (-0.0647 0.0887 -0.0289)
      MusclePoint: l_pelvis (-0.0238 -0.057 -0.0759)
      MusclePoint: l_femur (0.0016 -0.0507 -0.0038)
      MusclePoint: l_femur (-0.0188 -0.0597 -0.0104)
    SimmZajacHill LQUADFEM: max_isometric_force=254 optimal_fiber_length=0.054 tendon_slack_length=0.024
        pennation_angle=0
      MusclePoint: l_pelvis (-0.1143 -0.1151 -0.052)
      MusclePoint: l_femur (-0.0381 -0.0359 -0.0366)
    SimmZajacHill LGLEM: max_isometric_force=109 optimal_fiber_length=0.024 tendon_slack_length=0.039 pennation_angle=0
      MusclePoint: l_pelvis (-0.1133 -0.082 -0.0714)
      MusclePoint: l_femur (-0.0142 -0.0033 -0.0443)
    SimmZajacHill LPERI: max_isometric_force=296 optimal_fiber_length=0.026 tendon_slack_length=0.115
        pennation_angle=0.1745329
      MusclePoint: l_pelvis (-0.1396 0.0003 -0.0235)
      MusclePoint: l_pelvis (-0.1193 -0.0276 -0.0657)
      MusclePoint: l_femur (-0.0148 -0.0036 -0.0437)
    SimmZajacHill LVASMED: max_isometric_force=1294 optimal_fiber_length=0.089 tendon_slack_length=0.126
        pennation_angle=0.08726646
      MusclePoint: l_femur (0.014 -0.2099 -0.0188)
      MusclePoint: l_femur (0.0356 -0.2769 -0.0009)
      MuscleViaPoint: l_femur (0.037 -0.4048 0.0125) coordinate=l_knee_angle range=(-2.617994 -1.209862)
      MuscleViaPoint: l_femur (0.0274 -0.4255 0.0131) coordinate=l_knee_angle range=(-2.617994 -1.780061)
      MusclePoint: l_patella (0.0063 0.0445 0.017)
    SimmZajacHill LVASINT: max_isometric_force=1365 optimal_fiber_length=0.087 tendon_slack_length=0.136
        pennation_angle=0.05235988
      MusclePoint: l_femur (0.029 -0.1924 -0.031)
      MusclePoint: l_femur (0.0335 -0.2084 -0.0285)
      MuscleViaPoint: l_femur (0.0343 -0.403 -0.0055) coordinate=l_knee_angle range=(-2.617994 -1.42)
      MusclePoint: l_patella (0.0058 0.048 0.0006)
    SimmZajacHill LVASLAT: max_isometric_force=1871 optimal_fiber_length=0.084 tendon_slack_length=0.157
        pennation_angle=0.08726646
      MusclePoint: l_femur (0.0048 -0.1854 -0.0349)
      MusclePoint: l_femur (0.0269 -0.2591 -0.0409)
      MuscleViaPoint: l_femur (0.0361 -0.403 -0.0205) coordinate=l_knee_angle range=(-2.617994 -1.209862)
      MuscleViaPoint: l_femur (0.0253 -0.4243 -0.0184) coordinate=l_knee_angle range=(-2.617994 -1.919862)
      MusclePoint: l_patella (0.0103 0.0423 -0.0141)
    SimmZajacHill LMEDGAS: max_isometric_force=1113 optimal_fiber_length=0.045 tendon_slack_length=0.408
        pennation_angle=0.296706
      MusclePoint: l_femur (-0.0127 -0.3929 0.0235)
      MuscleViaPoint: l_femur (-0.0239 -0.4022 0.0258) coordinate=l_knee_angle range=(-0.7700393 0.1000074)
      MusclePoint: l_tibia (-0.0217 -0.0487 0.0295)
      MusclePoint: l_calcaneus (0.0044 0.031 0.0053)
    SimmZajacHill LLATGAS: max_isometric_force=488 optimal_fiber_length=0.064 tendon_slack_length=0.385
        pennation_angle=0.1396263
      MusclePoint: l_femur (-0.0155 -0.3946 -0.0272)
      MuscleViaPoint: l_femur (-0.0254 -0.4018 -0.0274) coordinate=l_knee_angle range=(-0.7700393 0.1000074)
      MusclePoint: l_tibia (-0.0242 -0.0481 -0.0235)
      MusclePoint: l_calcaneus (0.0044 0.031 0.0053)
    SimmZajacHill LGASTROC: max_isometric_force=1601 optimal_fiber_length=0.0508 tendon_slack_length=0.401
        pennation_angle=0.2487094
      MusclePoint: l_femur (-0.0135 -0.3934 0.008)
      MuscleViaPoint: l_femur (-0.0244 -0.4021 0.0096) coordinate=l_knee_angle range=(-0.7700393 0.1000074)
      MusclePoint: l_tibia (-0.0225 -0.0485 0.0133)
      MusclePoint: l_calcaneus (0.0044 0.031 0.0053)
    SimmZajacHill LSOL: max_isometric_force=2839 optimal_fiber_length=0.03 tendon_slack_length=0.268
        pennation_angle=0.4363323
      MusclePoint: l_tibia (-0.0024 -0.1533 -0.0071)
      MusclePoint: l_calcaneus (0.0044 0.031 0.0053)
    SimmZajacHill LSOLSTIF: max_isometric_force=2839 optimal_fiber_length=0.03 tendon_slack_length=0.268
        pennation_angle=0.4363323
      MusclePoint: l_tibia (-0.0024 -0.1533 -0.0071)
      MusclePoint: l_calcaneus (0.0044 0.031 0.0053)
      tendon_force_length_curve: natCubicSpline: x=(-10 -0.002 -0.001 0 0.00131 0.00281 0.00431 0.00581 0.00731 0.00881 0.0103 0.0118 0.0123 9.2 9.201 9.202 20)
          y=(0 0 0 0 1.08 2.57 4.35 6.52 9.15 12.3 16.1 20.8 22.7 34500 34500 34500 34500)
    SimmZajacHill LTIBPOST: max_isometric_force=1270 optimal_fiber_length=0.031 tendon_slack_length=0.31
        pennation_angle=0.2094395
      MusclePoint: l_tibia (-0.0094 -0.1348 -0.0019)
      MusclePoint: l_tibia (-0.0144 -0.4051 0.0229)
      MusclePoint: l_calcaneus (0.0417 0.0334 0.0286)
      MusclePoint: l_calcaneus (0.0772 0.0159 0.0281)
    SimmZajacHill LFLEXDIG: max_isometric_force=310 optimal_fiber_length=0.034 tendon_slack_length=0.4
        pennation_angle=0.122173
      MusclePoint: l_tibia (-0.0083 -0.2046 0.0018)
      MusclePoint: l_tibia (-0.0154 -0.4051 0.0196)
      MusclePoint: l_calcaneus (0.0436 0.0315 0.028)
      MusclePoint: l_calcaneus (0.0708 0.0176 0.0263)
      MusclePoint: l_calcaneus (0.1658 -0.0081 -0.0116)
      MusclePoint: l_toes (-0.0019 -0.0078 -0.0147)
      MusclePoint: l_toes (0.0285 -0.0071 -0.0215)
      MusclePoint: l_toes (0.0441 -0.006 -0.0242)
    SimmZajacHill LFLEXHAL: max_isometric_force=322 optimal_fiber_length=0.043 tendon_slack_length=0.38
        pennation_angle=0.1745329
      MusclePoint: l_tibia (-0.0079 -0.2334 -0.0244)
      MusclePoint: l_tibia (-0.0186 -0.4079 0.0174)
      MusclePoint: l_calcaneus (0.0374 0.0276 0.0241)
      MusclePoint: l_calcaneus (0.1038 0.0068 0.0256)
      MusclePoint: l_calcaneus (0.1726 -0.0053 0.0269)
      MusclePoint: l_toes (0.0155 -0.0064 0.0265)
      MusclePoint: l_toes (0.0562 -0.0102 0.0181)
    SimmZajacHill LTIBANT: max_isometric_force=603 optimal_fiber_length=0.098 tendon_slack_length=0.223
        pennation_angle=0.08726646
      MusclePoint: l_tibia (0.0179 -0.1624 -0.0115)
      MusclePoint: l_tibia (0.0329 -0.3951 0.0177)
      MusclePoint: l_calcaneus (0.1166 0.0178 0.0305)
    SimmZajacHill LPERBREV: max_isometric_force=348 optimal_fiber_length=0.05 tendon_slack_length=0.161
        pennation_angle=0.08726646
      MusclePoint: l_tibia (-0.007 -0.2646 -0.0325)
      MusclePoint: l_tibia (-0.0198 -0.4184 -0.0283)
      MusclePoint: l_tibia (-0.0144 -0.4295 -0.0289)
      MusclePoint: l_calcaneus (0.0471 0.027 -0.0233)
      MusclePoint: l_calcaneus (0.0677 0.0219 -0.0343)
    SimmZajacHill LPERLONG: max_isometric_force=754 optimal_fiber_length=0.049 tendon_slack_length=0.345
        pennation_angle=0.1745329
      MusclePoint: l_tibia (0.0005 -0.1568 -0.0362)
      MusclePoint: l_tibia (-0.0207 -0.4205 -0.0286)
      MusclePoint: l_tibia (-0.0162 -0.4319 -0.0289)
      MusclePoint: l_calcaneus (0.0438 0.023 -0.0221)
      MusclePoint: l_calcaneus (0.0681 0.0106 -0.0284)
      MusclePoint: l_calcaneus (0.0852 0.0069 -0.0118)
      MusclePoint: l_calcaneus (0.1203 0.0085 0.0184)
    SimmZajacHill LPERTERT: max_isometric_force=90 optimal_fiber_length=0.079 tendon_slack_length=0.1
        pennation_angle=0.2268928
      MusclePoint: l_tibia (0.001 -0.2804 -0.0231)
      MusclePoint: l_tibia (0.0229 -0.4069 -0.0159)
      MusclePoint: l_calcaneus (0.0857 0.0228 -0.0299)
    SimmZajacHill LEXTDIG: max_isometric_force=341 optimal_fiber_length=0.102 tendon_slack_length=0.345
        pennation_angle=0.1396263
      MusclePoint: l_tibia (0.0032 -0.1381 -0.0276)
      MusclePoint: l_tibia (0.0289 -0.4007 -0.0072)
      MusclePoint: l_calcaneus (0.0922 0.0388 0.0001)
      MusclePoint: l_calcaneus (0.1616 0.0055 -0.013)
      MusclePoint: l_toes (0.0003 0.0047 -0.0153)
      MusclePoint: l_toes (0.0443 -0.0004 -0.025)
    SimmZajacHill LEXTHAL: max_isometric_force=108 optimal_fiber_length=0.111 tendon_slack_length=0.305
        pennation_angle=0.1047198
      MusclePoint: l_tibia (0.0012 -0.1767 -0.0228)
      MusclePoint: l_tibia (0.0326 -0.3985 0.0085)
      MusclePoint: l_calcaneus (0.097 0.0389 0.0211)
      MusclePoint: l_calcaneus (0.1293 0.0309 0.0257)
      MusclePoint: l_calcaneus (0.1734 0.0139 0.028)
      MusclePoint: l_toes (0.0298 0.0041 0.0245)
      MusclePoint: l_toes (0.0563 0.0034 0.0186)
    SimmZajacHill LLIGPAT: max_isometric_force=100 optimal_fiber_length=0.05 tendon_slack_length=0.005
        pennation_angle=0
      MusclePoint: l_tibia (0.039 -0.0822 0)
      MusclePoint: l_patella (0.0021 0.0015 -0.0001)
    SimmZajacHill LTPOST2: max_isometric_force=1270 optimal_fiber_length=0.031 tendon_slack_length=0.31
        pennation_angle=0.2094395
      MusclePoint: l_tibia (-0.0094 -0.1348 -0.0019)
      MusclePoint: l_tibia (0.0063 -0.3505 -0.0146)
      MusclePoint: l_tibia (0.0165 -0.3904 -0.0176)
      MusclePoint: l_calcaneus (0.0912 0.0463 -0.0086)
      MusclePoint: l_calcaneus (0.105 0.0325 -0.0093)
  DynamicsEngine:
    SimmKinematicsEngine: gravity=(0 -9.80665 0)
      BodySet:
        SimmBody [values shared by the 16 below unless stated]: mass=0 mass_center=(0 0 0) inertia=(0 0 0 0 0 0 0 0 0)
        SimmBody world
        SimmBody sacrum: meshes=sacrum.vtp
        SimmBody r_pelvis: meshes=pelvis.vtp
        SimmBody r_femur: meshes=femur.vtp
        SimmBody r_tibia: meshes=(tibia.vtp fibula.vtp)
        SimmBody r_patella: meshes=pat.vtp
        SimmBody r_talus: meshes=talus.vtp
        SimmBody r_calcaneus: meshes=foot.vtp
        SimmBody r_toes: meshes=bofoot.vtp
        SimmBody l_pelvis: meshes=l_pelvis.vtp
        SimmBody l_femur: meshes=l_femur.vtp
        SimmBody l_tibia: meshes=(l_tibia.vtp l_fibula.vtp)
        SimmBody l_patella: meshes=l_pat.vtp
        SimmBody l_talus: meshes=l_talus.vtp
        SimmBody l_calcaneus: meshes=l_foot.vtp
        SimmBody l_toes: meshes=l_bofoot.vtp
      SimmCoordinate [values shared by the 20 below unless stated]: default_value=0 tolerance=0 stiffness=0
          clamped=true restraint_active=false
      SimmCoordinate rZ: range=(-3.141593 3.141593)
      SimmCoordinate rX: range=(-3.141593 3.141593)
      SimmCoordinate rY: range=(-3.141593 3.141593)
      SimmCoordinate r_hip_flexion: range=(-0.5235988 1.658063) keys=(h_key leftmouse_button)
      SimmCoordinate r_hip_adduction: range=(-0.8726646 0.3141593) keys=(h_key middlemouse_button)
      SimmCoordinate r_hip_rotation: range=(-0.3490659 0.7853982) keys=(h_key rightmouse_button)
      SimmCoordinate r_knee_angle: range=(-2.094395 0.05235988) keys=k_key
      SimmCoordinate r_ankle_angle: range=(-0.5235988 0.6108652) keys=a_key
      SimmCoordinate r_subt_angle: range=(-0.3490659 0.3490659) keys=s_key
      SimmCoordinate r_mtp_angle: range=(-0.5235988 0.5235988) keys=t_key
      SimmCoordinate l_rZ: range=(-3.141593 3.141593)
      SimmCoordinate l_rX: range=(-3.141593 3.141593)
      SimmCoordinate l_rY: range=(-3.141593 3.141593)
      SimmCoordinate l_hip_flexion: range=(-0.5235988 1.658063)
      SimmCoordinate l_hip_adduction: range=(-0.8726646 0.3141593)
      SimmCoordinate l_hip_rotation: range=(-0.3490659 0.7853982)
      SimmCoordinate l_knee_angle: range=(-2.094395 0)
      SimmCoordinate l_ankle_angle: range=(-0.5235988 0.6108652)
      SimmCoordinate l_subt_angle: range=(-0.3490659 0.3490659)
      SimmCoordinate l_mtp_angle: range=(-0.5235988 0.5235988)
      JointSet:
        SimmJoint sacrum: bodies=(world sacrum)
          DofSet:
            SimmTranslationDof tx:
              Value: Constant(value=0)
            SimmTranslationDof ty:
              Value: Constant(value=0)
            SimmTranslationDof tz:
              Value: Constant(value=0)
            SimmRotationDof r1: axis=(0 0 1)
              Value: Constant(value=0)
            SimmRotationDof r2: axis=(1 0 0)
              Value: Constant(value=0)
            SimmRotationDof r3: axis=(0 1 0)
              Value: Constant(value=0)
        SimmJoint r_pelvis: bodies=(sacrum r_pelvis)
          DofSet:
            SimmTranslationDof tx:
              Value: Constant(value=0)
            SimmTranslationDof ty:
              Value: Constant(value=0)
            SimmTranslationDof tz:
              Value: Constant(value=0)
            SimmRotationDof r1: axis=(0 0 1) coordinate=rZ
              Value:
                natCubicSpline: x=(-6.283185 6.283185) y=(-6.283185 6.283185)
            SimmRotationDof r2: axis=(1 0 0) coordinate=rX
              Value:
                natCubicSpline: x=(-6.283185 6.283185) y=(-6.283185 6.283185)
            SimmRotationDof r3: axis=(0 1 0) coordinate=rY
              Value:
                natCubicSpline: x=(-6.283185 6.283185) y=(-6.283185 6.283185)
        SimmJoint r_hip: bodies=(r_pelvis r_femur)
          DofSet:
            SimmTranslationDof tx:
              Value: Constant(value=-0.0707)
            SimmTranslationDof ty:
              Value: Constant(value=-0.0661)
            SimmTranslationDof tz:
              Value: Constant(value=0.0835)
            SimmRotationDof r1: axis=(0 0 1) coordinate=r_hip_flexion
              Value:
                natCubicSpline: x=(-6.283185 6.283185) y=(-6.283185 6.283185)
            SimmRotationDof r2: axis=(1 0 0) coordinate=r_hip_adduction
              Value:
                natCubicSpline: x=(-6.283185 6.283185) y=(-6.283185 6.283185)
            SimmRotationDof r3: axis=(0 1 0) coordinate=r_hip_rotation
              Value:
                natCubicSpline: x=(-6.283185 6.283185) y=(-6.283185 6.283185)
        SimmJoint r_femur-tibia: bodies=(r_femur r_tibia)
          DofSet:
            SimmTranslationDof tx: coordinate=r_knee_angle
              Value:
                natCubicSpline: x=(-2.094395 -1.745329 -1.396263 -1.047198 -0.6981317 -0.3490659 -0.1745329 0 0.08726646)
                    y=(-0.0032 0.00179 0.00411 0.0041 0.00212 -0.001 -0.0031 -0.00525 -0.0063)
            SimmTranslationDof ty: coordinate=r_knee_angle
              Value:
                natCubicSpline: x=(-2.094395 -1.22173 -0.5235988 -0.3490659 -0.1745329 0 0.1308997)
                    y=(-0.4226 -0.4082 -0.399 -0.3976 -0.3966 -0.396 -0.396)
            SimmTranslationDof tz:
              Value: Constant(value=0)
            SimmRotationDof r1: axis=(0 0 1) coordinate=r_knee_angle
              Value:
                natCubicSpline: x=(-6.283185 6.283185) y=(-6.283185 6.283185)
            SimmRotationDof r2: axis=(1 0 0)
              Value: Constant(value=0)
            SimmRotationDof r3: axis=(0 1 0)
              Value: Constant(value=0)
        SimmJoint r_tibia-patella: bodies=(r_tibia r_patella)
          DofSet:
            SimmTranslationDof tx: coordinate=r_knee_angle
              Value:
                natCubicSpline: x=(-2.094395 -1.396263 -1.047198 -0.6981317 -0.3490659 -0.1745329 0 0.08726646)
                    y=(0.0173 0.0324 0.0381 0.043 0.0469 0.0484 0.0496 0.05)
            SimmTranslationDof ty: coordinate=r_knee_angle
              Value:
                natCubicSpline: x=(-2.094395 -1.570796 -1.396263 -1.047198 -0.6981317 -0.3490659 -0.1745329 0.004991642 0.08726646)
                    y=(-0.0219 -0.0202 -0.02 -0.0204 -0.0211 -0.0219 -0.0223 -0.0227 -0.0229)
            SimmTranslationDof tz:
              Value: Constant(value=0.0024)
            SimmRotationDof r1: axis=(0 0 1) coordinate=r_knee_angle
              Value:
                natCubicSpline: x=(-2.094395 -1.999973 -1.457524 -0.5263913 0.02792527 0.1745329)
                    y=(0.3080506 0.3080506 0.3063053 0.270177 -0.03700098 -0.2799508)
            SimmRotationDof r2: axis=(1 0 0)
              Value: Constant(value=0)
            SimmRotationDof r3: axis=(0 1 0)
              Value: Constant(value=0)
        SimmJoint r_ankle: bodies=(r_tibia r_talus)
          DofSet:
            SimmTranslationDof tx:
              Value: Constant(value=0)
            SimmTranslationDof ty:
              Value: Constant(value=-0.43)
            SimmTranslationDof tz:
              Value: Constant(value=0)
            SimmRotationDof r1: axis=(-0.1045294 -0.173649 0.9792444) coordinate=r_ankle_angle
              Value:
                natCubicSpline: x=(-6.283185 6.283185) y=(-6.283185 6.283185)
            SimmRotationDof r2: axis=(1 0 0)
              Value: Constant(value=0)
            SimmRotationDof r3: axis=(0 1 0)
              Value: Constant(value=0)
        SimmJoint r_subtalar: bodies=(r_talus r_calcaneus)
          DofSet:
            SimmTranslationDof tx:
              Value: Constant(value=-0.04877)
            SimmTranslationDof ty:
              Value: Constant(value=-0.04195)
            SimmTranslationDof tz:
              Value: Constant(value=0.00792)
            SimmRotationDof r1: axis=(0.7871796 0.6047475 -0.1209495) coordinate=r_subt_angle
              Value:
                natCubicSpline: x=(-6.283185 6.283185) y=(-6.283185 6.283185)
            SimmRotationDof r2: axis=(0 1 0)
              Value: Constant(value=0)
            SimmRotationDof r3: axis=(0 0 1)
              Value: Constant(value=0)
        SimmJoint r_mtp: bodies=(r_calcaneus r_toes)
          DofSet:
            SimmTranslationDof tx:
              Value: Constant(value=0.1788)
            SimmTranslationDof ty:
              Value: Constant(value=-0.002)
            SimmTranslationDof tz:
              Value: Constant(value=0.00108)
            SimmRotationDof r1: axis=(0.5808219 0 -0.8140307) coordinate=r_mtp_angle
              Value:
                natCubicSpline: x=(-6.283185 6.283185) y=(-6.283185 6.283185)
            SimmRotationDof r2: axis=(0 1 0)
              Value: Constant(value=0)
            SimmRotationDof r3: axis=(0 0 1)
              Value: Constant(value=0)
        SimmJoint l_pelvis: bodies=(sacrum l_pelvis)
          DofSet:
            SimmTranslationDof tx:
              Value: Constant(value=0)
            SimmTranslationDof ty:
              Value: Constant(value=0)
            SimmTranslationDof tz:
              Value: Constant(value=0)
            SimmRotationDof r1: axis=(0 0 1) coordinate=l_rZ
              Value:
                natCubicSpline: x=(-6.283185 6.283185) y=(-6.283185 6.283185)
            SimmRotationDof r2: axis=(1 0 0) coordinate=l_rX
              Value:
                natCubicSpline: x=(-6.283185 6.283185) y=(-6.283185 6.283185)
            SimmRotationDof r3: axis=(0 1 0) coordinate=l_rY
              Value:
                natCubicSpline: x=(-6.283185 6.283185) y=(-6.283185 6.283185)
        SimmJoint l_hip: bodies=(l_pelvis l_femur)
          DofSet:
            SimmTranslationDof tx:
              Value: Constant(value=-0.0707)
            SimmTranslationDof ty:
              Value: Constant(value=-0.0661)
            SimmTranslationDof tz:
              Value: Constant(value=-0.0835)
            SimmRotationDof r1: axis=(0 0 1) coordinate=l_hip_flexion
              Value:
                natCubicSpline: x=(-6.283185 6.283185) y=(-6.283185 6.283185)
            SimmRotationDof r2: axis=(1 0 0) coordinate=l_hip_adduction
              Value:
                natCubicSpline: x=(-6.283185 6.283185) y=(6.283185 -6.283185)
            SimmRotationDof r3: axis=(0 1 0) coordinate=l_hip_rotation
              Value:
                natCubicSpline: x=(-6.283185 6.283185) y=(6.283185 -6.283185)
        SimmJoint l_femur-tibia: bodies=(l_femur l_tibia)
          DofSet:
            SimmTranslationDof tx: coordinate=l_knee_angle
              Value:
                natCubicSpline: x=(-2.094395 -1.745329 -1.396263 -1.047198 -0.6981317 -0.3490659 -0.1745329 0)
                    y=(-0.0032 0.00179 0.00411 0.0041 0.00212 -0.001 -0.0031 -0.00525)
            SimmTranslationDof ty: coordinate=l_knee_angle
              Value:
                natCubicSpline: x=(-2.094395 -1.22173 -0.5235988 -0.3490659 -0.1745329 0)
                    y=(-0.4226 -0.4082 -0.399 -0.3976 -0.3966 -0.396)
            SimmTranslationDof tz:
              Value: Constant(value=0)
            SimmRotationDof r1: axis=(0 0 1) coordinate=l_knee_angle
              Value:
                natCubicSpline: x=(-6.283185 6.283185) y=(-6.283185 6.283185)
            SimmRotationDof r2: axis=(1 0 0)
              Value: Constant(value=0)
            SimmRotationDof r3: axis=(0 1 0)
              Value: Constant(value=0)
        SimmJoint l_tibia-patella: bodies=(l_tibia l_patella)
          DofSet:
            SimmTranslationDof tx: coordinate=l_knee_angle
              Value:
                natCubicSpline: x=(-2.094395 -1.396263 -1.047198 -0.6981317 -0.3490659 -0.1745329 0)
                    y=(0.0173 0.0324 0.0381 0.043 0.0469 0.0484 0.0496)
            SimmTranslationDof ty: coordinate=l_knee_angle
              Value:
                natCubicSpline: x=(-2.094395 -1.570796 -1.396263 -1.047198 -0.6981317 -0.3490659 -0.1745329 0.004991642)
                    y=(-0.0219 -0.0202 -0.02 -0.0204 -0.0211 -0.0219 -0.0223 -0.0227)
            SimmTranslationDof tz:
              Value: Constant(value=-0.0024)
            SimmRotationDof r1: axis=(0 0 1) coordinate=l_knee_angle
              Value:
                natCubicSpline: x=(-2.094395 -1.999973 -1.457524 -0.5263913 0.02792527 0.1745329)
                    y=(0.3080506 0.3080506 0.3063053 0.270177 -0.03700098 -0.2799508)
            SimmRotationDof r2: axis=(1 0 0)
              Value: Constant(value=0)
            SimmRotationDof r3: axis=(0 1 0)
              Value: Constant(value=0)
        SimmJoint l_ankle: bodies=(l_tibia l_talus)
          DofSet:
            SimmTranslationDof tx:
              Value: Constant(value=0)
            SimmTranslationDof ty:
              Value: Constant(value=-0.43)
            SimmTranslationDof tz:
              Value: Constant(value=0)
            SimmRotationDof r1: axis=(-0.1045294 -0.173649 -0.9792444) coordinate=l_ankle_angle
              Value:
                natCubicSpline: x=(-6.283185 6.283185) y=(6.283185 -6.283185)
            SimmRotationDof r2: axis=(1 0 0)
              Value: Constant(value=0)
            SimmRotationDof r3: axis=(0 1 0)
              Value: Constant(value=0)
        SimmJoint l_subtalar: bodies=(l_talus l_calcaneus)
          DofSet:
            SimmTranslationDof tx:
              Value: Constant(value=-0.04877)
            SimmTranslationDof ty:
              Value: Constant(value=-0.04195)
            SimmTranslationDof tz:
              Value: Constant(value=-0.00792)
            SimmRotationDof r1: axis=(0.7871796 0.6047475 0.1209495) coordinate=l_subt_angle
              Value:
                natCubicSpline: x=(-6.283185 6.283185) y=(6.283185 -6.283185)
            SimmRotationDof r2: axis=(0 1 0)
              Value: Constant(value=0)
            SimmRotationDof r3: axis=(0 0 1)
              Value: Constant(value=0)
        SimmJoint l_mtp: bodies=(l_calcaneus l_toes)
          DofSet:
            SimmTranslationDof tx:
              Value: Constant(value=0.1788)
            SimmTranslationDof ty:
              Value: Constant(value=-0.002)
            SimmTranslationDof tz:
              Value: Constant(value=-0.00108)
            SimmRotationDof r1: axis=(0.5808219 0 0.8140307) coordinate=l_mtp_angle
              Value:
                natCubicSpline: x=(-6.283185 6.283185) y=(6.283185 -6.283185)
            SimmRotationDof r2: axis=(0 1 0)
              Value: Constant(value=0)
            SimmRotationDof r3: axis=(0 0 1)
              Value: Constant(value=0)
