Model wheel:
  angle_units: radians
  ContactForceSet: file=wheel_contact.xml
  DynamicsEngine:
    SimbodyEngine: gravity=(0 -9.80665 0)
      BodySet:
        SimbodyBody ground: mass=0 mass_center=(0 0 0) inertia=(0 0 0 0 0 0 0 0 0) meshes=floor.vtp
        SimbodyBody wheel: mass=20 mass_center=0 inertia=(0.1 0 0 0 0.1 0 0 0 0.1) meshes=wheel.vtp
      SimbodyCoordinate [values shared by the 6 below unless stated]: default_value=0 tolerance=0.00000001 stiffness=0
          clamped=true restraint_active=false keys=q_key
      SimbodyCoordinate wheel_tx: range=(-5 5) keys=p_key
      SimbodyCoordinate wheel_ty: range=(-1 2) default_value=1
      SimbodyCoordinate wheel_tz: range=(-3 3)
      SimbodyCoordinate wheel_rz: range=(-1.570796 1.570796)
      SimbodyCoordinate wheel_rx: range=(-1.570796 1.570796)
      SimbodyCoordinate wheel_ry: range=(-1.570796 1.570796)
      SpeedSet:
        SimbodySpeed wheel_tx_u: default_value=0 coordinate=wheel_tx
        SimbodySpeed wheel_ty_u: default_value=0 coordinate=wheel_ty
        SimbodySpeed wheel_tz_u: default_value=0 coordinate=wheel_tz
        SimbodySpeed wheel_rz_u: default_value=0 coordinate=wheel_rz
        SimbodySpeed wheel_rx_u: default_value=0 coordinate=wheel_rx
        SimbodySpeed wheel_ry_u: default_value=0 coordinate=wheel_ry
      JointSet:
        SimbodyJoint ground_wheel: bodies=(ground wheel)
          DofSet:
            SimbodyTranslationDof tx: coordinate=wheel_tx
              Value:
                natCubicSpline: x=(-360 360) y=(-360 360)
            SimbodyTranslationDof ty: coordinate=wheel_ty
              Value:
                natCubicSpline: x=(-360 360) y=(-360 360)
            SimbodyTranslationDof tz: coordinate=wheel_tz
              Value:
                natCubicSpline: x=(-360 360) y=(-360 360)
            SimbodyRotationDof r1: axis=(0 0 1) coordinate=wheel_rz
              Value:
                natCubicSpline: x=(-6.283185 6.283185) y=(-6.283185 6.283185)
            SimbodyRotationDof r2: axis=(1 0 0) coordinate=wheel_rx
              Value:
                natCubicSpline: x=(-6.283185 6.283185) y=(-6.283185 6.283185)
            SimbodyRotationDof r3: axis=(0 1 0) coordinate=wheel_ry
              Value:
                natCubicSpline: x=(-6.283185 6.283185) y=(-6.283185 6.283185)
