# OpenSim document version 40600
Model isometric_muscle:
  gravity: 9.81 0 0
  Body: mass=0.5 [kg] mass_center=(0 0 0) inertia=(0 0 0 0 0 0)
    Sphere body_geom_1: radius=0.05
  SliderJoint joint: socket_parent_frame=/ground socket_child_frame=/body
    Coordinate height
  Bhargava2004SmoothedMuscleMetabolics metabolic_cost:
    muscle_parameters: Bhargava2004SmoothedMuscleMetabolics_MuscleParameters muscle: socket_muscle=/forceset/muscle
        use_provided_muscle_mass=true provided_muscle_mass=1.123 [kg]
  Ground
  ForceSet:
    DeGrooteFregly2016Muscle muscle: min_control=0 max_control=1 max_isometric_force=10 optimal_fiber_length=0.2
        tendon_slack_length=0.01 pennation_angle_at_optimal=0 [radians] max_contraction_velocity=10 fiber_damping=0.01
        tendon_strain_at_one_norm_force=0.1
      PathPoint origin: ground (0 0 0)
      PathPoint insertion: body (0 0 0)
