# OpenSim document version 30505
Model toy_with_forces:
  gravity: 0 -9.80665 0
  length_units: m
  force_units: N
  credits:
    Author: Matt DeMers License: Creative Commons (CCBY 3.0). You are free to distribute, remix, tweak, and build upon this work, even commercially, as long as you credit us for the original creation. http://creativecommons.org/licenses/by/3.0/
  Ground
  FrameSet:
    PhysicalOffsetFrame thigh_attachment: translation=(0.05 0.35 0)
      connectors: parent=/toy_with_forces/link1
    PhysicalOffsetFrame shank_attachment: translation=(0 0.65 0)
      connectors: parent=/toy_with_forces/link2
  BodySet:
    Body block: mass=20 [kg] mass_center=(0 0 0) inertia=(0.533333 0.533333 0.533333 0 0 0)
      geometry: Brick block_geom_1: scale_factors=(1 1 1) half_lengths=(0.1 0.1 0.1)
        connectors: frame=../
    Body link1: mass=5 mass_center=(0 0.25 0) inertia=(8.333e-5 8e-6 8.333e-5 0 0 0)
      PhysicalOffsetFrame geom_offset: translation=(0 +0.25 0)
        connectors: parent=../
        geometry: Brick geom_1: scale_factors=(1 1 1) half_lengths=(0.035 0.25 0.035)
          connectors: frame=../
      WrapCylinder patella: quadrant=x radius=0.08
    Body link2: mass=5 mass_center=(0 0.25 0) inertia=(8.333e-5 8e-6 8.333e-5 0 0 0)
      PhysicalOffsetFrame geom_offset: translation=(0 +0.25 0)
        connectors: parent=../
        geometry: Brick geom_1: scale_factors=(1 1 1) half_lengths=(0.035 0.25 0.035)
          connectors: frame=../
  JointSet:
    FreeJoint ground_block:
      connectors: parent_frame=ground child_frame=block
      Coordinate xRotation: motion_type=rotational default_value=0 range=(-2 2) clamped=false
      Coordinate yRotation: motion_type=rotational default_value=0 range=(-2 2) clamped=false
      Coordinate zRotation: motion_type=rotational default_value=0.6981317 range=(-2 2) clamped=false
      Coordinate xTranslation: motion_type=translational default_value=0.0002779835 range=(-10 10) clamped=true
      Coordinate yTranslation: motion_type=translational default_value=0.9 range=(-10 10) clamped=true
      Coordinate zTranslation: motion_type=translational default_value=0 range=(-10 10) clamped=true
    PinJoint pin1:
      connectors: parent_frame=block child_frame=link1_offset
      Coordinate pin1_rot: motion_type=rotational default_value=0 range=(-2 2) clamped=true
      PhysicalOffsetFrame link1_offset: translation=(0 0.5 0)
        connectors: parent=link1
    PinJoint pin2:
      connectors: parent_frame=link1 child_frame=link2_offset
      Coordinate pin2_rot: motion_type=rotational default_value=-1.396263 range=(-2 2) clamped=true
      PhysicalOffsetFrame link2_offset: translation=(0 0.5 0)
        connectors: parent=link2
  ControllerSet:
    PrescribedController vastus_control: actuator_list=vastus
      FunctionSet ControlFunctions: vastus=PiecewiseConstantFunction(x=0 2 3.9, y=0.1 1 0.1)
  ConstraintSet:
    PointOnLineConstraint lock_block_to_y_axis: line_direction_vec=(0 1 0) point_on_line=(0 0 0)
        point_on_follower=(0 0 0)
      connectors: line_body=ground follower_body=block
    PointOnLineConstraint lock_foot_to_y_axis: line_direction_vec=(0 1 0) point_on_line=(0 0 0)
        point_on_follower=(0 0 0)
      connectors: line_body=ground follower_body=link2
  ForceSet:
    Thelen2003Muscle vastus: max_isometric_force=1800 optimal_fiber_length=0.55 default_activation=0.1
        tendon_slack_length=0.25
      PathPoint vastus_p1: link1 (0.03 0.35 0)
      PathPoint vastus_p2: link2 (0.03 0.4 0)
      PathWrap: wrap_object=patella method=hybrid
    HuntCrossleyForce foot_contact_force: transition_velocity=0.1
      ContactParametersSet contact_parameters:
        ContactParameters: geometry=(platform heel) stiffness=100000000 dissipation=0.5 static_friction=0.9
            dynamic_friction=0.9 viscous_friction=0.6
    PointToPointSpring spring: isDisabled=true point1=(0 0 0) point2=(0 0 0) stiffness=2000 [N/m] rest_length=0.8 [m]
      connectors: body1=../block body2=../link1
    CoordinateLimitForce knee_limit: coordinate=pin2_rot upper_stiffness=20 [N*m/degree] upper_limit=0 [degrees]
        lower_stiffness=20 [N*m/degree] lower_limit=-140 [degrees] damping=1 transition=5 [degrees]
    BushingForce hip_bushing: rotational_stiffness=(10 10 10) [Nm/rad] translational_stiffness=(0 0 0) [N/m]
        rotational_damping=(0.1 0.1 0.1) [Nm/(rad/s)] translational_damping=(0 0 0) [N/(m/s)]
      connectors: frame1=block frame2=link1
      PhysicalOffsetFrame link1_offset: translation=(0 0.5 0)
        connectors: parent=link1
  ContactGeometrySet:
    ContactHalfSpace platform: body_name=ground location=(0 0 0) orientation=(0 0 -1.570796)
    ContactSphere heel: body_name=link2 location=(0 0 0) radius=0.1
