# OpenSim document version 30000
Model double_pendulum:
  credits: Ajay Seth
  publications: For testing
  length_units: meters
  force_units: N
  gravity: 0 -9.80665 0
  BodySet:
    Body ground: mass=0 mass_center=(0 0 0) inertia_xx=0 inertia_yy=0 inertia_zz=0 meshes=Unassigned
    Body rod1: mass=1 mass_center=(0 0 0) inertia_xx=0 inertia_yy=0 inertia_zz=0 meshes=(cylinder.vtp sphere.vtp)
      PinJoint pin1: parent_body=ground location_in_parent=(0 0 0) location=(0 0.5 0)
        Coordinate q1: motion_type=rotational default_value=-0.7853982 range=(-1.570796 1.570796) clamped=false
    Body rod2: mass=1 mass_center=(0 0 0) inertia_xx=0 inertia_yy=0 inertia_zz=0 meshes=(cylinder.vtp sphere.vtp)
      PinJoint pin2: parent_body=rod1 location_in_parent=(0 0 0) location=(0 0.5 0)
        Coordinate q2: motion_type=rotational default_value=-1.047198 range=(-1.570796 1.570796) clamped=false
  ForceSet:
    CoordinateActuator Torq1: coordinate=q1 optimal_force=1
    CoordinateActuator Torq2: coordinate=q2 optimal_force=1
  MarkerSet:
    Marker NewMarker: rod1 (0.0440299 0.42978 -0.0227999)
    Marker NewMarker_0: rod1 (-0.0267315 0.440716 0.0687742)
    Marker NewMarker_1: rod1 (-0.0612995 0.308324 0.0452948)
    Marker NewMarker_2: rod1 (0.0602345 0.294983 -6.12892e-5)
    Marker NewMarker_3: rod1 (-0.0383281 0.113327 0.0385663)
    Marker NewMarker_4: rod1 (0.0329375 0.123745 0.00215607)
    Marker NewMarker_5: rod2 (0.0142437 0.0851817 -0.013332)
    Marker NewMarker_6: rod2 (-0.0037006 0.440311 -0.0734172)
    Marker NewMarker_7: rod2 (-0.0235108 0.163858 -0.0714267)
    Marker NewMarker_8: rod2 (0.0349598 0.391778 0.00667671)
    Marker NewMarker_9: rod2 (-0.0253748 0.287187 0.0528859)
    Marker NewMarker_10: rod2 (0.0478447 0.204816 0.0406457)
