# OpenSim document version 30516
Model loadedwalking_subject05:
  gravity: 0 -9.80665 0
  length_units: meters
  force_units: N
  credits:
    Arnold, E.M., Hamner, S.R., Ward, S.R., Lieber, R. L., and Delp, S.L.
  defaults:
    CoordinateActuator default: optimal_force=300
    Millard2012EquilibriumMuscle default: min_control=0.01 optimal_force=1 max_isometric_force=546
        optimal_fiber_length=0.0535 tendon_slack_length=0.078 pennation_angle_at_optimal=0 [radians]
        max_contraction_velocity=10
  Ground
  BodySet:
    Body pelvis: mass=17.5758 [kg] mass_center=(-0.0890344 0 0) inertia=(0.234964 0.234964 0.112609 0 0 0)
        meshes=(r_pelvis.vtp l_pelvis.vtp sacrum.vtp)
      WrapCylinder Gmax1_at_pelvis_r: xyz_body_rotation=(-0.6 0.45 0) translation=(-0.0969682 -0.10245 0.0776654)
          quadrant=-x radius=0.04730252 length=0.1820005
      WrapCylinder Gmax2_at_pelvis_r: xyz_body_rotation=(-0.75 0.39 0) translation=(-0.100746 -0.0858921 0.0865778)
          quadrant=all radius=0.04796712 length=0.1182075
      WrapCylinder Gmax3_at_pelvis_r: xyz_body_rotation=(-0.1 0 0) translation=(-0.104524 -0.0910664 0.0865778)
          quadrant=all radius=0.04593637 length=0.1271048
      WrapCylinder Gmax1_at_pelvis_l: xyz_body_rotation=(0.6 -0.45 0) translation=(-0.0969682 -0.10245 -0.0776654)
          quadrant=-x radius=0.04730252 length=0.1820005
      WrapCylinder Gmax2_at_pelvis_l: xyz_body_rotation=(0.75 -0.39 0) translation=(-0.100746 -0.0858921 -0.0865778)
          quadrant=all radius=0.04796712 length=0.1182075
      WrapCylinder Gmax3_at_pelvis_l: xyz_body_rotation=(0.1 0 0) translation=(-0.104524 -0.0910664 -0.0865778)
          quadrant=all radius=0.04593637 length=0.1271048
      WrapCylinder PS_at_brim_r: xyz_body_rotation=(-0.25 -0.27 0.1) translation=(-0.0931902 -0.0620907 0.0835221)
          quadrant=-y radius=0.05778155 length=0.1259869
      WrapCylinder PS_at_brim_l: xyz_body_rotation=(0.25 0.27 0.1) translation=(-0.0931902 -0.0620907 -0.0835221)
          quadrant=-y radius=0.05778155 length=0.1259869
      WrapCylinder IL_at_brim_r: xyz_body_rotation=(-0.32 -0.24 0.9) translation=(-0.0894122 -0.0672649 0.0962542)
          quadrant=-y radius=0.06387245 length=0.1252078
      WrapCylinder IL_at_brim_l: xyz_body_rotation=(0.32 0.24 0.9) translation=(-0.0894122 -0.0672649 -0.0962542)
          quadrant=-y radius=0.06387245 length=0.1252078
    Body femur_r: mass=13.88126 mass_center=(0 -0.188304 0) inertia=(0.24518 0.0642704 0.258546 0 0 0)
        meshes=r_femur.vtp
      WrapCylinder Gastroc_at_condyles_r: translation=(0.00553837 -0.454146 0) quadrant=all radius=0.02769184
          length=0.1107673
      WrapCylinder KnExt_at_fem_r: xyz_body_rotation=(-0.0623366 0.0507601 0)
          translation=(0.00397464 -0.446096 0.00231627) quadrant=all radius=0.02769184 length=0.1107673
      WrapCylinder AB_at_femshaft_r: xyz_body_rotation=(1.66157 0.186644 0) translation=(0.0162201 -0.124718 0.0258808)
          quadrant=all radius=0.01827661 length=0.07753714
      WrapCylinder AL_at_femshaft_r: xyz_body_rotation=(1.77711 0.136489 0) translation=(0.0340418 -0.256879 0.016741)
          quadrant=all radius=0.02226424 length=0.1107673
      WrapCylinder AMprox_at_femshaft_r: xyz_body_rotation=(1.61126 0.18656 0)
          translation=(0.00574106 -0.0807436 0.0281382) quadrant=all radius=0.02337191 length=0.07753714
      WrapCylinder AMmid_at_femshaft_r: xyz_body_rotation=(1.61139 0.13656 0)
          translation=(0.0254903 -0.178015 0.0228006) quadrant=all radius=0.02370421 length=0.1329208
      WrapCylinder AMdist_at_femshaft_r: xyz_body_rotation=(1.71188 0.186636 0)
          translation=(0.0350097 -0.28881 0.0103729) quadrant=all radius=0.02414728 length=0.2215347
      WrapCylinder AMisch_at_condyles_r: xyz_body_rotation=(1.71115 -0.463363 0)
          translation=(-0.02509 -0.417406 -0.00349401) quadrant=all radius=0.04430694 length=0.2658416
      WrapCylinder PECT_at_femshaft_r: xyz_body_rotation=(1.81295 0.276344 0)
          translation=(0.006741 -0.0936016 0.0337181) quadrant=all radius=0.0166151 length=0.05538367
    Body tibia_r: mass=5.533012 mass_center=(0 -0.229194 0) inertia=(0.113352 0.0114702 0.114926 0 0 0)
        meshes=(r_tibia.vtp r_fibula.vtp)
      WrapCylinder GasLat_at_shank_r: xyz_body_rotation=(2.96723 -0.279725 -1.47812)
          translation=(-0.00908429 -0.0908429 -0.0040511) quadrant=-y radius=0.06751838 length=0.1227607
      WrapCylinder GasMed_at_shank_r: xyz_body_rotation=(2.96723 0.0279725 -1.47812)
          translation=(-0.00908429 -0.0908429 -0.0040511) quadrant=-y radius=0.06751838 length=0.1227607
      WrapCylinder GR_at_condyles_r: xyz_body_rotation=(0 -0.4 0) translation=(-0.00368282 -0.0245521 0) quadrant=all
          radius=0.04419385 length=0.1227607
      WrapCylinder SM_at_condyles_r: xyz_body_rotation=(0 -0.1 0) translation=(-0.00122761 -0.0245521 0) quadrant=all
          radius=0.04321176 length=0.1227607
      WrapCylinder ST_at_condyles_r: xyz_body_rotation=(0 -0.2 0) translation=(-0.00245521 -0.0251659 0) quadrant=all
          radius=0.05217329 length=0.1227607
      WrapCylinder BF_at_gastroc_r: translation=(-0.0712012 -0.0736564 0) quadrant=y radius=0.0368282 length=0.184141
    Body patella_r: mass=0.1286435 mass_center=(0.00199381 0.0292426 0)
        inertia=(5.25516e-6 2.40053e-5 2.40053e-5 0 0 0) meshes=r_patella.vtp
    Body talus_r: mass=0.1492384 mass_center=(0 0 0) inertia=(0.00279503 0.00244037 0.00244037 0 0 0)
        meshes=r_talus.vtp
    Body calcn_r: mass=1.865479 mass_center=(0.118219 0.0418502 0) inertia=(0.00391304 0.00863077 0.00863077 0 0 0)
        meshes=r_foot.vtp
    Body toes_r: mass=0.3232503 mass_center=(0.0409037 0.00837004 -0.0234946)
        inertia=(0.000279503 0.000452607 0.000452607 0 0 0) meshes=r_bofoot.vtp
    Body femur_l: mass=13.88126 mass_center=(0 -0.188304 0) inertia=(0.24518 0.0642704 0.258546 0 0 0)
        meshes=l_femur.vtp
      WrapCylinder Gastroc_at_condyles_l: translation=(0.00553837 -0.454146 0) quadrant=all radius=0.02769184
          length=0.1107673
      WrapCylinder KnExt_at_fem_l: xyz_body_rotation=(0.0623366 -0.0507601 0)
          translation=(0.00397464 -0.446096 -0.00231627) quadrant=all radius=0.02769184 length=0.1107673
      WrapCylinder AB_at_femshaft_l: xyz_body_rotation=(-1.66157 -0.186644 0)
          translation=(0.0162201 -0.124718 -0.0258808) quadrant=all radius=0.01827661 length=0.07753714
      WrapCylinder AL_at_femshaft_l: xyz_body_rotation=(-1.77711 -0.136489 0)
          translation=(0.0340418 -0.256879 -0.016741) quadrant=all radius=0.02226424 length=0.1107673
      WrapCylinder AMprox_at_femshaft_l: xyz_body_rotation=(-1.61126 -0.18656 0)
          translation=(0.00574106 -0.0807436 -0.0281382) quadrant=all radius=0.02337191 length=0.07753714
      WrapCylinder AMmid_at_femshaft_l: xyz_body_rotation=(-1.61139 -0.13656 0)
          translation=(0.0254903 -0.178015 -0.0228006) quadrant=all radius=0.02370421 length=0.1329208
      WrapCylinder AMdist_at_femshaft_l: xyz_body_rotation=(-1.71188 -0.186636 0)
          translation=(0.0350097 -0.28881 -0.0103729) quadrant=all radius=0.02414728 length=0.2215347
      WrapCylinder AMisch_at_condyles_l: xyz_body_rotation=(-1.71115 0.463363 0)
          translation=(-0.02509 -0.417406 0.00349401) quadrant=all radius=0.04430694 length=0.2658416
      WrapCylinder PECT_at_femshaft_l: xyz_body_rotation=(-1.81295 -0.276344 0)
          translation=(0.006741 -0.0936016 -0.0337181) quadrant=all radius=0.0166151 length=0.05538367
    Body tibia_l: mass=5.533012 mass_center=(0 -0.229194 0) inertia=(0.113352 0.0114702 0.114926 0 0 0)
        meshes=(l_tibia.vtp l_fibula.vtp)
      WrapCylinder GasLat_at_shank_l: xyz_body_rotation=(-2.96723 0.279725 -1.47812)
          translation=(-0.00908429 -0.0908429 0.0040511) quadrant=-y radius=0.06751838 length=0.1227607
      WrapCylinder GasMed_at_shank_l: xyz_body_rotation=(-2.96723 -0.0279725 -1.47812)
          translation=(-0.00908429 -0.0908429 0.0040511) quadrant=-y radius=0.06751838 length=0.1227607
      WrapCylinder GR_at_condyles_l: xyz_body_rotation=(0 0.4 0) translation=(-0.00368282 -0.0245521 0) quadrant=all
          radius=0.04419385 length=0.1227607
      WrapCylinder SM_at_condyles_l: xyz_body_rotation=(0 0.1 0) translation=(-0.00122761 -0.0245521 0) quadrant=all
          radius=0.04321176 length=0.1227607
      WrapCylinder ST_at_condyles_l: xyz_body_rotation=(0 0.2 0) translation=(-0.00245521 -0.0251659 0) quadrant=all
          radius=0.05217329 length=0.1227607
      WrapCylinder BF_at_gastroc_l: translation=(-0.0712012 -0.0736564 0) quadrant=all radius=0.0368282 length=0.184141
    Body patella_l: mass=0.1286435 mass_center=(0.00199381 0.0292426 0)
        inertia=(5.25516e-6 2.40053e-5 2.40053e-5 0 0 0) meshes=l_pat.vtp
    Body talus_l: mass=0.1492384 mass_center=(0 0 0) inertia=(0.00279503 0.00244037 0.00244037 0 0 0)
        meshes=l_talus.vtp
    Body calcn_l: mass=1.865479 mass_center=(0.118219 0.0418502 0) inertia=(0.00391304 0.00863077 0.00863077 0 0 0)
        meshes=l_foot.vtp
    Body toes_l: mass=0.3232503 mass_center=(0.0409037 0.00837004 0.0234946)
        inertia=(0.000279503 0.000452607 0.000452607 0 0 0) meshes=l_bofoot.vtp
    Body torso: mass=40.03558 mass_center=(-0.0433572 0.349597 0) inertia=(3.13105 2.35502 3.13105 0 0 0)
        meshes=(hat_spine.vtp hat_jaw.vtp hat_skull.vtp hat_ribs_scap.vtp)
    Body humerus_r: mass=3.03327 mass_center=(0 -0.187715 0) inertia=(0.0232144 0.00800826 0.0260574 0 0 0)
        meshes=humerus_rv.vtp
    Body ulna_r: mass=0.906623 mass_center=(0 -0.141741 0) inertia=(0.00611367 0.00127557 0.00663175 0 0 0)
        meshes=ulna_rv.vtp
    Body radius_r: mass=0.906623 mass_center=(0 -0.141741 0) inertia=(0.00611367 0.00127557 0.00663175 0 0 0)
        meshes=radius_rv.vtp
    Body hand_r: mass=0.6827655 mass_center=(0 -0.068095 0) inertia=(0.00133121 0.000816334 0.00199979 0 0 0)
        meshes=(pisiform_rvs.vtp lunate_rvs.vtp scaphoid_rvs.vtp triquetrum_rvs.vtp hamate_rvs.vtp capitate_rvs.vtp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)
    Body humerus_l: mass=3.03327 mass_center=(0 -0.187715 0) inertia=(0.0232144 0.00800826 0.0260574 0 0 0)
        meshes=humerus_lv.vtp
    Body ulna_l: mass=0.906623 mass_center=(0 -0.141741 0) inertia=(0.00611367 0.00127557 0.00663175 0 0 0)
        meshes=ulna_lv.vtp
    Body radius_l: mass=0.906623 mass_center=(0 -0.141741 0) inertia=(0.00611367 0.00127557 0.00663175 0 0 0)
        meshes=radius_lv.vtp
    Body hand_l: mass=0.6827655 mass_center=(0 -0.068095 0) inertia=(0.00133121 0.000816334 0.00199979 0 0 0)
        meshes=(pisiform_lvs.vtp lunate_lvs.vtp scaphoid_lvs.vtp triquetrum_lvs.vtp hamate_lvs.vtp capitate_lvs.vtp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)
  JointSet:
    CustomJoint ground_pelvis: socket_parent_frame_connectee_name=../ground socket_child_frame_connectee_name=../pelvis
      Coordinate pelvis_tilt: default_value=0 range=(-1.570796 1.570796) clamped=true
      Coordinate pelvis_list: default_value=0 range=(-1.570796 1.570796) clamped=true
      Coordinate pelvis_rotation: default_value=0 range=(-1.570796 1.570796) clamped=true
      Coordinate pelvis_tx: default_value=0 range=(-5 5) clamped=true
      Coordinate pelvis_ty: default_value=0.93 range=(-1 2) clamped=true
      Coordinate pelvis_tz: default_value=0 range=(-3 3) clamped=true
      SpatialTransform:
        TransformAxis rotation1: coordinates=pelvis_tilt axis=(0 0 1) LinearFunction(coefficients=1 0)
        TransformAxis rotation2: coordinates=pelvis_list axis=(1 0 0) LinearFunction(coefficients=1 0)
        TransformAxis rotation3: coordinates=pelvis_rotation axis=(0 1 0) LinearFunction(coefficients=1 0)
        TransformAxis translation1: coordinates=pelvis_tx axis=(1 0 0) LinearFunction(coefficients=1 0)
        TransformAxis translation2: coordinates=pelvis_ty axis=(0 1 0) LinearFunction(coefficients=1 0)
        TransformAxis translation3: coordinates=pelvis_tz axis=(0 0 1) LinearFunction(coefficients=1 0)
    CustomJoint hip_r: socket_parent_frame_connectee_name=pelvis_offset socket_child_frame_connectee_name=../femur_r
      Coordinate hip_flexion_r: default_value=0 range=(-0.5235988 2.094395) clamped=true
      Coordinate hip_adduction_r: default_value=0 range=(-0.8726646 0.5235988) clamped=true
      Coordinate hip_rotation_r: default_value=0 range=(-0.6981317 0.6981317) clamped=true
      PhysicalOffsetFrame pelvis_offset: socket_parent_connectee_name=../../pelvis
          translation=(-0.0708699 -0.081225 0.0983677) [meters]
      SpatialTransform: axes_held_at_zero=(translation1 translation2 translation3)
        TransformAxis rotation1: coordinates=hip_flexion_r axis=(0 0 1) LinearFunction(coefficients=1 0)
        TransformAxis rotation2: coordinates=hip_adduction_r axis=(1 0 0) LinearFunction(coefficients=1 0)
        TransformAxis rotation3: coordinates=hip_rotation_r axis=(0 1 0) LinearFunction(coefficients=1 0)
    CustomJoint walker_knee_r: socket_parent_frame_connectee_name=femur_r_offset
        socket_child_frame_connectee_name=tibia_r_offset
      Coordinate knee_angle_r: default_value=0 range=(0 2.0944) clamped=false
      PhysicalOffsetFrame femur_r_offset: socket_parent_connectee_name=../../femur_r
          translation=(-0.00896108 -0.451886 -0.0030461) orientation=(-1.64157 1.44618 1.5708) [radians]
      PhysicalOffsetFrame tibia_r_offset: socket_parent_connectee_name=../../tibia_r
          translation=(-0.00993077 -0.00433934 -0.00182268) orientation=(-1.64157 1.44618 1.5708)
      SpatialTransform: axes_held_at_zero=translation3
        TransformAxis rotation1: coordinates=knee_angle_r axis=(1 0 0) LinearFunction(coefficients=1 0)
        TransformAxis rotation2: coordinates=knee_angle_r axis=(0 0 1)
          SimmSpline: x=(0 0.174533 0.349066 0.523599 0.698132 0.872665 1.0472 1.22173 1.39626 1.5708 1.74533 1.91986 2.0944)
              y=(0 0.0126809 0.0226969 0.0296054 0.0332049 0.0335354 0.0308779 0.0257548 0.0189295 0.011407 0.00443314 -0.00050475 -0.0016782)
        TransformAxis rotation3: coordinates=knee_angle_r axis=(0 1 0)
          SimmSpline: x=(0 0.174533 0.349066 0.523599 0.698132 0.872665 1.0472 1.22173 1.39626 1.5708 1.74533 1.91986 2.0944)
              y=(0 0.059461 0.109399 0.150618 0.18392 0.210107 0.229983 0.24435 0.254012 0.25977 0.262428 0.262788 0.261654)
        TransformAxis translation1: coordinates=knee_angle_r axis=(0 1 0)
          MultiplierFunction: scale=1.107673
            SimmSpline: x=(0 0.174533 0.349066 0.523599 0.698132 0.872665 1.0472 1.22173 1.39626 1.5708 1.74533 1.91986 2.0944)
                y=(0 0.000479 0.000835 0.001086 0.001251 0.001346 0.001391 0.001403 0.0014 0.0014 0.001421 0.001481 0.001599)
        TransformAxis translation2: coordinates=knee_angle_r axis=(0 0 1)
          MultiplierFunction: scale=1.107673
            SimmSpline: x=(0 0.174533 0.349066 0.523599 0.698132 0.872665 1.0472 1.22173 1.39626 1.5708 1.74533 1.91986 2.0944)
                y=(0 0.000988 0.001899 0.002734 0.003492 0.004173 0.004777 0.005305 0.005756 0.00613 0.006427 0.006648 0.006792)
    CustomJoint patellofemoral_r: socket_parent_frame_connectee_name=femur_r_offset
        socket_child_frame_connectee_name=../patella_r
      Coordinate knee_angle_r_beta: default_value=0 range=(-99999.9 99999.9) clamped=false
      PhysicalOffsetFrame femur_r_offset: socket_parent_connectee_name=../../femur_r
          translation=(-0.00896108 -0.451886 -0.0030461)
      SpatialTransform: axes_held_at_zero=(rotation2 rotation3)
        TransformAxis rotation1: coordinates=knee_angle_r_beta axis=(0 0 1)
          SimmSpline: x=(0 0.174533 0.349066 0.523599 0.698132 0.872665 1.0472 1.22173 1.39626 1.5708 1.74533 1.91986 2.0944)
              y=(0.00113686 -0.00629212 -0.105582 -0.253683 -0.414245 -0.579047 -0.747244 -0.91799 -1.09044 -1.26379 -1.43763 -1.61186 -1.78634)
        TransformAxis translation1: coordinates=knee_angle_r_beta axis=(1 0 0)
          MultiplierFunction: scale=1.107673
            SimmSpline f9: x=(0 0.174533 0.349066 0.523599 0.698132 0.872665 1.0472 1.22173 1.39626 1.5708 1.74533 1.91986 2.0944)
                y=(0.0524 0.0488 0.0437 0.0371 0.0296 0.0216 0.0136 0.0057 -0.0019 -0.0088 -0.0148 -0.0196 -0.0227)
        TransformAxis translation2: coordinates=knee_angle_r_beta axis=(0 1 0)
          MultiplierFunction: scale=1.107673
            SimmSpline f10: x=(0 0.174533 0.349066 0.523599 0.698132 0.872665 1.0472 1.22173 1.39626 1.5708 1.74533 1.91986 2.0944)
                y=(-0.0108 -0.019 -0.0263 -0.0322 -0.0367 -0.0395 -0.0408 -0.0404 -0.0384 -0.0349 -0.0301 -0.0245 -0.0187)
        TransformAxis translation3: axis=(0 0 1) MultiplierFunction(scale=1.107673, Constant(value=0.00275))
    PinJoint ankle_r: socket_parent_frame_connectee_name=tibia_r_offset
        socket_child_frame_connectee_name=talus_r_offset
      Coordinate ankle_angle_r: default_value=0 range=(-0.6981317 0.5235988) clamped=true
      PhysicalOffsetFrame tibia_r_offset: socket_parent_connectee_name=../../tibia_r
          translation=(-0.0122761 -0.491043 0) orientation=(0.175895 -0.105208 0.0186622)
      PhysicalOffsetFrame talus_r_offset: socket_parent_connectee_name=../../talus_r translation=(0 0 0)
          orientation=(0.175895 -0.105208 0.0186622)
    PinJoint subtalar_r: socket_parent_frame_connectee_name=talus_r_offset
        socket_child_frame_connectee_name=calcn_r_offset
      Coordinate subtalar_angle_r: default_value=0 range=(-0.3490659 0.3490659) clamped=true locked=true
      PhysicalOffsetFrame talus_r_offset: socket_parent_connectee_name=../../talus_r
          translation=(-0.0576552 -0.0585205 0.010633) orientation=(-1.76819 0.906223 1.8196)
      PhysicalOffsetFrame calcn_r_offset: socket_parent_connectee_name=../../calcn_r translation=(0 0 0)
          orientation=(-1.76819 0.906223 1.8196)
    PinJoint mtp_r: socket_parent_frame_connectee_name=calcn_r_offset socket_child_frame_connectee_name=toes_r_offset
      Coordinate mtp_angle_r: default_value=0 range=(-0.5235988 0.5235988) clamped=true locked=true
      PhysicalOffsetFrame calcn_r_offset: socket_parent_connectee_name=../../calcn_r
          translation=(0.211375 -0.00279001 0.00144995) orientation=(-3.14159 0.619901 0)
      PhysicalOffsetFrame toes_r_offset: socket_parent_connectee_name=../../toes_r translation=(0 0 0)
          orientation=(-3.14159 0.619901 0)
    CustomJoint hip_l: socket_parent_frame_connectee_name=pelvis_offset socket_child_frame_connectee_name=../femur_l
      Coordinate hip_flexion_l: default_value=0 range=(-0.5235988 2.094395) clamped=true
      Coordinate hip_adduction_l: default_value=0 range=(-0.8726646 0.5235988) clamped=true
      Coordinate hip_rotation_l: default_value=0 range=(-0.6981317 0.6981317) clamped=true
      PhysicalOffsetFrame pelvis_offset: socket_parent_connectee_name=../../pelvis
          translation=(-0.0708699 -0.081225 -0.0983677)
      SpatialTransform: axes_held_at_zero=(translation1 translation2 translation3)
        TransformAxis rotation1: coordinates=hip_flexion_l axis=(0 0 1) LinearFunction(coefficients=1 0)
        TransformAxis rotation2: coordinates=hip_adduction_l axis=(1 0 0) LinearFunction(coefficients=-1 0)
        TransformAxis rotation3: coordinates=hip_rotation_l axis=(0 1 0) LinearFunction(coefficients=-1 0)
    CustomJoint walker_knee_l: socket_parent_frame_connectee_name=femur_l_offset
        socket_child_frame_connectee_name=tibia_l_offset
      Coordinate knee_angle_l: default_value=0 range=(0 2.0944) clamped=true
      PhysicalOffsetFrame femur_l_offset: socket_parent_connectee_name=../../femur_l
          translation=(-0.00896108 -0.451886 0.0030461) orientation=(1.64157 -1.44618 1.5708)
      PhysicalOffsetFrame tibia_l_offset: socket_parent_connectee_name=../../tibia_l
          translation=(-0.00993077 -0.00433934 0.00182268) orientation=(1.64157 -1.44618 1.5708)
      SpatialTransform: axes_held_at_zero=translation3
        TransformAxis rotation1: coordinates=knee_angle_l axis=(-1 0 0) LinearFunction(coefficients=1 0)
        TransformAxis rotation2: coordinates=knee_angle_l axis=(0 0 1)
          SimmSpline: x=(0 0.174533 0.349066 0.523599 0.698132 0.872665 1.0472 1.22173 1.39626 1.5708 1.74533 1.91986 2.0944)
              y=(0 0.0126809 0.0226969 0.0296054 0.0332049 0.0335354 0.0308779 0.0257548 0.0189295 0.011407 0.00443314 -0.00050475 -0.0016782)
        TransformAxis rotation3: coordinates=knee_angle_l axis=(0 1 0)
          SimmSpline: x=(0 0.174533 0.349066 0.523599 0.698132 0.872665 1.0472 1.22173 1.39626 1.5708 1.74533 1.91986 2.0944)
              y=(0 -0.059461 -0.109399 -0.150618 -0.18392 -0.210107 -0.229983 -0.24435 -0.254012 -0.25977 -0.262428 -0.262788 -0.261654)
        TransformAxis translation1: coordinates=knee_angle_l axis=(0 1 0)
          MultiplierFunction: scale=1.107673
            SimmSpline: x=(0 0.174533 0.349066 0.523599 0.698132 0.872665 1.0472 1.22173 1.39626 1.5708 1.74533 1.91986 2.0944)
                y=(0 0.000479 0.000835 0.001086 0.001251 0.001346 0.001391 0.001403 0.0014 0.0014 0.001421 0.001481 0.001599)
        TransformAxis translation2: coordinates=knee_angle_l axis=(0 0 1)
          MultiplierFunction: scale=1.107673
            SimmSpline: x=(0 0.174533 0.349066 0.523599 0.698132 0.872665 1.0472 1.22173 1.39626 1.5708 1.74533 1.91986 2.0944)
                y=(0 -0.000988 -0.001899 -0.002734 -0.003492 -0.004173 -0.004777 -0.005305 -0.005756 -0.00613 -0.006427 -0.006648 -0.006792)
    CustomJoint patellofemoral_l: socket_parent_frame_connectee_name=femur_l_offset
        socket_child_frame_connectee_name=../patella_l
      Coordinate knee_angle_l_beta: default_value=0 range=(-99999.9 99999.9) clamped=false
      PhysicalOffsetFrame femur_l_offset: socket_parent_connectee_name=../../femur_l
          translation=(-0.00896108 -0.451886 0.0030461)
      SpatialTransform: axes_held_at_zero=(rotation2 rotation3)
        TransformAxis rotation1: coordinates=knee_angle_l_beta axis=(0 0 1)
          SimmSpline: x=(0 0.174533 0.349066 0.523599 0.698132 0.872665 1.0472 1.22173 1.39626 1.5708 1.74533 1.91986 2.0944)
              y=(0.00113686 -0.00629212 -0.105582 -0.253683 -0.414245 -0.579047 -0.747244 -0.91799 -1.09044 -1.26379 -1.43763 -1.61186 -1.78634)
        TransformAxis translation1: coordinates=knee_angle_l_beta axis=(1 0 0)
          MultiplierFunction: scale=1.107673
            SimmSpline f23: x=(0 0.174533 0.349066 0.523599 0.698132 0.872665 1.0472 1.22173 1.39626 1.5708 1.74533 1.91986 2.0944)
                y=(0.0524 0.0488 0.0437 0.0371 0.0296 0.0216 0.0136 0.0057 -0.0019 -0.0088 -0.0148 -0.0196 -0.0227)
        TransformAxis translation2: coordinates=knee_angle_l_beta axis=(0 1 0)
          MultiplierFunction: scale=1.107673
            SimmSpline f24: x=(0 0.174533 0.349066 0.523599 0.698132 0.872665 1.0472 1.22173 1.39626 1.5708 1.74533 1.91986 2.0944)
                y=(-0.0108 -0.019 -0.0263 -0.0322 -0.0367 -0.0395 -0.0408 -0.0404 -0.0384 -0.0349 -0.0301 -0.0245 -0.0187)
        TransformAxis translation3: axis=(0 0 1) MultiplierFunction(scale=1.107673, Constant(value=-0.00275))
    PinJoint ankle_l: socket_parent_frame_connectee_name=tibia_l_offset
        socket_child_frame_connectee_name=talus_l_offset
      Coordinate ankle_angle_l: default_value=0 range=(-0.6981317 0.5235988) clamped=true
      PhysicalOffsetFrame tibia_l_offset: socket_parent_connectee_name=../../tibia_l
          translation=(-0.0122761 -0.491043 0) orientation=(-0.175895 0.105208 0.0186622)
      PhysicalOffsetFrame talus_l_offset: socket_parent_connectee_name=../../talus_l translation=(0 0 0)
          orientation=(-0.175895 0.105208 0.0186622)
    PinJoint subtalar_l: socket_parent_frame_connectee_name=talus_l_offset
        socket_child_frame_connectee_name=calcn_l_offset
      Coordinate subtalar_angle_l: default_value=0 range=(-0.3490659 0.3490659) clamped=true locked=true
      PhysicalOffsetFrame talus_l_offset: socket_parent_connectee_name=../../talus_l
          translation=(-0.0576552 -0.0585205 -0.010633) orientation=(1.76819 -0.906223 1.8196)
      PhysicalOffsetFrame calcn_l_offset: socket_parent_connectee_name=../../calcn_l translation=(0 0 0)
          orientation=(1.76819 -0.906223 1.8196)
    PinJoint mtp_l: socket_parent_frame_connectee_name=calcn_l_offset socket_child_frame_connectee_name=toes_l_offset
      Coordinate mtp_angle_l: default_value=0 range=(-0.5235988 0.5235988) clamped=true locked=true
      PhysicalOffsetFrame calcn_l_offset: socket_parent_connectee_name=../../calcn_l
          translation=(0.211375 -0.00279001 -0.00144995) orientation=(-3.14159 -0.619901 0)
      PhysicalOffsetFrame toes_l_offset: socket_parent_connectee_name=../../toes_l translation=(0 0 0)
          orientation=(-3.14159 -0.619901 0)
    CustomJoint back: socket_parent_frame_connectee_name=pelvis_offset socket_child_frame_connectee_name=../torso
      Coordinate lumbar_extension: default_value=0 range=(-1.570796 1.570796) clamped=true
      Coordinate lumbar_bending: default_value=0 range=(-1.570796 1.570796) clamped=true
      Coordinate lumbar_rotation: default_value=0 range=(-1.570796 1.570796) clamped=true
      PhysicalOffsetFrame pelvis_offset: socket_parent_connectee_name=../../pelvis translation=(-0.126814 0.0843399 0)
      SpatialTransform: axes_held_at_zero=(translation1 translation2 translation3)
        TransformAxis rotation1: coordinates=lumbar_extension axis=(0 0 1) LinearFunction(coefficients=1 0)
        TransformAxis rotation2: coordinates=lumbar_bending axis=(1 0 0) LinearFunction(coefficients=1 0)
        TransformAxis rotation3: coordinates=lumbar_rotation axis=(0 1 0) LinearFunction(coefficients=1 0)
    CustomJoint acromial_r: socket_parent_frame_connectee_name=torso_offset
        socket_child_frame_connectee_name=../humerus_r
      Coordinate arm_flex_r: default_value=0 range=(-1.570796 1.570796) clamped=true
      Coordinate arm_add_r: default_value=0 range=(-2.094395 1.570796) clamped=true
      Coordinate arm_rot_r: default_value=0 range=(-1.570796 1.570796) clamped=true
      PhysicalOffsetFrame torso_offset: socket_parent_connectee_name=../../torso
          translation=(0.00455973 0.40586 0.245691)
      SpatialTransform: axes_held_at_zero=(translation1 translation2 translation3)
        TransformAxis rotation1: coordinates=arm_flex_r axis=(0 0 1) LinearFunction(coefficients=1 0)
        TransformAxis rotation2: coordinates=arm_add_r axis=(1 0 0) LinearFunction(coefficients=1 0)
        TransformAxis rotation3: coordinates=arm_rot_r axis=(0 1 0) LinearFunction(coefficients=1 0)
    PinJoint elbow_r: socket_parent_frame_connectee_name=humerus_r_offset
        socket_child_frame_connectee_name=ulna_r_offset
      Coordinate elbow_flex_r: default_value=0 range=(0 2.618) clamped=true
      PhysicalOffsetFrame humerus_r_offset: socket_parent_connectee_name=../../humerus_r
          translation=(0.0149987 -0.326669 -0.010949) orientation=(-0.0228627 0.228018 0.0051689)
      PhysicalOffsetFrame ulna_r_offset: socket_parent_connectee_name=../../ulna_r translation=(0 0 0)
          orientation=(-0.0228627 0.228018 0.0051689)
    PinJoint radioulnar_r: socket_parent_frame_connectee_name=ulna_r_offset
        socket_child_frame_connectee_name=radius_r_offset
      Coordinate pro_sup_r: default_value=0 range=(0 1.570796) clamped=true
      PhysicalOffsetFrame ulna_r_offset: socket_parent_connectee_name=../../ulna_r
          translation=(-0.00791115 -0.0152966 0.0306744) orientation=(-1.56884 0.056428 1.53614)
      PhysicalOffsetFrame radius_r_offset: socket_parent_connectee_name=../../radius_r translation=(0 0 0)
          orientation=(-1.56884 0.056428 1.53614)
    UniversalJoint radius_hand_r: socket_parent_frame_connectee_name=radius_r_offset
        socket_child_frame_connectee_name=hand_r_offset
      Coordinate wrist_flex_r: default_value=0 range=(-1.22173 1.22173) clamped=true locked=true
      Coordinate wrist_dev_r: default_value=0 range=(-0.4363323 0.6108652) clamped=true locked=true
      PhysicalOffsetFrame radius_r_offset: socket_parent_connectee_name=../../radius_r
          translation=(-0.0103455 -0.277356 0.0160058) orientation=(-1.5708 0 -1.5708)
      PhysicalOffsetFrame hand_r_offset: socket_parent_connectee_name=../../hand_r translation=(0 0 0)
          orientation=(-1.5708 0 -1.5708)
    CustomJoint acromial_l: socket_parent_frame_connectee_name=torso_offset
        socket_child_frame_connectee_name=../humerus_l
      Coordinate arm_flex_l: default_value=0 range=(-1.570796 1.570796) clamped=true
      Coordinate arm_add_l: default_value=0 range=(-2.094395 1.570796) clamped=true
      Coordinate arm_rot_l: default_value=0 range=(-1.570796 1.570796) clamped=true
      PhysicalOffsetFrame torso_offset: socket_parent_connectee_name=../../torso
          translation=(0.00455973 0.40586 -0.245691)
      SpatialTransform: axes_held_at_zero=(translation1 translation2 translation3)
        TransformAxis rotation1: coordinates=arm_flex_l axis=(0 0 1) LinearFunction(coefficients=1 0)
        TransformAxis rotation2: coordinates=arm_add_l axis=(-1 0 0) LinearFunction(coefficients=1 0)
        TransformAxis rotation3: coordinates=arm_rot_l axis=(0 -1 0) LinearFunction(coefficients=1 0)
    PinJoint elbow_l: socket_parent_frame_connectee_name=humerus_l_offset
        socket_child_frame_connectee_name=ulna_l_offset
      Coordinate elbow_flex_l: default_value=0 range=(0 2.618) clamped=true
      PhysicalOffsetFrame humerus_l_offset: socket_parent_connectee_name=../../humerus_l
          translation=(0.0149987 -0.326669 0.010949) orientation=(0.0228627 -0.228018 0.0051689)
      PhysicalOffsetFrame ulna_l_offset: socket_parent_connectee_name=../../ulna_l translation=(0 0 0)
          orientation=(0.0228627 -0.228018 0.0051689)
    PinJoint radioulnar_l: socket_parent_frame_connectee_name=ulna_l_offset
        socket_child_frame_connectee_name=radius_l_offset
      Coordinate pro_sup_l: default_value=0 range=(0 1.570796) clamped=true
      PhysicalOffsetFrame ulna_l_offset: socket_parent_connectee_name=../../ulna_l
          translation=(-0.00791115 -0.0152966 -0.0306744) orientation=(1.56884 -0.056428 1.53614)
      PhysicalOffsetFrame radius_l_offset: socket_parent_connectee_name=../../radius_l translation=(0 0 0)
          orientation=(1.56884 -0.056428 1.53614)
    UniversalJoint radius_hand_l: socket_parent_frame_connectee_name=radius_l_offset
        socket_child_frame_connectee_name=hand_l_offset
      Coordinate wrist_flex_l: default_value=0 range=(-1.22173 1.22173) clamped=true locked=true
      Coordinate wrist_dev_l: default_value=0 range=(-0.4363323 0.6108652) clamped=true locked=true
      PhysicalOffsetFrame radius_l_offset: socket_parent_connectee_name=../../radius_l
          translation=(-0.0103455 -0.277356 -0.0160058) orientation=(1.5708 0 1.5708)
      PhysicalOffsetFrame hand_l_offset: socket_parent_connectee_name=../../hand_l translation=(0 0 0)
          orientation=(1.5708 0 1.5708)
  ConstraintSet:
    CoordinateCouplerConstraint patellofemoral_knee_angle_r_con: independent_coordinate_names=knee_angle_r
        dependent_coordinate_name=knee_angle_r_beta scale_factor=1
        coupled_coordinates_function=LinearFunction(coefficients=1 0)
    CoordinateCouplerConstraint patellofemoral_knee_angle_l_con: independent_coordinate_names=knee_angle_l
        dependent_coordinate_name=knee_angle_l_beta scale_factor=1
        coupled_coordinates_function=LinearFunction(coefficients=1 0)
  ForceSet:
    Millard2012EquilibriumMuscle [values shared by the 80 below unless stated]: fiber_damping=0.01
        default_activation=0.01 minimum_activation=0.01
      ActiveForceLengthCurve: min_norm_active_fiber_length=0.25 transition_norm_fiber_length=0.77
          max_norm_active_fiber_length=1.9 shallow_ascending_slope=0.75 minimum_value=0
      ForceVelocityCurve: concentric_slope_at_vmax=0 concentric_slope_near_vmax=0.25 isometric_slope=5
          eccentric_slope_at_vmax=0 eccentric_slope_near_vmax=0.15 max_eccentric_velocity_force_multiplier=1.4
      FiberForceLengthCurve: strain_at_zero_force=0 strain_at_one_norm_force=0.7
      TendonForceLengthCurve
    Millard2012EquilibriumMuscle add_brev_r: max_isometric_force=834.9702 optimal_fiber_length=0.1207807
        tendon_slack_length=0.0415297 pennation_angle_at_optimal=0.1147809 ignore_tendon_compliance=true
      PathPoint addbrev_r-P1: socket_parent_frame_connectee_name=../../../pelvis (-0.0240532 -0.0972754 0.0196073)
      PathPoint addbrev_r-P2: socket_parent_frame_connectee_name=../../../femur_r (-0.00221535 -0.130705 0.0275811)
      PathWrap: wrap_object=AB_at_femshaft_r method=hybrid
    Millard2012EquilibriumMuscle add_long_r: max_isometric_force=1269.858 optimal_fiber_length=0.1220977
        tendon_slack_length=0.1487283 pennation_angle_at_optimal=0.1377704
      PathPoint addlong_r-P1: socket_parent_frame_connectee_name=../../../pelvis (-0.0095457 -0.0919977 0.0240381)
      PathPoint addlong_r-P2: socket_parent_frame_connectee_name=../../../femur_r (0.0124724 -0.265144 0.0175345)
      PathWrap: wrap_object=AL_at_femshaft_r method=hybrid
    Millard2012EquilibriumMuscle add_mag3_r: max_isometric_force=824.8176 optimal_fiber_length=0.2005651
        tendon_slack_length=0.09890249 pennation_angle_at_optimal=0.194705 ignore_tendon_compliance=true
      PathPoint addmagDist_r-P1: socket_parent_frame_connectee_name=../../../pelvis (-0.0932406 -0.132119 0.050699)
      PathPoint addmagDist_r-P2: socket_parent_frame_connectee_name=../../../femur_r (0.0124613 -0.290764 0.0213781)
      PathWrap: wrap_object=AMdist_at_femshaft_r method=hybrid
    Millard2012EquilibriumMuscle add_mag4_r: max_isometric_force=833.2101 optimal_fiber_length=0.1750154
        tendon_slack_length=0.242403 pennation_angle_at_optimal=0.1680443
      PathPoint addmagIsch_r-P1: socket_parent_frame_connectee_name=../../../pelvis (-0.112861 -0.134281 0.0531053)
      PathPoint addmagIsch_r-P2: socket_parent_frame_connectee_name=../../../femur_r (0.00532791 -0.429744 -0.0362542)
      PathWrap: wrap_object=AMisch_at_condyles_r method=hybrid
    Millard2012EquilibriumMuscle add_mag2_r: max_isometric_force=807.051 optimal_fiber_length=0.1592878
        tendon_slack_length=0.05393773 pennation_angle_at_optimal=0.2073076 ignore_tendon_compliance=true
      PathPoint addmagMid_r-P1: socket_parent_frame_connectee_name=../../../pelvis (-0.0663162 -0.124958 0.0363372)
      PathPoint addmagMid_r-P2: socket_parent_frame_connectee_name=../../../femur_r (0.00268057 -0.179886 0.0323662)
      PathWrap: wrap_object=AMmid_at_femshaft_r method=hybrid
    Millard2012EquilibriumMuscle add_mag1_r: max_isometric_force=776.6252 optimal_fiber_length=0.1269411
        tendon_slack_length=0.04847333 pennation_angle_at_optimal=0.3114833 ignore_tendon_compliance=true
      PathPoint addmagProx_r-P1: socket_parent_frame_connectee_name=../../../pelvis (-0.039014 -0.111298 0.0173792)
      PathPoint addmagProx_r-P2: socket_parent_frame_connectee_name=../../../femur_r (-0.0169142 -0.0873511 0.0354677)
      PathWrap: wrap_object=AMprox_at_femshaft_r method=hybrid
    Millard2012EquilibriumMuscle bifemlh_r: max_isometric_force=1817.041 optimal_fiber_length=0.1102481
        tendon_slack_length=0.3673732 pennation_angle_at_optimal=0.1759182
      PathPoint bflh_r-P1: socket_parent_frame_connectee_name=../../../pelvis (-0.13097 -0.12325 0.0746097)
      PathPoint bflh_r-P2: socket_parent_frame_connectee_name=../../../tibia_r (-0.0413703 -0.0429662 0.0310585)
      PathPoint bflh_r-P3: socket_parent_frame_connectee_name=../../../tibia_r (-0.0352323 -0.0558561 0.0371965)
    Millard2012EquilibriumMuscle bifemsh_r: max_isometric_force=771.2272 optimal_fiber_length=0.124537
        tendon_slack_length=0.1194756 pennation_angle_at_optimal=0.2642232 ignore_tendon_compliance=true
      PathPoint bfsh_r-P1: socket_parent_frame_connectee_name=../../../femur_r (0.00553837 -0.23383 0.0259196)
      PathPoint bfsh_r-P2: socket_parent_frame_connectee_name=../../../tibia_r (-0.036951 -0.0514367 0.0390379)
      PathWrap: wrap_object=BF_at_gastroc_r method=hybrid
    Millard2012EquilibriumMuscle ext_dig_r: max_isometric_force=772.2576 optimal_fiber_length=0.08464625
        tendon_slack_length=0.4505614 pennation_angle_at_optimal=0.2182582
      PathPoint edl_r-P1: socket_parent_frame_connectee_name=../../../tibia_r (-0.0196417 -0.142034 0.0251659)
      PathPoint edl_r-P2: socket_parent_frame_connectee_name=../../../tibia_r (0.0201328 -0.46158 0.0137492)
      PathPoint edl_r-P3: socket_parent_frame_connectee_name=../../../calcn_r (0.108643 0.0502202 0.00107404)
      PathPoint edl_r-P4: socket_parent_frame_connectee_name=../../../calcn_r (0.191041 0.00767253 0.0174531)
      PathPoint edl_r-P5: socket_parent_frame_connectee_name=../../../toes_r (0.000354656 0.00655653 0.020541)
      PathPoint edl_r-P6: socket_parent_frame_connectee_name=../../../toes_r (0.0523709 -0.000558002 0.0335637)
    Millard2012EquilibriumMuscle ext_hal_r: max_isometric_force=366.6074 optimal_fiber_length=0.09116454
        tendon_slack_length=0.3982906 pennation_angle_at_optimal=0.1972681
      PathPoint ehl_r-P1: socket_parent_frame_connectee_name=../../../tibia_r (-0.0171865 -0.190279 0.0232018)
      PathPoint ehl_r-P2: socket_parent_frame_connectee_name=../../../tibia_r (0.00871601 -0.357111 0.0201328)
      PathPoint ehl_r-P3: socket_parent_frame_connectee_name=../../../tibia_r (0.0245521 -0.453355 -0.0034373)
      PathPoint ehl_r-P4: socket_parent_frame_connectee_name=../../../calcn_r (0.114672 0.0542657 -0.0283278)
      PathPoint ehl_r-P5: socket_parent_frame_connectee_name=../../../calcn_r (0.152857 0.0431057 -0.0345035)
      PathPoint ehl_r-P6: socket_parent_frame_connectee_name=../../../calcn_r (0.204991 0.0193906 -0.0375914)
      PathPoint ehl_r-P7: socket_parent_frame_connectee_name=../../../toes_r (0.0352292 0.00571952 -0.0328924)
      PathPoint ehl_r-P8: socket_parent_frame_connectee_name=../../../toes_r (0.0665571 0.00474302 -0.0249714)
    Millard2012EquilibriumMuscle flex_dig_r: max_isometric_force=539.7017 optimal_fiber_length=0.05465928
        tendon_slack_length=0.464203 pennation_angle_at_optimal=0.2248391
      PathPoint fdl_r-P1: socket_parent_frame_connectee_name=../../../tibia_r (-0.0028235 -0.224898 -0.00220969)
      PathPoint fdl_r-P2: socket_parent_frame_connectee_name=../../../tibia_r (-0.0216059 -0.447463 -0.0152223)
      PathPoint fdl_r-P3: socket_parent_frame_connectee_name=../../../calcn_r (0.0515433 0.0439427 -0.0375914)
      PathPoint fdl_r-P4: socket_parent_frame_connectee_name=../../../calcn_r (0.0836988 0.0245521 -0.035309)
      PathPoint fdl_r-P5: socket_parent_frame_connectee_name=../../../calcn_r (0.196007 -0.0112995 0.0155736)
      PathPoint fdl_r-P6: socket_parent_frame_connectee_name=../../../toes_r (-0.00224615 -0.010881 0.0197355)
      PathPoint fdl_r-P7: socket_parent_frame_connectee_name=../../../toes_r (0.0336923 -0.00990454 0.0288648)
      PathPoint fdl_r-P8: socket_parent_frame_connectee_name=../../../toes_r (0.0521344 -0.00837004 0.0324897)
    Millard2012EquilibriumMuscle flex_hal_r: max_isometric_force=1165.442 optimal_fiber_length=0.06416376
        tendon_slack_length=0.4314187 pennation_angle_at_optimal=0.2580255
      PathPoint fhl_r-P1: socket_parent_frame_connectee_name=../../../tibia_r (-0.0380558 -0.265531 0.0245521)
      PathPoint fhl_r-P2: socket_parent_frame_connectee_name=../../../tibia_r (-0.0297081 -0.450654 -0.00932981)
      PathPoint fhl_r-P3: socket_parent_frame_connectee_name=../../../calcn_r (0.0442138 0.0385022 -0.0323554)
      PathPoint fhl_r-P4: socket_parent_frame_connectee_name=../../../calcn_r (0.122711 0.00948604 -0.0343693)
      PathPoint fhl_r-P5: socket_parent_frame_connectee_name=../../../calcn_r (0.204045 -0.00739353 -0.0361146)
      PathPoint fhl_r-P6: socket_parent_frame_connectee_name=../../../toes_r (0.0183239 -0.00892804 -0.0355775)
      PathPoint fhl_r-P7: socket_parent_frame_connectee_name=../../../toes_r (0.0664389 -0.0142291 -0.0243001)
    Millard2012EquilibriumMuscle lat_gas_r: max_isometric_force=2009.247 optimal_fiber_length=0.07204463
        tendon_slack_length=0.4607795 pennation_angle_at_optimal=0.2102268
      PathPoint gaslat_r-P1: socket_parent_frame_connectee_name=../../../femur_r (-0.00332302 -0.422467 0.0306826)
      PathPoint gaslat_r-P2: socket_parent_frame_connectee_name=../../../calcn_r (0.00520162 0.0432452 -0.00711551)
      PathWrap pathwrap0: wrap_object=GasLat_at_shank_r method=hybrid
      PathWrap pathwrap1: wrap_object=Gastroc_at_condyles_r method=hybrid
    Millard2012EquilibriumMuscle med_gas_r: max_isometric_force=3982.895 optimal_fiber_length=0.06235364
        tendon_slack_length=0.4874787 pennation_angle_at_optimal=0.1656816
      PathPoint gasmed_r-P1: socket_parent_frame_connectee_name=../../../femur_r (0.00886139 -0.419587 -0.0230396)
      PathPoint gasmed_r-P2: socket_parent_frame_connectee_name=../../../calcn_r (0.00520162 0.0432452 -0.00711551)
      PathWrap pathwrap0: wrap_object=GasMed_at_shank_r method=hybrid
      PathWrap pathwrap1: wrap_object=Gastroc_at_condyles_r method=hybrid
    Millard2012EquilibriumMuscle glut_max1_r: max_isometric_force=1407.142 optimal_fiber_length=0.1606348
        tendon_slack_length=0.05337107 pennation_angle_at_optimal=0.3540118 ignore_tendon_compliance=true
      PathPoint glmax1_r-P1: socket_parent_frame_connectee_name=../../../pelvis (-0.155023 0.0357022 0.0716814)
      PathPoint glmax1_r-P2: socket_parent_frame_connectee_name=../../../pelvis (-0.158297 -0.0250433 0.0991826)
      PathPoint glmax1_r-P3: socket_parent_frame_connectee_name=../../../femur_r (-0.0491807 -0.0361102 0.0334517)
      PathPoint glmax1_r-P4: socket_parent_frame_connectee_name=../../../femur_r (-0.0306826 -0.0626943 0.0520607)
      PathWrap: wrap_object=Gmax1_at_pelvis_r method=hybrid
    Millard2012EquilibriumMuscle glut_max2_r: max_isometric_force=1964.625 optimal_fiber_length=0.1756225
        tendon_slack_length=0.07593955 pennation_angle_at_optimal=0.3673821 ignore_tendon_compliance=true
      PathPoint glmax2_r-P1: socket_parent_frame_connectee_name=../../../pelvis (-0.165853 0.00900315 0.058822)
      PathPoint glmax2_r-P2: socket_parent_frame_connectee_name=../../../pelvis (-0.169254 -0.0630221 0.103511)
      PathPoint glmax2_r-P3: socket_parent_frame_connectee_name=../../../femur_r (-0.0498453 -0.0646881 0.0279134)
      PathPoint glmax2_r-P4: socket_parent_frame_connectee_name=../../../femur_r (-0.0172797 -0.11254 0.0464115)
      PathWrap: wrap_object=Gmax2_at_pelvis_r method=hybrid
    Millard2012EquilibriumMuscle glut_max3_r: max_isometric_force=1291.709 optimal_fiber_length=0.1915173
        tendon_slack_length=0.07995172 pennation_angle_at_optimal=0.3824161 ignore_tendon_compliance=true
      PathPoint glmax3_r-P1: socket_parent_frame_connectee_name=../../../pelvis (-0.163713 -0.0543294 0.0114588)
      PathPoint glmax3_r-P2: socket_parent_frame_connectee_name=../../../pelvis (-0.160312 -0.130701 0.0553844)
      PathPoint glmax3_r-P3: socket_parent_frame_connectee_name=../../../femur_r (-0.0311256 -0.124613 0.0104121)
      PathPoint glmax3_r-P4: socket_parent_frame_connectee_name=../../../femur_r (-0.00664604 -0.157179 0.0455254)
      PathWrap: wrap_object=Gmax3_at_pelvis_r method=hybrid
    Millard2012EquilibriumMuscle glut_med1_r: max_isometric_force=1632.322 optimal_fiber_length=0.07643342
        tendon_slack_length=0.05844208 pennation_angle_at_optimal=0.3165559 ignore_tendon_compliance=true
      PathPoint glmed1_r-P1: socket_parent_frame_connectee_name=../../../pelvis (-0.0560401 0.0253537 0.149219)
      PathPoint glmed1_r-P2: socket_parent_frame_connectee_name=../../../femur_r (-0.0241473 -0.0129598 0.0614759)
    Millard2012EquilibriumMuscle glut_med2_r: max_isometric_force=1126.099 optimal_fiber_length=0.07752118
        tendon_slack_length=0.06928993 pennation_angle_at_optimal=0.3165559 ignore_tendon_compliance=true
      PathPoint glmed2_r-P1: socket_parent_frame_connectee_name=../../../pelvis (-0.107043 0.0327011 0.0859412)
      PathPoint glmed2_r-P2: socket_parent_frame_connectee_name=../../../femur_r (-0.028578 -0.00642451 0.0583744)
    Millard2012EquilibriumMuscle glut_med3_r: max_isometric_force=1209.674 optimal_fiber_length=0.08217372
        tendon_slack_length=0.05091713 pennation_angle_at_optimal=0.3165559 ignore_tendon_compliance=true
      PathPoint glmed3_r-P1: socket_parent_frame_connectee_name=../../../pelvis (-0.145075 -0.00755437 0.0669705)
      PathPoint glmed3_r-P2: socket_parent_frame_connectee_name=../../../femur_r (-0.0342271 -0.00520607 0.0573775)
    Millard2012EquilibriumMuscle glut_min1_r: max_isometric_force=561.5681 optimal_fiber_length=0.07079329
        tendon_slack_length=0.01680069 pennation_angle_at_optimal=0.1745329 ignore_tendon_compliance=true
      PathPoint glmin1_r-P1: socket_parent_frame_connectee_name=../../../pelvis (-0.0584328 -0.0154192 0.132668)
      PathPoint glmin1_r-P2: socket_parent_frame_connectee_name=../../../femur_r (-0.00797525 -0.0115198 0.0620297)
    Millard2012EquilibriumMuscle glut_min2_r: max_isometric_force=593.7129 optimal_fiber_length=0.05820644
        tendon_slack_length=0.02712738 pennation_angle_at_optimal=0 ignore_tendon_compliance=true
      PathPoint glmin2_r-P1: socket_parent_frame_connectee_name=../../../pelvis (-0.0775746 -0.0146948 0.123628)
      PathPoint glmin2_r-P2: socket_parent_frame_connectee_name=../../../femur_r (-0.0106337 -0.0115198 0.0620297)
    Millard2012EquilibriumMuscle glut_min3_r: max_isometric_force=653.4005 optimal_fiber_length=0.04061183
        tendon_slack_length=0.05436909 pennation_angle_at_optimal=0.01745329
      PathPoint glmin3_r-P1: socket_parent_frame_connectee_name=../../../pelvis (-0.0993609 -0.0160401 0.101602)
      PathPoint glmin3_r-P2: socket_parent_frame_connectee_name=../../../femur_r (-0.0149536 -0.00919369 0.060922)
    Millard2012EquilibriumMuscle grac_r: max_isometric_force=386.0151 optimal_fiber_length=0.2594763
        tendon_slack_length=0.1959328 pennation_angle_at_optimal=0.1720016 ignore_tendon_compliance=true
      PathPoint P1: socket_parent_frame_connectee_name=../../../pelvis (-0.0596417 -0.133826 0.0312699)
      PathPoint P2: socket_parent_frame_connectee_name=../../../tibia_r (-0.0226125 -0.0583727 -0.0363494)
      PathPoint P3: socket_parent_frame_connectee_name=../../../tibia_r (0.00218514 -0.085466 -0.0193103)
      PathWrap: wrap_object=GR_at_condyles_r method=hybrid
    Millard2012EquilibriumMuscle iliacus_r: max_isometric_force=1445.815 optimal_fiber_length=0.1176768
        tendon_slack_length=0.1061086 pennation_angle_at_optimal=0.279914 ignore_tendon_compliance=true
      PathPoint P1: socket_parent_frame_connectee_name=../../../pelvis (-0.0761893 0.0319767 0.107331)
      PathPoint P2: socket_parent_frame_connectee_name=../../../pelvis (-0.0170009 -0.0576409 0.0962542)
      PathPoint P3: socket_parent_frame_connectee_name=../../../femur_r (-0.00254765 -0.0625835 0.0153967)
      PathPoint P4: socket_parent_frame_connectee_name=../../../femur_r (-0.0135136 -0.0705588 0.0217104)
      PathWrap: wrap_object=IL_at_brim_r method=hybrid range=(2 3)
    Millard2012EquilibriumMuscle per_brev_r: max_isometric_force=656.0824 optimal_fiber_length=0.05637207
        tendon_slack_length=0.1831813 pennation_angle_at_optimal=0.2052361
      PathPoint perbrev_r-P1: socket_parent_frame_connectee_name=../../../tibia_r (-0.0298308 -0.31083 0.0308129)
      PathPoint perbrev_r-P2: socket_parent_frame_connectee_name=../../../tibia_r (-0.0416159 -0.477907 0.0305674)
      PathPoint perbrev_r-P3: socket_parent_frame_connectee_name=../../../tibia_r (-0.0349868 -0.491534 0.031304)
      PathPoint perbrev_r-P4: socket_parent_frame_connectee_name=../../../calcn_r (0.055681 0.0376652 0.0312814)
      PathPoint perbrev_r-P5: socket_parent_frame_connectee_name=../../../calcn_r (0.080034 0.0305506 0.0460494)
    Millard2012EquilibriumMuscle per_long_r: max_isometric_force=1402.263 optimal_fiber_length=0.06315598
        tendon_slack_length=0.4130262 pennation_angle_at_optimal=0.2479525
      PathPoint perlong_r-P1: socket_parent_frame_connectee_name=../../../tibia_r (-0.0245521 -0.16855 0.0346185)
      PathPoint perlong_r-P2: socket_parent_frame_connectee_name=../../../tibia_r (-0.0389151 -0.478767 0.0290943)
      PathPoint perlong_r-P3: socket_parent_frame_connectee_name=../../../tibia_r (-0.0333909 -0.492761 0.0294626)
      PathPoint perlong_r-P4: socket_parent_frame_connectee_name=../../../calcn_r (0.0517798 0.0320851 0.0296703)
      PathPoint perlong_r-P5: socket_parent_frame_connectee_name=../../../calcn_r (0.0805069 0.0147871 0.0381284)
      PathPoint perlong_r-P6: socket_parent_frame_connectee_name=../../../calcn_r (0.100722 0.00962554 0.0158421)
      PathPoint perlong_r-P7: socket_parent_frame_connectee_name=../../../calcn_r (0.142217 0.0118576 -0.0247029)
    Millard2012EquilibriumMuscle peri_r: max_isometric_force=1371.921 optimal_fiber_length=0.03050369
        tendon_slack_length=0.1348102 pennation_angle_at_optimal=0.1745329
      PathPoint piri_r-P1: socket_parent_frame_connectee_name=../../../pelvis (-0.128212 -0.00675754 0.017201)
      PathPoint piri_r-P2: socket_parent_frame_connectee_name=../../../pelvis (-0.128477 -0.0317284 0.0775636)
      PathPoint piri_r-P3: socket_parent_frame_connectee_name=../../../femur_r (-0.0163936 -0.00398762 0.0484053)
    Millard2012EquilibriumMuscle psoas_r: max_isometric_force=2039.47 optimal_fiber_length=0.1278257
        tendon_slack_length=0.1088466 pennation_angle_at_optimal=0.2155251 ignore_tendon_compliance=true
      PathPoint P1: socket_parent_frame_connectee_name=../../../pelvis (-0.0763152 0.0641604 0.0496549)
      PathPoint P2: socket_parent_frame_connectee_name=../../../pelvis (-0.0258162 -0.0676789 0.0835221)
      PathPoint P3: socket_parent_frame_connectee_name=../../../femur_r (-0.0146213 -0.0517283 0.0050953)
      PathPoint P4: socket_parent_frame_connectee_name=../../../femur_r (-0.0260303 -0.0580421 0.00974753)
      PathWrap: wrap_object=PS_at_brim_r method=hybrid range=(2 3)
    Millard2012EquilibriumMuscle rect_fem_r: max_isometric_force=3078.47 optimal_fiber_length=0.0844611
        tendon_slack_length=0.4990812 pennation_angle_at_optimal=0.2170149
      PathPoint recfem_r-P1: socket_parent_frame_connectee_name=../../../pelvis (-0.0302239 -0.040152 0.11879)
      PathPoint recfem_r-P2: socket_parent_frame_connectee_name=../../../patella_r (0.0110767 0.054276 0.000775371)
      PathPoint recfem_r-P3: socket_parent_frame_connectee_name=../../../patella_r (0.0134028 0.0484053 -0.00110767)
      PathPoint recfem_r-P4: socket_parent_frame_connectee_name=../../../patella_r (0.00553837 0.00273595 3.32302e-5)
      PathPoint recfem_r-P5: socket_parent_frame_connectee_name=../../../tibia_r (0.04002 -0.0774865 -0.000576975)
      PathWrap: wrap_object=KnExt_at_fem_r method=hybrid
    Millard2012EquilibriumMuscle sar_r: max_isometric_force=346.8096 optimal_fiber_length=0.4529955
        tendon_slack_length=0.139383 pennation_angle_at_optimal=0.02613542 ignore_tendon_compliance=true
      PathPoint sart_r-P1: socket_parent_frame_connectee_name=../../../pelvis (-0.0245569 -0.0161436 0.13445)
      PathPoint sart_r-P2: socket_parent_frame_connectee_name=../../../femur_r (-0.00332302 -0.395218 -0.0466331)
      PathPoint sart_r-P3: socket_parent_frame_connectee_name=../../../tibia_r (-0.0308129 -0.049227 -0.0448076)
      PathPoint sart_r-P4: socket_parent_frame_connectee_name=../../../tibia_r (-0.0195189 -0.0735336 -0.0324088)
      PathPoint sart_r-P5: socket_parent_frame_connectee_name=../../../tibia_r (0.0166955 -0.0994362 -0.00319178)
    Millard2012EquilibriumMuscle semimem_r: max_isometric_force=3056.597 optimal_fiber_length=0.07765851
        tendon_slack_length=0.391203 pennation_angle_at_optimal=0.2545615
      PathPoint P1: socket_parent_frame_connectee_name=../../../pelvis (-0.124296 -0.117972 0.0781747)
      PathPoint P2: socket_parent_frame_connectee_name=../../../tibia_r (-0.0356006 -0.0511912 -0.0240611)
      PathWrap: wrap_object=SM_at_condyles_r method=hybrid
    Millard2012EquilibriumMuscle semiten_r: max_isometric_force=810.7946 optimal_fiber_length=0.2199943
        tendon_slack_length=0.2817739 pennation_angle_at_optimal=0.241295
      PathPoint P1: socket_parent_frame_connectee_name=../../../pelvis (-0.130718 -0.129666 0.06557)
      PathPoint P2: socket_parent_frame_connectee_name=../../../tibia_r (-0.0383013 -0.0623624 -0.0281122)
      PathPoint P3: socket_parent_frame_connectee_name=../../../tibia_r (0.00233245 -0.094894 -0.014363)
      PathWrap: wrap_object=ST_at_condyles_r method=hybrid
    Millard2012EquilibriumMuscle soleus_r: max_isometric_force=7857.204 optimal_fiber_length=0.05422202
        tendon_slack_length=0.3410514 pennation_angle_at_optimal=0.3814289
      PathPoint P1: socket_parent_frame_connectee_name=../../../tibia_r (-0.00932981 -0.112449 0.0120305)
      PathPoint P2: socket_parent_frame_connectee_name=../../../calcn_r (0.00520162 0.0432452 -0.00711551)
    Millard2012EquilibriumMuscle tfl_r: max_isometric_force=582.9847 optimal_fiber_length=0.1047339
        tendon_slack_length=0.4955534 pennation_angle_at_optimal=0.05235988
      PathPoint P1: socket_parent_frame_connectee_name=../../../pelvis (-0.0391651 0.0221457 0.158005)
      PathPoint P2: socket_parent_frame_connectee_name=../../../femur_r (0.0325656 -0.110214 0.0661281)
      PathPoint P3: socket_parent_frame_connectee_name=../../../femur_r (0.0118521 -0.448608 0.0358886)
      PathPoint P4: socket_parent_frame_connectee_name=../../../tibia_r (0.0132582 -0.0503319 0.0424752)
    Millard2012EquilibriumMuscle tib_ant_r: max_isometric_force=1552.867 optimal_fiber_length=0.08438241
        tendon_slack_length=0.2970817 pennation_angle_at_optimal=0.1951828
      PathPoint tibant_r-P1: socket_parent_frame_connectee_name=../../../tibia_r (0.0189051 -0.161062 0.0198872)
      PathPoint tibant_r-P2: socket_parent_frame_connectee_name=../../../tibia_r (0.0308129 -0.233982 0.0157134)
      PathPoint tibant_r-P3: socket_parent_frame_connectee_name=../../../tibia_r (0.0286032 -0.449181 -0.0162044)
      PathPoint tibant_r-P4: socket_parent_frame_connectee_name=../../../calcn_r (0.137843 0.0248311 -0.0409477)
    Millard2012EquilibriumMuscle tib_post_r: max_isometric_force=2193.859 optimal_fiber_length=0.04659386
        tendon_slack_length=0.3461007 pennation_angle_at_optimal=0.2264891
      PathPoint tibpost_r-P1: socket_parent_frame_connectee_name=../../../tibia_r (-0.00503319 -0.16008 0.0126444)
      PathPoint tibpost_r-P2: socket_parent_frame_connectee_name=../../../tibia_r (-0.0201328 -0.44869 -0.0214831)
      PathPoint tibpost_r-P3: socket_parent_frame_connectee_name=../../../calcn_r (0.0492972 0.0465932 -0.0383969)
      PathPoint tibpost_r-P4: socket_parent_frame_connectee_name=../../../calcn_r (0.0912648 0.0221806 -0.0377256)
    Millard2012EquilibriumMuscle vas_int_r: max_isometric_force=2352.56 optimal_fiber_length=0.1119808
        tendon_slack_length=0.2280333 pennation_angle_at_optimal=0.06309973
      PathPoint vasint_r-P1: socket_parent_frame_connectee_name=../../../femur_r (0.0321225 -0.213116 0.0343379)
      PathPoint vasint_r-P2: socket_parent_frame_connectee_name=../../../femur_r (0.0371071 -0.230839 0.0315687)
      PathPoint vasint_r-P3: socket_parent_frame_connectee_name=../../../patella_r (0.00642451 0.0531683 -0.000664604)
      PathPoint vasint_r-P4: socket_parent_frame_connectee_name=../../../patella_r (0.00553837 0.00273595 -0.000431993)
      PathPoint vasint_r-P5: socket_parent_frame_connectee_name=../../../tibia_r (0.0399832 -0.0775848 0.000527871)
      PathWrap: wrap_object=KnExt_at_fem_r method=hybrid
    Millard2012EquilibriumMuscle vas_lat_r: max_isometric_force=7142.66 optimal_fiber_length=0.1119929
        tendon_slack_length=0.248549 pennation_angle_at_optimal=0.2528673
      PathPoint vaslat_r-P1: socket_parent_frame_connectee_name=../../../femur_r (0.00531683 -0.205363 0.0386578)
      PathPoint vaslat_r-P2: socket_parent_frame_connectee_name=../../../femur_r (0.0297964 -0.286998 0.0453038)
      PathPoint vaslat_r-P3: socket_parent_frame_connectee_name=../../../patella_r (0.011409 0.0468546 0.0156182)
      PathPoint vaslat_r-P4: socket_parent_frame_connectee_name=../../../patella_r (0.00553837 0.00273595 0.00811925)
      PathPoint vaslat_r-P5: socket_parent_frame_connectee_name=../../../tibia_r (0.0399463 -0.0778057 0.00627307)
      PathWrap: wrap_object=KnExt_at_fem_r method=hybrid
    Millard2012EquilibriumMuscle vas_med_r: max_isometric_force=3805.574 optimal_fiber_length=0.1092458
        tendon_slack_length=0.2256064 pennation_angle_at_optimal=0.4222225
      PathPoint vasmed_r-P1: socket_parent_frame_connectee_name=../../../femur_r (0.0155074 -0.232501 0.0208243)
      PathPoint vasmed_r-P2: socket_parent_frame_connectee_name=../../../femur_r (0.0394332 -0.306715 0.000996906)
      PathPoint vasmed_r-P3: socket_parent_frame_connectee_name=../../../patella_r (0.00697834 0.0492915 -0.0188304)
      PathPoint vasmed_r-P4: socket_parent_frame_connectee_name=../../../patella_r (0.00553837 0.00273595 -0.00941522)
      PathPoint vasmed_r-P5: socket_parent_frame_connectee_name=../../../tibia_r (0.0391607 -0.078039 -0.00832317)
      PathWrap: wrap_object=KnExt_at_fem_r method=hybrid
    Millard2012EquilibriumMuscle add_brev_l: max_isometric_force=834.9702 optimal_fiber_length=0.1207807
        tendon_slack_length=0.0415297 pennation_angle_at_optimal=0.1147809 ignore_tendon_compliance=true
      PathPoint addbrev_l-P1: socket_parent_frame_connectee_name=../../../pelvis (-0.0240532 -0.0972754 -0.0196073)
      PathPoint addbrev_l-P2: socket_parent_frame_connectee_name=../../../femur_l (-0.00221535 -0.130705 -0.0275811)
      PathWrap: wrap_object=AB_at_femshaft_l method=hybrid
    Millard2012EquilibriumMuscle add_long_l: max_isometric_force=1269.858 optimal_fiber_length=0.1220977
        tendon_slack_length=0.1487283 pennation_angle_at_optimal=0.1377704
      PathPoint addlong_l-P1: socket_parent_frame_connectee_name=../../../pelvis (-0.0095457 -0.0919977 -0.0240381)
      PathPoint addlong_l-P2: socket_parent_frame_connectee_name=../../../femur_l (0.0124724 -0.265144 -0.0175345)
      PathWrap: wrap_object=AL_at_femshaft_l method=hybrid
    Millard2012EquilibriumMuscle add_mag3_l: max_isometric_force=824.8176 optimal_fiber_length=0.2005651
        tendon_slack_length=0.09890249 pennation_angle_at_optimal=0.194705 ignore_tendon_compliance=true
      PathPoint addmagDist_l-P1: socket_parent_frame_connectee_name=../../../pelvis (-0.0932406 -0.132119 -0.050699)
      PathPoint addmagDist_l-P2: socket_parent_frame_connectee_name=../../../femur_l (0.0124613 -0.290764 -0.0213781)
      PathWrap: wrap_object=AMdist_at_femshaft_l method=hybrid
    Millard2012EquilibriumMuscle add_mag4_l: max_isometric_force=833.2101 optimal_fiber_length=0.1750154
        tendon_slack_length=0.242403 pennation_angle_at_optimal=0.1680443
      PathPoint addmagIsch_l-P1: socket_parent_frame_connectee_name=../../../pelvis (-0.112861 -0.134281 -0.0531053)
      PathPoint addmagIsch_l-P2: socket_parent_frame_connectee_name=../../../femur_l (0.00532791 -0.429744 0.0362542)
      PathWrap: wrap_object=AMisch_at_condyles_l method=hybrid
    Millard2012EquilibriumMuscle add_mag2_l: max_isometric_force=807.051 optimal_fiber_length=0.1592878
        tendon_slack_length=0.05393773 pennation_angle_at_optimal=0.2073076 ignore_tendon_compliance=true
      PathPoint addmagMid_l-P1: socket_parent_frame_connectee_name=../../../pelvis (-0.0663162 -0.124958 -0.0363372)
      PathPoint addmagMid_l-P2: socket_parent_frame_connectee_name=../../../femur_l (0.00268057 -0.179886 -0.0323662)
      PathWrap: wrap_object=AMmid_at_femshaft_l method=hybrid
    Millard2012EquilibriumMuscle add_mag1_l: max_isometric_force=776.6252 optimal_fiber_length=0.1269411
        tendon_slack_length=0.04847333 pennation_angle_at_optimal=0.3114833 ignore_tendon_compliance=true
      PathPoint addmagProx_l-P1: socket_parent_frame_connectee_name=../../../pelvis (-0.039014 -0.111298 -0.0173792)
      PathPoint addmagProx_l-P2: socket_parent_frame_connectee_name=../../../femur_l (-0.0169142 -0.0873511 -0.0354677)
      PathWrap: wrap_object=AMprox_at_femshaft_l method=hybrid
    Millard2012EquilibriumMuscle bifemlh_l: max_isometric_force=1817.041 optimal_fiber_length=0.1102481
        tendon_slack_length=0.3673732 pennation_angle_at_optimal=0.1759182
      PathPoint bflh_l-P1: socket_parent_frame_connectee_name=../../../pelvis (-0.13097 -0.12325 -0.0746097)
      PathPoint bflh_l-P2: socket_parent_frame_connectee_name=../../../tibia_l (-0.0413703 -0.0429662 -0.0310585)
      PathPoint bflh_l-P3: socket_parent_frame_connectee_name=../../../tibia_l (-0.0352323 -0.0558561 -0.0371965)
    Millard2012EquilibriumMuscle bifemsh_l: max_isometric_force=771.2272 optimal_fiber_length=0.124537
        tendon_slack_length=0.1194756 pennation_angle_at_optimal=0.2642232 ignore_tendon_compliance=true
      PathPoint bfsh_l-P1: socket_parent_frame_connectee_name=../../../femur_l (0.00553837 -0.23383 -0.0259196)
      PathPoint bfsh_l-P2: socket_parent_frame_connectee_name=../../../tibia_l (-0.036951 -0.0514367 -0.0390379)
      PathWrap: wrap_object=BF_at_gastroc_l method=hybrid
    Millard2012EquilibriumMuscle ext_dig_l: max_isometric_force=772.2576 optimal_fiber_length=0.08464625
        tendon_slack_length=0.4505614 pennation_angle_at_optimal=0.2182582
      PathPoint edl_l-P1: socket_parent_frame_connectee_name=../../../tibia_l (-0.0196417 -0.142034 -0.0251659)
      PathPoint edl_l-P2: socket_parent_frame_connectee_name=../../../tibia_l (0.0201328 -0.46158 -0.0137492)
      PathPoint edl_l-P3: socket_parent_frame_connectee_name=../../../calcn_l (0.108643 0.0502202 -0.00107404)
      PathPoint edl_l-P4: socket_parent_frame_connectee_name=../../../calcn_l (0.191041 0.00767253 -0.0174531)
      PathPoint edl_l-P5: socket_parent_frame_connectee_name=../../../toes_l (0.000354656 0.00655653 -0.020541)
      PathPoint edl_l-P6: socket_parent_frame_connectee_name=../../../toes_l (0.0523709 -0.000558002 -0.0335637)
    Millard2012EquilibriumMuscle ext_hal_l: max_isometric_force=366.6074 optimal_fiber_length=0.09116454
        tendon_slack_length=0.3982906 pennation_angle_at_optimal=0.1972681
      PathPoint ehl_l-P1: socket_parent_frame_connectee_name=../../../tibia_l (-0.0171865 -0.190279 -0.0232018)
      PathPoint ehl_l-P2: socket_parent_frame_connectee_name=../../../tibia_l (0.00871601 -0.357111 -0.0201328)
      PathPoint ehl_l-P3: socket_parent_frame_connectee_name=../../../tibia_l (0.0245521 -0.453355 0.0034373)
      PathPoint ehl_l-P4: socket_parent_frame_connectee_name=../../../calcn_l (0.114672 0.0542657 0.0283278)
      PathPoint ehl_l-P5: socket_parent_frame_connectee_name=../../../calcn_l (0.152857 0.0431057 0.0345035)
      PathPoint ehl_l-P6: socket_parent_frame_connectee_name=../../../calcn_l (0.204991 0.0193906 0.0375914)
      PathPoint ehl_l-P7: socket_parent_frame_connectee_name=../../../toes_l (0.0352292 0.00571952 0.0328924)
      PathPoint ehl_l-P8: socket_parent_frame_connectee_name=../../../toes_l (0.0665571 0.00474302 0.0249714)
    Millard2012EquilibriumMuscle flex_dig_l: max_isometric_force=539.7017 optimal_fiber_length=0.05465928
        tendon_slack_length=0.464203 pennation_angle_at_optimal=0.2248391
      PathPoint fdl_l-P1: socket_parent_frame_connectee_name=../../../tibia_l (-0.0028235 -0.224898 0.00220969)
      PathPoint fdl_l-P2: socket_parent_frame_connectee_name=../../../tibia_l (-0.0216059 -0.447463 0.0152223)
      PathPoint fdl_l-P3: socket_parent_frame_connectee_name=../../../calcn_l (0.0515433 0.0439427 0.0375914)
      PathPoint fdl_l-P4: socket_parent_frame_connectee_name=../../../calcn_l (0.0836988 0.0245521 0.035309)
      PathPoint fdl_l-P5: socket_parent_frame_connectee_name=../../../calcn_l (0.196007 -0.0112995 -0.0155736)
      PathPoint fdl_l-P6: socket_parent_frame_connectee_name=../../../toes_l (-0.00224615 -0.010881 -0.0197355)
      PathPoint fdl_l-P7: socket_parent_frame_connectee_name=../../../toes_l (0.0336923 -0.00990454 -0.0288648)
      PathPoint fdl_l-P8: socket_parent_frame_connectee_name=../../../toes_l (0.0521344 -0.00837004 -0.0324897)
    Millard2012EquilibriumMuscle flex_hal_l: max_isometric_force=1165.442 optimal_fiber_length=0.06416376
        tendon_slack_length=0.4314187 pennation_angle_at_optimal=0.2580255
      PathPoint fhl_l-P1: socket_parent_frame_connectee_name=../../../tibia_l (-0.0380558 -0.265531 -0.0245521)
      PathPoint fhl_l-P2: socket_parent_frame_connectee_name=../../../tibia_l (-0.0297081 -0.450654 0.00932981)
      PathPoint fhl_l-P3: socket_parent_frame_connectee_name=../../../calcn_l (0.0442138 0.0385022 0.0323554)
      PathPoint fhl_l-P4: socket_parent_frame_connectee_name=../../../calcn_l (0.122711 0.00948604 0.0343693)
      PathPoint fhl_l-P5: socket_parent_frame_connectee_name=../../../calcn_l (0.204045 -0.00739353 0.0361146)
      PathPoint fhl_l-P6: socket_parent_frame_connectee_name=../../../toes_l (0.0183239 -0.00892804 0.0355775)
      PathPoint fhl_l-P7: socket_parent_frame_connectee_name=../../../toes_l (0.0664389 -0.0142291 0.0243001)
    Millard2012EquilibriumMuscle lat_gas_l: max_isometric_force=2009.247 optimal_fiber_length=0.07204463
        tendon_slack_length=0.4607795 pennation_angle_at_optimal=0.2102268
      PathPoint gaslat_l-P1: socket_parent_frame_connectee_name=../../../femur_l (-0.00332302 -0.422467 -0.0306826)
      PathPoint gaslat_l-P2: socket_parent_frame_connectee_name=../../../calcn_l (0.00520162 0.0432452 0.00711551)
      PathWrap pathwrap0: wrap_object=GasLat_at_shank_l method=hybrid
      PathWrap pathwrap1: wrap_object=Gastroc_at_condyles_l method=hybrid
    Millard2012EquilibriumMuscle med_gas_l: max_isometric_force=3982.895 optimal_fiber_length=0.06235364
        tendon_slack_length=0.4874787 pennation_angle_at_optimal=0.1656816
      PathPoint gasmed_l-P1: socket_parent_frame_connectee_name=../../../femur_l (0.00886139 -0.419587 0.0230396)
      PathPoint gasmed_l-P2: socket_parent_frame_connectee_name=../../../calcn_l (0.00520162 0.0432452 0.00711551)
      PathWrap pathwrap0: wrap_object=GasMed_at_shank_l method=hybrid
      PathWrap pathwrap1: wrap_object=Gastroc_at_condyles_l method=hybrid
    Millard2012EquilibriumMuscle glut_max1_l: max_isometric_force=1407.142 optimal_fiber_length=0.1606348
        tendon_slack_length=0.05337107 pennation_angle_at_optimal=0.3540118 ignore_tendon_compliance=true
      PathPoint glmax1_l-P1: socket_parent_frame_connectee_name=../../../pelvis (-0.155023 0.0357022 -0.0716814)
      PathPoint glmax1_l-P2: socket_parent_frame_connectee_name=../../../pelvis (-0.158297 -0.0250433 -0.0991826)
      PathPoint glmax1_l-P3: socket_parent_frame_connectee_name=../../../femur_l (-0.0491807 -0.0361102 -0.0334517)
      PathPoint glmax1_l-P4: socket_parent_frame_connectee_name=../../../femur_l (-0.0306826 -0.0626943 -0.0520607)
      PathWrap: wrap_object=Gmax1_at_pelvis_l method=hybrid
    Millard2012EquilibriumMuscle glut_max2_l: max_isometric_force=1964.625 optimal_fiber_length=0.1756225
        tendon_slack_length=0.07593955 pennation_angle_at_optimal=0.3673821 ignore_tendon_compliance=true
      PathPoint glmax2_l-P1: socket_parent_frame_connectee_name=../../../pelvis (-0.165853 0.00900315 -0.058822)
      PathPoint glmax2_l-P2: socket_parent_frame_connectee_name=../../../pelvis (-0.169254 -0.0630221 -0.103511)
      PathPoint glmax2_l-P3: socket_parent_frame_connectee_name=../../../femur_l (-0.0498453 -0.0646881 -0.0279134)
      PathPoint glmax2_l-P4: socket_parent_frame_connectee_name=../../../femur_l (-0.0172797 -0.11254 -0.0464115)
      PathWrap: wrap_object=Gmax2_at_pelvis_l method=hybrid
    Millard2012EquilibriumMuscle glut_max3_l: max_isometric_force=1291.709 optimal_fiber_length=0.1915173
        tendon_slack_length=0.07995172 pennation_angle_at_optimal=0.3824161 ignore_tendon_compliance=true
      PathPoint glmax3_l-P1: socket_parent_frame_connectee_name=../../../pelvis (-0.163713 -0.0543294 -0.0114588)
      PathPoint glmax3_l-P2: socket_parent_frame_connectee_name=../../../pelvis (-0.160312 -0.130701 -0.0553844)
      PathPoint glmax3_l-P3: socket_parent_frame_connectee_name=../../../femur_l (-0.0311256 -0.124613 -0.0104121)
      PathPoint glmax3_l-P4: socket_parent_frame_connectee_name=../../../femur_l (-0.00664604 -0.157179 -0.0455254)
      PathWrap: wrap_object=Gmax3_at_pelvis_l method=hybrid
    Millard2012EquilibriumMuscle glut_med1_l: max_isometric_force=1632.322 optimal_fiber_length=0.07643342
        tendon_slack_length=0.05844208 pennation_angle_at_optimal=0.3165559 ignore_tendon_compliance=true
      PathPoint glmed1_l-P1: socket_parent_frame_connectee_name=../../../pelvis (-0.0560401 0.0253537 -0.149219)
      PathPoint glmed1_l-P2: socket_parent_frame_connectee_name=../../../femur_l (-0.0241473 -0.0129598 -0.0614759)
    Millard2012EquilibriumMuscle glut_med2_l: max_isometric_force=1126.099 optimal_fiber_length=0.07752118
        tendon_slack_length=0.06928993 pennation_angle_at_optimal=0.3165559 ignore_tendon_compliance=true
      PathPoint glmed2_l-P1: socket_parent_frame_connectee_name=../../../pelvis (-0.107043 0.0327011 -0.0859412)
      PathPoint glmed2_l-P2: socket_parent_frame_connectee_name=../../../femur_l (-0.028578 -0.00642451 -0.0583744)
    Millard2012EquilibriumMuscle glut_med3_l: max_isometric_force=1209.674 optimal_fiber_length=0.08217372
        tendon_slack_length=0.05091713 pennation_angle_at_optimal=0.3165559 ignore_tendon_compliance=true
      PathPoint glmed3_l-P1: socket_parent_frame_connectee_name=../../../pelvis (-0.145075 -0.00755437 -0.0669705)
      PathPoint glmed3_l-P2: socket_parent_frame_connectee_name=../../../femur_l (-0.0342271 -0.00520607 -0.0573775)
    Millard2012EquilibriumMuscle glut_min1_l: max_isometric_force=561.5681 optimal_fiber_length=0.07079329
        tendon_slack_length=0.01680069 pennation_angle_at_optimal=0.1745329 ignore_tendon_compliance=true
      PathPoint glmin1_l-P1: socket_parent_frame_connectee_name=../../../pelvis (-0.0584328 -0.0154192 -0.132668)
      PathPoint glmin1_l-P2: socket_parent_frame_connectee_name=../../../femur_l (-0.00797525 -0.0115198 -0.0620297)
    Millard2012EquilibriumMuscle glut_min2_l: max_isometric_force=593.7129 optimal_fiber_length=0.05820644
        tendon_slack_length=0.02712738 pennation_angle_at_optimal=0 ignore_tendon_compliance=true
      PathPoint glmin2_l-P1: socket_parent_frame_connectee_name=../../../pelvis (-0.0775746 -0.0146948 -0.123628)
      PathPoint glmin2_l-P2: socket_parent_frame_connectee_name=../../../femur_l (-0.0106337 -0.0115198 -0.0620297)
    Millard2012EquilibriumMuscle glut_min3_l: max_isometric_force=653.4005 optimal_fiber_length=0.04061183
        tendon_slack_length=0.05436909 pennation_angle_at_optimal=0.01745329
      PathPoint glmin3_l-P1: socket_parent_frame_connectee_name=../../../pelvis (-0.0993609 -0.0160401 -0.101602)
      PathPoint glmin3_l-P2: socket_parent_frame_connectee_name=../../../femur_l (-0.0149536 -0.00919369 -0.060922)
    Millard2012EquilibriumMuscle grac_l: max_isometric_force=386.0151 optimal_fiber_length=0.2594763
        tendon_slack_length=0.1959328 pennation_angle_at_optimal=0.1720016 ignore_tendon_compliance=true
      PathPoint P1: socket_parent_frame_connectee_name=../../../pelvis (-0.0596417 -0.133826 -0.0312699)
      PathPoint P2: socket_parent_frame_connectee_name=../../../tibia_l (-0.0226125 -0.0583727 0.0363494)
      PathPoint P3: socket_parent_frame_connectee_name=../../../tibia_l (0.00218514 -0.085466 0.0193103)
      PathWrap: wrap_object=GR_at_condyles_l method=hybrid
    Millard2012EquilibriumMuscle iliacus_l: max_isometric_force=1445.815 optimal_fiber_length=0.1176768
        tendon_slack_length=0.1061086 pennation_angle_at_optimal=0.279914 ignore_tendon_compliance=true
      PathPoint P1: socket_parent_frame_connectee_name=../../../pelvis (-0.0761893 0.0319767 -0.107331)
      PathPoint P2: socket_parent_frame_connectee_name=../../../pelvis (-0.0170009 -0.0576409 -0.0962542)
      PathPoint P3: socket_parent_frame_connectee_name=../../../femur_l (-0.00254765 -0.0625835 -0.0153967)
      PathPoint P4: socket_parent_frame_connectee_name=../../../femur_l (-0.0135136 -0.0705588 -0.0217104)
      PathWrap: wrap_object=IL_at_brim_l method=hybrid range=(2 3)
    Millard2012EquilibriumMuscle per_brev_l: max_isometric_force=656.0824 optimal_fiber_length=0.05637207
        tendon_slack_length=0.1831813 pennation_angle_at_optimal=0.2052361
      PathPoint perbrev_l-P1: socket_parent_frame_connectee_name=../../../tibia_l (-0.0298308 -0.31083 -0.0308129)
      PathPoint perbrev_l-P2: socket_parent_frame_connectee_name=../../../tibia_l (-0.0416159 -0.477907 -0.0305674)
      PathPoint perbrev_l-P3: socket_parent_frame_connectee_name=../../../tibia_l (-0.0349868 -0.491534 -0.031304)
      PathPoint perbrev_l-P4: socket_parent_frame_connectee_name=../../../calcn_l (0.055681 0.0376652 -0.0312814)
      PathPoint perbrev_l-P5: socket_parent_frame_connectee_name=../../../calcn_l (0.080034 0.0305506 -0.0460494)
    Millard2012EquilibriumMuscle per_long_l: max_isometric_force=1402.263 optimal_fiber_length=0.06315598
        tendon_slack_length=0.4130262 pennation_angle_at_optimal=0.2479525
      PathPoint perlong_l-P1: socket_parent_frame_connectee_name=../../../tibia_l (-0.0245521 -0.16855 -0.0346185)
      PathPoint perlong_l-P2: socket_parent_frame_connectee_name=../../../tibia_l (-0.0389151 -0.478767 -0.0290943)
      PathPoint perlong_l-P3: socket_parent_frame_connectee_name=../../../tibia_l (-0.0333909 -0.492761 -0.0294626)
      PathPoint perlong_l-P4: socket_parent_frame_connectee_name=../../../calcn_l (0.0517798 0.0320851 -0.0296703)
      PathPoint perlong_l-P5: socket_parent_frame_connectee_name=../../../calcn_l (0.0805069 0.0147871 -0.0381284)
      PathPoint perlong_l-P6: socket_parent_frame_connectee_name=../../../calcn_l (0.100722 0.00962554 -0.0158421)
      PathPoint perlong_l-P7: socket_parent_frame_connectee_name=../../../calcn_l (0.142217 0.0118576 0.0247029)
    Millard2012EquilibriumMuscle peri_l: max_isometric_force=1371.921 optimal_fiber_length=0.03050369
        tendon_slack_length=0.1348102 pennation_angle_at_optimal=0.1745329
      PathPoint piri_l-P1: socket_parent_frame_connectee_name=../../../pelvis (-0.128212 -0.00675754 -0.017201)
      PathPoint piri_l-P2: socket_parent_frame_connectee_name=../../../pelvis (-0.128477 -0.0317284 -0.0775636)
      PathPoint piri_l-P3: socket_parent_frame_connectee_name=../../../femur_l (-0.0163936 -0.00398762 -0.0484053)
    Millard2012EquilibriumMuscle psoas_l: max_isometric_force=2039.47 optimal_fiber_length=0.1278257
        tendon_slack_length=0.1088466 pennation_angle_at_optimal=0.2155251 ignore_tendon_compliance=true
      PathPoint P1: socket_parent_frame_connectee_name=../../../pelvis (-0.0763152 0.0641604 -0.0496549)
      PathPoint P2: socket_parent_frame_connectee_name=../../../pelvis (-0.0258162 -0.0676789 -0.0835221)
      PathPoint P3: socket_parent_frame_connectee_name=../../../femur_l (-0.0146213 -0.0517283 -0.0050953)
      PathPoint P4: socket_parent_frame_connectee_name=../../../femur_l (-0.0260303 -0.0580421 -0.00974753)
      PathWrap: wrap_object=PS_at_brim_l method=hybrid range=(2 3)
    Millard2012EquilibriumMuscle rect_fem_l: max_isometric_force=3078.47 optimal_fiber_length=0.0844611
        tendon_slack_length=0.4990812 pennation_angle_at_optimal=0.2170149
      PathPoint recfem_l-P1: socket_parent_frame_connectee_name=../../../pelvis (-0.0302239 -0.040152 -0.11879)
      PathPoint recfem_l-P2: socket_parent_frame_connectee_name=../../../patella_l (0.0110767 0.054276 -0.000775371)
      PathPoint recfem_l-P3: socket_parent_frame_connectee_name=../../../patella_l (0.0134028 0.0484053 0.00110767)
      PathPoint recfem_l-P4: socket_parent_frame_connectee_name=../../../patella_l (0.00553837 0.00273595 -3.32302e-5)
      PathPoint recfem_l-P5: socket_parent_frame_connectee_name=../../../tibia_l (0.04002 -0.0774865 0.000576975)
      PathWrap: wrap_object=KnExt_at_fem_l method=hybrid
    Millard2012EquilibriumMuscle sar_l: max_isometric_force=346.8096 optimal_fiber_length=0.4529955
        tendon_slack_length=0.139383 pennation_angle_at_optimal=0.02613542 ignore_tendon_compliance=true
      PathPoint sart_l-P1: socket_parent_frame_connectee_name=../../../pelvis (-0.0245569 -0.0161436 -0.13445)
      PathPoint sart_l-P2: socket_parent_frame_connectee_name=../../../femur_l (-0.00332302 -0.395218 0.0466331)
      PathPoint sart_l-P3: socket_parent_frame_connectee_name=../../../tibia_l (-0.0308129 -0.049227 0.0448076)
      PathPoint sart_l-P4: socket_parent_frame_connectee_name=../../../tibia_l (-0.0195189 -0.0735336 0.0324088)
      PathPoint sart_l-P5: socket_parent_frame_connectee_name=../../../tibia_l (0.0166955 -0.0994362 0.00319178)
    Millard2012EquilibriumMuscle semimem_l: max_isometric_force=3056.597 optimal_fiber_length=0.07765851
        tendon_slack_length=0.391203 pennation_angle_at_optimal=0.2545615
      PathPoint P1: socket_parent_frame_connectee_name=../../../pelvis (-0.124296 -0.117972 -0.0781747)
      PathPoint P2: socket_parent_frame_connectee_name=../../../tibia_l (-0.0356006 -0.0511912 0.0240611)
      PathWrap: wrap_object=SM_at_condyles_l method=hybrid
    Millard2012EquilibriumMuscle semiten_l: max_isometric_force=810.7946 optimal_fiber_length=0.2199943
        tendon_slack_length=0.2817739 pennation_angle_at_optimal=0.241295
      PathPoint P1: socket_parent_frame_connectee_name=../../../pelvis (-0.130718 -0.129666 -0.06557)
      PathPoint P2: socket_parent_frame_connectee_name=../../../tibia_l (-0.0383013 -0.0623624 0.0281122)
      PathPoint P3: socket_parent_frame_connectee_name=../../../tibia_l (0.00233245 -0.094894 0.014363)
      PathWrap: wrap_object=ST_at_condyles_l method=hybrid
    Millard2012EquilibriumMuscle soleus_l: max_isometric_force=7857.204 optimal_fiber_length=0.05422202
        tendon_slack_length=0.3410514 pennation_angle_at_optimal=0.3814289
      PathPoint P1: socket_parent_frame_connectee_name=../../../tibia_l (-0.00932981 -0.112449 -0.0120305)
      PathPoint P2: socket_parent_frame_connectee_name=../../../calcn_l (0.00520162 0.0432452 0.00711551)
    Millard2012EquilibriumMuscle tfl_l: max_isometric_force=582.9847 optimal_fiber_length=0.1047339
        tendon_slack_length=0.4955534 pennation_angle_at_optimal=0.05235988
      PathPoint P1: socket_parent_frame_connectee_name=../../../pelvis (-0.0391651 0.0221457 -0.158005)
      PathPoint P2: socket_parent_frame_connectee_name=../../../femur_l (0.0325656 -0.110214 -0.0661281)
      PathPoint P3: socket_parent_frame_connectee_name=../../../femur_l (0.0118521 -0.448608 -0.0358886)
      PathPoint P4: socket_parent_frame_connectee_name=../../../tibia_l (0.0132582 -0.0503319 -0.0424752)
    Millard2012EquilibriumMuscle tib_ant_l: max_isometric_force=1552.867 optimal_fiber_length=0.08438241
        tendon_slack_length=0.2970817 pennation_angle_at_optimal=0.1951828
      PathPoint tibant_l-P1: socket_parent_frame_connectee_name=../../../tibia_l (0.0189051 -0.161062 -0.0198872)
      PathPoint tibant_l-P2: socket_parent_frame_connectee_name=../../../tibia_l (0.0308129 -0.233982 -0.0157134)
      PathPoint tibant_l-P3: socket_parent_frame_connectee_name=../../../tibia_l (0.0286032 -0.449181 0.0162044)
      PathPoint tibant_l-P4: socket_parent_frame_connectee_name=../../../calcn_l (0.137843 0.0248311 0.0409477)
    Millard2012EquilibriumMuscle tib_post_l: max_isometric_force=2193.859 optimal_fiber_length=0.04659386
        tendon_slack_length=0.3461007 pennation_angle_at_optimal=0.2264891
      PathPoint tibpost_l-P1: socket_parent_frame_connectee_name=../../../tibia_l (-0.00503319 -0.16008 -0.0126444)
      PathPoint tibpost_l-P2: socket_parent_frame_connectee_name=../../../tibia_l (-0.0201328 -0.44869 0.0214831)
      PathPoint tibpost_l-P3: socket_parent_frame_connectee_name=../../../calcn_l (0.0492972 0.0465932 0.0383969)
      PathPoint tibpost_l-P4: socket_parent_frame_connectee_name=../../../calcn_l (0.0912648 0.0221806 0.0377256)
    Millard2012EquilibriumMuscle vas_int_l: max_isometric_force=2352.56 optimal_fiber_length=0.1119808
        tendon_slack_length=0.2280333 pennation_angle_at_optimal=0.06309973
      PathPoint vasint_l-P1: socket_parent_frame_connectee_name=../../../femur_l (0.0321225 -0.213116 -0.0343379)
      PathPoint vasint_l-P2: socket_parent_frame_connectee_name=../../../femur_l (0.0371071 -0.230839 -0.0315687)
      PathPoint vasint_l-P3: socket_parent_frame_connectee_name=../../../patella_l (0.00642451 0.0531683 0.000664604)
      PathPoint vasint_l-P4: socket_parent_frame_connectee_name=../../../patella_l (0.00553837 0.00273595 0.000431993)
      PathPoint vasint_l-P5: socket_parent_frame_connectee_name=../../../tibia_l (0.0399832 -0.0775848 -0.000527871)
      PathWrap: wrap_object=KnExt_at_fem_l method=hybrid
    Millard2012EquilibriumMuscle vas_lat_l: max_isometric_force=7142.66 optimal_fiber_length=0.1119929
        tendon_slack_length=0.248549 pennation_angle_at_optimal=0.2528673
      PathPoint vaslat_l-P1: socket_parent_frame_connectee_name=../../../femur_l (0.00531683 -0.205363 -0.0386578)
      PathPoint vaslat_l-P2: socket_parent_frame_connectee_name=../../../femur_l (0.0297964 -0.286998 -0.0453038)
      PathPoint vaslat_l-P3: socket_parent_frame_connectee_name=../../../patella_l (0.011409 0.0468546 -0.0156182)
      PathPoint vaslat_l-P4: socket_parent_frame_connectee_name=../../../patella_l (0.00553837 0.00273595 -0.00811925)
      PathPoint vaslat_l-P5: socket_parent_frame_connectee_name=../../../tibia_l (0.0399463 -0.0778057 -0.00627307)
      PathWrap: wrap_object=KnExt_at_fem_l method=hybrid
    Millard2012EquilibriumMuscle vas_med_l: max_isometric_force=3805.574 optimal_fiber_length=0.1092458
        tendon_slack_length=0.2256064 pennation_angle_at_optimal=0.4222225
      PathPoint vasmed_l-P1: socket_parent_frame_connectee_name=../../../femur_l (0.0155074 -0.232501 -0.0208243)
      PathPoint vasmed_l-P2: socket_parent_frame_connectee_name=../../../femur_l (0.0394332 -0.306715 -0.000996906)
      PathPoint vasmed_l-P3: socket_parent_frame_connectee_name=../../../patella_l (0.00697834 0.0492915 0.0188304)
      PathPoint vasmed_l-P4: socket_parent_frame_connectee_name=../../../patella_l (0.00553837 0.00273595 0.00941522)
      PathPoint vasmed_l-P5: socket_parent_frame_connectee_name=../../../tibia_l (0.0391607 -0.078039 0.00832317)
      PathWrap: wrap_object=KnExt_at_fem_l method=hybrid
    CoordinateActuator lumbar_ext: coordinate=lumbar_extension optimal_force=10
    CoordinateActuator lumbar_bend: coordinate=lumbar_bending optimal_force=10
    CoordinateActuator lumbar_rot: coordinate=lumbar_rotation optimal_force=10
    CoordinateActuator shoulder_flex_r: coordinate=arm_flex_r optimal_force=10
    CoordinateActuator shoulder_add_r: coordinate=arm_add_r optimal_force=10
    CoordinateActuator shoulder_rot_r: coordinate=arm_rot_r optimal_force=10
    CoordinateActuator elbow_flex_r: coordinate=elbow_flex_r optimal_force=10
    CoordinateActuator pro_sup_r: coordinate=pro_sup_r optimal_force=10
    CoordinateActuator wrist_flex_r: coordinate=wrist_flex_r optimal_force=10
    CoordinateActuator wrist_dev_r: coordinate=wrist_dev_r optimal_force=10
    CoordinateActuator shoulder_flex_l: coordinate=arm_flex_l optimal_force=10
    CoordinateActuator shoulder_add_l: coordinate=arm_add_l optimal_force=10
    CoordinateActuator shoulder_rot_l: coordinate=arm_rot_l optimal_force=10
    CoordinateActuator elbow_flex_l: coordinate=elbow_flex_l optimal_force=10
    CoordinateActuator pro_sup_l: coordinate=pro_sup_l optimal_force=10
    CoordinateActuator wrist_flex_l: coordinate=wrist_flex_l optimal_force=10
    CoordinateActuator wrist_dev_l: coordinate=wrist_dev_l optimal_force=10
    ObjectGroup right_leg: members=(grac_r iliacus_r psoas_r semimem_r semiten_r soleus_r tfl_r)
    ObjectGroup left_leg: members=(grac_l iliacus_l psoas_l semimem_l semiten_l soleus_l tfl_l)
    ObjectGroup hip_add_r: members=(grac_r semimem_r semiten_r)
    ObjectGroup hip_abd_r: members=tfl_r
    ObjectGroup hip_flex_r: members=(grac_r iliacus_r psoas_r tfl_r)
    ObjectGroup hip_ext_r: members=(semimem_r semiten_r)
    ObjectGroup hip_inrot_r: members=(iliacus_r psoas_r tfl_r)
    ObjectGroup hip_exrot_r
    ObjectGroup knee_flex_r: members=(grac_r semimem_r semiten_r)
    ObjectGroup knee_ext_r
    ObjectGroup ankle_df_r
    ObjectGroup ankle_pf_r: members=soleus_r
    ObjectGroup everter_r
    ObjectGroup inverter_r
    ObjectGroup hip_add_l: members=(grac_l semimem_l semiten_l)
    ObjectGroup hip_abd_l: members=tfl_l
    ObjectGroup hip_flex_l: members=(grac_l iliacus_l psoas_l tfl_l)
    ObjectGroup hip_ext_l: members=(semimem_l semiten_l)
    ObjectGroup hip_exrot_l
    ObjectGroup hip_inrot_l: members=(iliacus_l psoas_l tfl_l)
    ObjectGroup knee_flex_l: members=(grac_l semimem_l semiten_l)
    ObjectGroup knee_ext_l
    ObjectGroup ankle_df_l
    ObjectGroup ankle_pf_l: members=soleus_l
    ObjectGroup everter_l
    ObjectGroup inverter_l
  MarkerSet:
    Marker R.Shoulder: socket_parent_frame_connectee_name=../torso (0 0.456661 0.205224) fixed=true
    Marker L.Shoulder: socket_parent_frame_connectee_name=../torso (0 0.456661 -0.205224) fixed=true
    Marker R.Clavicle: socket_parent_frame_connectee_name=../torso (0.066481 0.420609 0.036131) fixed=true
    Marker L.Clavicle: socket_parent_frame_connectee_name=../torso (0.066481 0.420609 -0.036131) fixed=true
    Marker R.Biceps: socket_parent_frame_connectee_name=../humerus_r (-0.0687512 -0.187527 0.0473852)
    Marker R.Elbow: socket_parent_frame_connectee_name=../humerus_r (0.0114111 -0.320652 0.0399389) fixed=true
    Marker R.MElbow: socket_parent_frame_connectee_name=../humerus_r (0 -0.320652 -0.0479266) fixed=true
    Marker R.Forearm: socket_parent_frame_connectee_name=../ulna_r (-0.0248328 -0.119161 0.0675604)
    Marker R.Wrist: socket_parent_frame_connectee_name=../radius_r (-0.0352809 -0.282247 0.00705618) fixed=true
    Marker L.Biceps: socket_parent_frame_connectee_name=../humerus_l (0.0332369 -0.122489 -0.00500208)
    Marker L.Elbow: socket_parent_frame_connectee_name=../humerus_l (0.0114111 -0.320652 -0.0399389) fixed=true
    Marker L.MElbow: socket_parent_frame_connectee_name=../humerus_l (0 -0.320652 0.0479266) fixed=true
    Marker L.Forearm: socket_parent_frame_connectee_name=../ulna_l (-0.0265122 -0.132469 -0.0598719)
    Marker L.Wrist: socket_parent_frame_connectee_name=../radius_l (-0.0352809 -0.282247 -0.00705618) fixed=true
    Marker R.ASIS: socket_parent_frame_connectee_name=../pelvis (0.0163713 0.0310454 0.16297) fixed=true
    Marker L.ASIS: socket_parent_frame_connectee_name=../pelvis (0.0163713 0.0310454 -0.16297) fixed=true
    Marker S2: socket_parent_frame_connectee_name=../pelvis (-0.226679 0.0258711 0) fixed=true
    Marker R.PSIS: socket_parent_frame_connectee_name=../pelvis (-0.193936 0.0393241 0.0700262) fixed=true
    Marker L.PSIS: socket_parent_frame_connectee_name=../pelvis (-0.193936 0.0393241 -0.0700262) fixed=true
    Marker R_HJC: socket_parent_frame_connectee_name=../femur_r (0 0 0) fixed=true
    Marker L_HJC: socket_parent_frame_connectee_name=../femur_l (0 0 0) fixed=true
    Marker R.TH1: socket_parent_frame_connectee_name=../femur_r (0.0988166 -0.148279 0.0979198)
    Marker R.TH2: socket_parent_frame_connectee_name=../femur_r (-0.00844625 -0.146226 0.119713)
    Marker R.TH3: socket_parent_frame_connectee_name=../femur_r (-0.0207057 -0.273824 0.0906216)
    Marker R.Knee: socket_parent_frame_connectee_name=../femur_r (0 -0.4475 0.0520607) fixed=true
    Marker R.MKnee: socket_parent_frame_connectee_name=../femur_r (0.00553837 -0.444177 -0.0553837) fixed=true
    Marker R.SH1: socket_parent_frame_connectee_name=../tibia_r (-0.00900855 -0.146516 0.0956708)
    Marker R.SH2: socket_parent_frame_connectee_name=../tibia_r (0.0105608 -0.255696 0.0752674)
    Marker R.SH3: socket_parent_frame_connectee_name=../tibia_r (-0.0853962 -0.157098 0.0649032)
    Marker R.SH4: socket_parent_frame_connectee_name=../tibia_r (-0.0691195 -0.274834 0.0498895)
    Marker R.Ankle: socket_parent_frame_connectee_name=../tibia_r (-0.00613803 -0.465017 0.0650632) fixed=true
    Marker R.MAnkle: socket_parent_frame_connectee_name=../tibia_r (0.00736564 -0.440465 -0.0466491) fixed=true
    Marker R.Toe: socket_parent_frame_connectee_name=../calcn_r (0.266745 0.0582067 -0.0238225)
    Marker R.MT5: socket_parent_frame_connectee_name=../calcn_r (0.188663 0.0182867 0.0752276)
    Marker R.Heel: socket_parent_frame_connectee_name=../calcn_r (-0.0236437 0.0279001 -0.0134255) fixed=true
    Marker L.TH1: socket_parent_frame_connectee_name=../femur_l (0.0658033 -0.130504 -0.120034)
    Marker L.TH2: socket_parent_frame_connectee_name=../femur_l (0.084155 -0.260573 -0.0964653)
    Marker L.TH3: socket_parent_frame_connectee_name=../femur_l (-0.0408498 -0.135683 -0.115985)
    Marker L.TH4: socket_parent_frame_connectee_name=../femur_l (-0.0341178 -0.270731 -0.0973315)
    Marker L.Knee: socket_parent_frame_connectee_name=../femur_l (0 -0.4475 -0.0520607) fixed=true
    Marker L.MKnee: socket_parent_frame_connectee_name=../femur_l (0.00553837 -0.444177 0.0553837) fixed=true
    Marker L.SH1: socket_parent_frame_connectee_name=../tibia_l (0.0125136 -0.0659146 -0.0657742)
    Marker L.SH2: socket_parent_frame_connectee_name=../tibia_l (-0.0823223 -0.0763276 -0.0765917)
    Marker L.SH3: socket_parent_frame_connectee_name=../tibia_l (-0.0598646 -0.189289 -0.0933426)
    Marker L.Ankle: socket_parent_frame_connectee_name=../tibia_l (-0.00613803 -0.465017 -0.0650632) fixed=true
    Marker L.MAnkle: socket_parent_frame_connectee_name=../tibia_l (0.00736564 -0.440465 0.0466491) fixed=true
    Marker L.Toe: socket_parent_frame_connectee_name=../calcn_l (0.274193 0.0553761 0.0223617)
    Marker L.Heel: socket_parent_frame_connectee_name=../calcn_l (-0.0236437 0.0279001 0.0134255) fixed=true
    Marker L.MT5: socket_parent_frame_connectee_name=../calcn_l (0.191196 0.0150528 -0.0737024)
    Marker MidPSIS: socket_parent_frame_connectee_name=../pelvis (-0.193936 0.0393241 0) fixed=true
    Marker MidASIS: socket_parent_frame_connectee_name=../pelvis (0.0163713 0.0310454 0) fixed=true
    Marker MidClavicle: socket_parent_frame_connectee_name=../torso (0.066481 0.420609 0) fixed=true
    Marker L.AnkleJoint: socket_parent_frame_connectee_name=../tibia_l (0.000613803 -0.452741 -0.00920705) fixed=true
    Marker L.KneeJoint: socket_parent_frame_connectee_name=../femur_l (0.00276918 -0.445839 0.00166151) fixed=true
    Marker L.HeelGround: socket_parent_frame_connectee_name=../calcn_l (-0.0236437 -0.00697503 0.0134255) fixed=true
    Marker L.MT5Ground: socket_parent_frame_connectee_name=../calcn_l (0.18915 -0.00697503 -0.0671274) fixed=true
    Marker L.ToeGround: socket_parent_frame_connectee_name=../calcn_l (0.271903 -0.00697503 0.0214808) fixed=true
    Marker L.AnkleJointGround: socket_parent_frame_connectee_name=../tibia_l (0.000613803 -0.548679 -0.00920705)
        fixed=true
    Marker R.AnkleJoint: socket_parent_frame_connectee_name=../tibia_r (0.000613803 -0.452741 0.00920705) fixed=true
    Marker R.KneeJoint: socket_parent_frame_connectee_name=../femur_r (0.00276918 -0.445839 -0.00166151) fixed=true
    Marker R.HeelGround: socket_parent_frame_connectee_name=../calcn_r (-0.0236437 -0.00697503 -0.0134255) fixed=true
    Marker R.MT5Ground: socket_parent_frame_connectee_name=../calcn_r (0.18915 -0.00697503 0.0671274) fixed=true
    Marker R.ToeGround: socket_parent_frame_connectee_name=../calcn_r (0.271903 -0.00697503 -0.0214808) fixed=true
    Marker R.AnkleJointGround: socket_parent_frame_connectee_name=../tibia_r (0.000613803 -0.548679 0.00920705)
        fixed=true
  ProbeSet:
    Umberger2010MuscleMetabolicsProbe metabolic_power: probe_operation=value activation_maintenance_rate_on=true
        shortening_rate_on=true basal_rate_on=true mechanical_work_rate_on=true muscle_effort_scaling_factor=1
        report_total_metabolics_only=false
      Umberger2010MuscleMetabolicsProbe_MetabolicMuscleParameterSet:
        Umberger2010MuscleMetabolicsProbe_MetabolicMuscleParameter [values shared by the 80 below unless stated]: specific_tension=600000 [N/m^2]
            use_provided_muscle_mass=false
        Umberger2010MuscleMetabolicsProbe_MetabolicMuscleParameter add_brev_r: ratio_slow_twitch_fibers=0.5
        Umberger2010MuscleMetabolicsProbe_MetabolicMuscleParameter add_long_r: ratio_slow_twitch_fibers=0.5
        Umberger2010MuscleMetabolicsProbe_MetabolicMuscleParameter add_mag3_r: ratio_slow_twitch_fibers=0.552
        Umberger2010MuscleMetabolicsProbe_MetabolicMuscleParameter add_mag4_r: ratio_slow_twitch_fibers=0.552
        Umberger2010MuscleMetabolicsProbe_MetabolicMuscleParameter add_mag2_r: ratio_slow_twitch_fibers=0.552
        Umberger2010MuscleMetabolicsProbe_MetabolicMuscleParameter add_mag1_r: ratio_slow_twitch_fibers=0.552
        Umberger2010MuscleMetabolicsProbe_MetabolicMuscleParameter bifemlh_r: ratio_slow_twitch_fibers=0.5425
        Umberger2010MuscleMetabolicsProbe_MetabolicMuscleParameter bifemsh_r: ratio_slow_twitch_fibers=0.529
        Umberger2010MuscleMetabolicsProbe_MetabolicMuscleParameter ext_dig_r: ratio_slow_twitch_fibers=0.75
        Umberger2010MuscleMetabolicsProbe_MetabolicMuscleParameter ext_hal_r: ratio_slow_twitch_fibers=0.75
        Umberger2010MuscleMetabolicsProbe_MetabolicMuscleParameter flex_dig_r: ratio_slow_twitch_fibers=0.6
        Umberger2010MuscleMetabolicsProbe_MetabolicMuscleParameter flex_hal_r: ratio_slow_twitch_fibers=0.6
        Umberger2010MuscleMetabolicsProbe_MetabolicMuscleParameter lat_gas_r: ratio_slow_twitch_fibers=0.507
        Umberger2010MuscleMetabolicsProbe_MetabolicMuscleParameter med_gas_r: ratio_slow_twitch_fibers=0.566
        Umberger2010MuscleMetabolicsProbe_MetabolicMuscleParameter glut_max1_r: ratio_slow_twitch_fibers=0.55
        Umberger2010MuscleMetabolicsProbe_MetabolicMuscleParameter glut_max2_r: ratio_slow_twitch_fibers=0.55
        Umberger2010MuscleMetabolicsProbe_MetabolicMuscleParameter glut_max3_r: ratio_slow_twitch_fibers=0.55
        Umberger2010MuscleMetabolicsProbe_MetabolicMuscleParameter glut_med1_r: ratio_slow_twitch_fibers=0.55
        Umberger2010MuscleMetabolicsProbe_MetabolicMuscleParameter glut_med2_r: ratio_slow_twitch_fibers=0.55
        Umberger2010MuscleMetabolicsProbe_MetabolicMuscleParameter glut_med3_r: ratio_slow_twitch_fibers=0.55
        Umberger2010MuscleMetabolicsProbe_MetabolicMuscleParameter glut_min1_r: ratio_slow_twitch_fibers=0.55
        Umberger2010MuscleMetabolicsProbe_MetabolicMuscleParameter glut_min2_r: ratio_slow_twitch_fibers=0.55
        Umberger2010MuscleMetabolicsProbe_MetabolicMuscleParameter glut_min3_r: ratio_slow_twitch_fibers=0.55
        Umberger2010MuscleMetabolicsProbe_MetabolicMuscleParameter grac_r: ratio_slow_twitch_fibers=0.5
        Umberger2010MuscleMetabolicsProbe_MetabolicMuscleParameter iliacus_r: ratio_slow_twitch_fibers=0.5
        Umberger2010MuscleMetabolicsProbe_MetabolicMuscleParameter per_brev_r: ratio_slow_twitch_fibers=0.6
        Umberger2010MuscleMetabolicsProbe_MetabolicMuscleParameter per_long_r: ratio_slow_twitch_fibers=0.6
        Umberger2010MuscleMetabolicsProbe_MetabolicMuscleParameter peri_r: ratio_slow_twitch_fibers=0.5
        Umberger2010MuscleMetabolicsProbe_MetabolicMuscleParameter psoas_r: ratio_slow_twitch_fibers=0.5
        Umberger2010MuscleMetabolicsProbe_MetabolicMuscleParameter rect_fem_r: ratio_slow_twitch_fibers=0.3865
        Umberger2010MuscleMetabolicsProbe_MetabolicMuscleParameter sar_r: ratio_slow_twitch_fibers=0.5
        Umberger2010MuscleMetabolicsProbe_MetabolicMuscleParameter semimem_r: ratio_slow_twitch_fibers=0.4925
        Umberger2010MuscleMetabolicsProbe_MetabolicMuscleParameter semiten_r: ratio_slow_twitch_fibers=0.425
        Umberger2010MuscleMetabolicsProbe_MetabolicMuscleParameter soleus_r: ratio_slow_twitch_fibers=0.803
        Umberger2010MuscleMetabolicsProbe_MetabolicMuscleParameter tfl_r: ratio_slow_twitch_fibers=0.5
        Umberger2010MuscleMetabolicsProbe_MetabolicMuscleParameter tib_ant_r: ratio_slow_twitch_fibers=0.7
        Umberger2010MuscleMetabolicsProbe_MetabolicMuscleParameter tib_post_r: ratio_slow_twitch_fibers=0.6
        Umberger2010MuscleMetabolicsProbe_MetabolicMuscleParameter vas_int_r: ratio_slow_twitch_fibers=0.543
        Umberger2010MuscleMetabolicsProbe_MetabolicMuscleParameter vas_lat_r: ratio_slow_twitch_fibers=0.455
        Umberger2010MuscleMetabolicsProbe_MetabolicMuscleParameter vas_med_r: ratio_slow_twitch_fibers=0.503
        Umberger2010MuscleMetabolicsProbe_MetabolicMuscleParameter add_brev_l: ratio_slow_twitch_fibers=0.5
        Umberger2010MuscleMetabolicsProbe_MetabolicMuscleParameter add_long_l: ratio_slow_twitch_fibers=0.5
        Umberger2010MuscleMetabolicsProbe_MetabolicMuscleParameter add_mag3_l: ratio_slow_twitch_fibers=0.552
        Umberger2010MuscleMetabolicsProbe_MetabolicMuscleParameter add_mag4_l: ratio_slow_twitch_fibers=0.552
        Umberger2010MuscleMetabolicsProbe_MetabolicMuscleParameter add_mag2_l: ratio_slow_twitch_fibers=0.552
        Umberger2010MuscleMetabolicsProbe_MetabolicMuscleParameter add_mag1_l: ratio_slow_twitch_fibers=0.552
        Umberger2010MuscleMetabolicsProbe_MetabolicMuscleParameter bifemlh_l: ratio_slow_twitch_fibers=0.5425
        Umberger2010MuscleMetabolicsProbe_MetabolicMuscleParameter bifemsh_l: ratio_slow_twitch_fibers=0.529
        Umberger2010MuscleMetabolicsProbe_MetabolicMuscleParameter ext_dig_l: ratio_slow_twitch_fibers=0.75
        Umberger2010MuscleMetabolicsProbe_MetabolicMuscleParameter ext_hal_l: ratio_slow_twitch_fibers=0.75
        Umberger2010MuscleMetabolicsProbe_MetabolicMuscleParameter flex_dig_l: ratio_slow_twitch_fibers=0.6
        Umberger2010MuscleMetabolicsProbe_MetabolicMuscleParameter flex_hal_l: ratio_slow_twitch_fibers=0.6
        Umberger2010MuscleMetabolicsProbe_MetabolicMuscleParameter lat_gas_l: ratio_slow_twitch_fibers=0.507
        Umberger2010MuscleMetabolicsProbe_MetabolicMuscleParameter med_gas_l: ratio_slow_twitch_fibers=0.566
        Umberger2010MuscleMetabolicsProbe_MetabolicMuscleParameter glut_max1_l: ratio_slow_twitch_fibers=0.55
        Umberger2010MuscleMetabolicsProbe_MetabolicMuscleParameter glut_max2_l: ratio_slow_twitch_fibers=0.55
        Umberger2010MuscleMetabolicsProbe_MetabolicMuscleParameter glut_max3_l: ratio_slow_twitch_fibers=0.55
        Umberger2010MuscleMetabolicsProbe_MetabolicMuscleParameter glut_med1_l: ratio_slow_twitch_fibers=0.55
        Umberger2010MuscleMetabolicsProbe_MetabolicMuscleParameter glut_med2_l: ratio_slow_twitch_fibers=0.55
        Umberger2010MuscleMetabolicsProbe_MetabolicMuscleParameter glut_med3_l: ratio_slow_twitch_fibers=0.55
        Umberger2010MuscleMetabolicsProbe_MetabolicMuscleParameter glut_min1_l: ratio_slow_twitch_fibers=0.55
        Umberger2010MuscleMetabolicsProbe_MetabolicMuscleParameter glut_min2_l: ratio_slow_twitch_fibers=0.55
        Umberger2010MuscleMetabolicsProbe_MetabolicMuscleParameter glut_min3_l: ratio_slow_twitch_fibers=0.55
        Umberger2010MuscleMetabolicsProbe_MetabolicMuscleParameter grac_l: ratio_slow_twitch_fibers=0.5
        Umberger2010MuscleMetabolicsProbe_MetabolicMuscleParameter iliacus_l: ratio_slow_twitch_fibers=0.5
        Umberger2010MuscleMetabolicsProbe_MetabolicMuscleParameter per_brev_l: ratio_slow_twitch_fibers=0.6
        Umberger2010MuscleMetabolicsProbe_MetabolicMuscleParameter per_long_l: ratio_slow_twitch_fibers=0.6
        Umberger2010MuscleMetabolicsProbe_MetabolicMuscleParameter peri_l: ratio_slow_twitch_fibers=0.5
        Umberger2010MuscleMetabolicsProbe_MetabolicMuscleParameter psoas_l: ratio_slow_twitch_fibers=0.5
        Umberger2010MuscleMetabolicsProbe_MetabolicMuscleParameter rect_fem_l: ratio_slow_twitch_fibers=0.3865
        Umberger2010MuscleMetabolicsProbe_MetabolicMuscleParameter sar_l: ratio_slow_twitch_fibers=0.5
        Umberger2010MuscleMetabolicsProbe_MetabolicMuscleParameter semimem_l: ratio_slow_twitch_fibers=0.4925
        Umberger2010MuscleMetabolicsProbe_MetabolicMuscleParameter semiten_l: ratio_slow_twitch_fibers=0.425
        Umberger2010MuscleMetabolicsProbe_MetabolicMuscleParameter soleus_l: ratio_slow_twitch_fibers=0.803
        Umberger2010MuscleMetabolicsProbe_MetabolicMuscleParameter tfl_l: ratio_slow_twitch_fibers=0.5
        Umberger2010MuscleMetabolicsProbe_MetabolicMuscleParameter tib_ant_l: ratio_slow_twitch_fibers=0.7
        Umberger2010MuscleMetabolicsProbe_MetabolicMuscleParameter tib_post_l: ratio_slow_twitch_fibers=0.6
        Umberger2010MuscleMetabolicsProbe_MetabolicMuscleParameter vas_int_l: ratio_slow_twitch_fibers=0.543
        Umberger2010MuscleMetabolicsProbe_MetabolicMuscleParameter vas_lat_l: ratio_slow_twitch_fibers=0.455
        Umberger2010MuscleMetabolicsProbe_MetabolicMuscleParameter vas_med_l: ratio_slow_twitch_fibers=0.503
