# OpenSim document version 20302
Model double_pendulum_testReverse:
  credits: Ajay Seth
  length_units: meters
  force_units: N
  gravity: 0 -9.80665 0
  publications:
    For testing change in 30514 (removing "reverse" property from Joint). PinJoint "pin2" has "reverse" set to "true".
  BodySet:
    Body ground: mass=0 mass_center=(0 0 0) inertia_xx=0 inertia_yy=0 inertia_zz=0
    Body rod1: mass=1 mass_center=(0 0 0) inertia_xx=0 inertia_yy=0 inertia_zz=0
      PinJoint pin1: parent_body=ground location_in_parent=(0 0 0) location=(0 0.5 0)
        Coordinate q1: motion_type=rotational default_value=-0.7853982 range=(-1.570796 1.570796) clamped=false
    Body rod2: mass=1 mass_center=(0 0 0) inertia_xx=0 inertia_yy=0 inertia_zz=0
      PinJoint pin2: parent_body=rod1 location_in_parent=(0 0 0) location=(0 0.5 0) reverse=true
        Coordinate q2: motion_type=rotational default_value=-1.047198 range=(-1.570796 1.570796) clamped=false
