# OpenSim document version 20001
Model BouncingBall:
  length_units: m
  force_units: N
  gravity: 0 -9.8065 0
  ForceSet:
    ElasticFoundationForce contact: transition_velocity=0.1
      ContactParametersSet:
        ContactParameters: geometry=(ball ground) stiffness=10000 dissipation=0.75 static_friction=0.3
            dynamic_friction=0.3 viscous_friction=0.3
  BodySet:
    Body ground: mass=0 mass_center=(0 0 0) inertia_xx=1 inertia_yy=1 inertia_zz=1
    Body ball: mass=1 mass_center=(0 0 0) inertia_xx=1 inertia_yy=1 inertia_zz=1 meshes=sphere.vtp
      FreeJoint ground_ball: parent_body=ground location_in_parent=(0 0 0) location=(0 0 0)
        Coordinate ball_rz: motion_type=rotational default_value=0 initial_value=0 range=(-1.570796 1.570796)
            clamped=false
        Coordinate ball_rx: motion_type=rotational default_value=0 initial_value=0 range=(-1.570796 1.570796)
            clamped=false
        Coordinate ball_ry: motion_type=rotational default_value=0 initial_value=0 range=(-1.570796 1.570796)
            clamped=false
        Coordinate ball_tx: motion_type=translational default_value=0 initial_value=0 range=(-5 5) clamped=false
        Coordinate ball_ty: motion_type=translational default_value=0 initial_value=0 range=(-1 2) clamped=false
        Coordinate ball_tz: motion_type=translational default_value=0 initial_value=0 range=(-3 3) clamped=false
  ContactGeometrySet:
    ContactHalfSpace ground: body_name=ground location=(0 0 0) orientation=(0 0 -1.570796)
    ContactMesh ball: body_name=ball location=(0 0 0) filename=sphere.obj
