# OpenSim document version 40000
Model BouncingBall:
  gravity: 0 -9.8065 0
  length_units: meters
  force_units: N
  Ground
  BodySet:
    Body ball: mass=1 [kg] mass_center=(0 0 0) inertia=(1 1 1 0 0 0)
  JointSet:
    FreeJoint: socket_parent_frame=ground_offset socket_child_frame=ball_offset
      Coordinate ball_rz: default_value=0 range=(-1.570796 1.570796) clamped=false
      Coordinate ball_rx: default_value=0 range=(-1.570796 1.570796) clamped=false
      Coordinate ball_ry: default_value=0 range=(-1.570796 1.570796) clamped=false
      Coordinate ball_tx: default_value=0 range=(-5 5) clamped=false
      Coordinate ball_ty: default_value=0 range=(-1 2) clamped=false
      Coordinate ball_tz: default_value=0 range=(-3 3) clamped=false
      PhysicalOffsetFrame ground_offset: socket_parent=../../../ground translation=(0 0 0) [meters]
      PhysicalOffsetFrame ball_offset: socket_parent=../../../bodyset/ball translation=(0 0 0)
  ForceSet:
    SmoothSphereHalfSpaceForce contact: stiffness=10000 dissipation=0.75 static_friction=0.3 dynamic_friction=0.3
        viscous_friction=0.3 transition_velocity=0.1 socket_sphere=/contactgeometryset/sphere
        socket_half_space=/contactgeometryset/floor
  ContactGeometrySet:
    ContactHalfSpace floor: socket_frame=/ground location=(0 0 0) orientation=(0 0 -1.570796)
    ContactSphere sphere: socket_frame=/bodyset/ball location=(0 0 0) radius=0.5
