# OpenSim document version 30000
Model BushingOffsetTest:
  length_units: meters
  force_units: N
  gravity: 0 -9.8065 0
  credits:
    Frank Anderson, Peter Loan, Ayman Habib, Ajay Seth, Michael Sherman
  BodySet:
    Body ground: mass=0 mass_center=(0 0 0) inertia_xx=1 inertia_yy=1 inertia_zz=1
    Body ball: mass=1 mass_center=(0 0 0) inertia_xx=0.00025 inertia_yy=0.00025 inertia_zz=0.00025 meshes=sphere.vtp
      SliderJoint: parent_body=ground location_in_parent=(0 0 0) orientation_in_parent=(0 0 1.570796) location=(0 0 0)
          orientation=(0 0 1.570796)
        Coordinate ball_h: motion_type=translational range=(-10 10)
  ForceSet:
    BushingForce bushing: body_1=ground body_2=ball location_body_1=(1 2 3) orientation_body_1=(-0.5 0 0.5)
        location_body_2=(4 5 6) orientation_body_2=(0.1 0.2 0.3) rotational_stiffness=(15 21 30) [Nm/rad]
        translational_stiffness=(10 10 10) [N/m] rotational_damping=(0.4 0.5 0.6) [Nm/(rad/s)]
        translational_damping=(0.2 0.3 0.4) [N/(m/s)]
