# OpenSim document version 20001
Model MovingPointCustomJointMomentArmTest:
  gravity: 0 -9.8 0
  ForceSet:
    Thelen2003Muscle vas_int_r: max_isometric_force=5000 optimal_fiber_length=0.207 tendon_slack_length=0.316
        pennation_angle=0.05235988 activation_time_constant=0.01 deactivation_time_constant=0.04 Vmax=10 Vmax0=5
        FmaxTendonStrain=0.033 FmaxMuscleStrain=0.6 KshapeActive=0.5 KshapePassive=4 damping=0.05 Af=0.3 Flen=1.8
      PathPoint P1: femur_r (0.029 -0.1924 0.031)
      PathPoint P2: femur_r (0.0335 -0.2084 0.0285)
      ConditionalPathPoint P3: femur_r (0.0343 -0.403 0.0055) range=(-2.617994 -1.42) coordinate=knee_angle_r
      MovingPathPoint P4: tibia_r (0.05546322 0.02529232 0.0018) x_coordinate=knee_angle_r y_coordinate=knee_angle_r
          z_coordinate=knee_angle_r
        x_location: NaturalCubicSpline: x=(-2.094395 -1.999973 -1.570796 -1.457524 -1.396263 -1.047198 -0.6981317 -0.5263913 -0.3490659 -0.1745329 0 0.00017453 0.00034907 0.02792527 0.08726646 0.1745329 2.094395)
            y=(0.0082733 0.01068662 0.02020416 0.02235298 0.02345827 0.02927151 0.03494648 0.03787104 0.04125689 0.04652869 0.05546322 0.05547346 0.05548371 0.05717169 0.06127199 0.06843685 0.06488175)
        y_location: NaturalCubicSpline: x=(-2.094395 -1.999973 -1.570796 -1.457524 -1.396263 -1.047198 -0.6981317 -0.5263913 -0.3490659 -0.1745329 0 0.00017453 0.00034907 0.02792527 0.08726646 0.1745329 2.094395)
            y=(0.02559904 0.02594872 0.02731241 0.02747964 0.02751511 0.02713628 0.02657369 0.02630726 0.0261187 0.02601292 0.02529232 0.02529107 0.02528981 0.02505258 0.02421913 0.02182878 -0.06857056)
        z_location: NaturalCubicSpline: x=(-2.0944 2.0944) y=(0.0018 0.0018)
  BodySet:
    Body ground: mass=0 mass_center=(0 0 0) inertia_xx=1 inertia_yy=1 inertia_zz=1
    Body femur_r: mass=8.806 mass_center=(0 0.5 0) inertia_xx=0.1268 inertia_yy=0.0332 inertia_zz=0.1337
        meshes=femur_r.vtp
      WeldJoint: parent_body=ground location_in_parent=(0 0 0) location=(0.002 0.1715 0)
    Body tibia_r: mass=3.7075 mass_center=(0 -0.1867 0) inertia_xx=0.0504 inertia_yy=0.0051 inertia_zz=0.0511
        meshes=(tibia.vtp fibula.vtp)
      CustomJoint knee_r: parent_body=femur_r location_in_parent=(0 0 0) location=(0 0 0)
        Coordinate knee_angle_r: motion_type=rotational default_value=0 initial_value=0 range=(-2.094395 0.1745329)
            clamped=false
        SpatialTransform: axes_held_at_zero=(rotation2 rotation3 translation3)
          TransformAxis rotation1: coordinates=knee_angle_r axis=(0 0 1) LinearFunction(coefficients=1 0)
          TransformAxis translation1: coordinates=knee_angle_r axis=(1 0 0)
            NaturalCubicSpline: x=(-2.094395 -1.745329 -1.396263 -1.047198 -0.6981317 -0.3490659 -0.1745329 0.1973442 0.337395 0.4901776 1.52146 2.094395)
                y=(-0.0032 0.00179 0.00411 0.0041 0.00212 -0.001 -0.0031 -0.005227 -0.005435 -0.005574 -0.005435 -0.00525)
          TransformAxis translation2: coordinates=knee_angle_r axis=(0 1 0)
            NaturalCubicSpline: x=(-2.094395 -1.22173 -0.5235988 -0.3490659 -0.1745329 0.1591486 2.094395)
                y=(-0.4226 -0.4082 -0.399 -0.3976 -0.3966 -0.395264 -0.396)
