# OpenSim document version 30000
Model MovingPathPointMomentArmTest:
  gravity: 0 -9.8 0
  BodySet:
    Body ground: mass=0 mass_center=(0 0 0) inertia_xx=1 inertia_yy=1 inertia_zz=1
    Body femur: mass=8.806 mass_center=(0 0.5 0) inertia_xx=0.1268 inertia_yy=0.0332 inertia_zz=0.1337
        meshes=femur_r.vtp
      WeldJoint FemurWeldToGround: parent_body=ground location_in_parent=(0 0 0) location=(0.002 0.1715 0)
    Body tibia_1: mass=3.51 mass_center=(0 0 0) inertia_xx=0.0477 inertia_yy=0.0048 inertia_zz=0.0484
        meshes=tibia_r.vtp
      PinJoint knee1: parent_body=femur location_in_parent=(0.0033 -0.4009 0) location=(0 0 0)
        Coordinate knee_angle_1: motion_type=rotational default_value=0 range=(-2.094395 0.3141593) clamped=false
    Body tibia_2: mass=3.51 mass_center=(0 0 0) inertia_xx=0.0477 inertia_yy=0.0048 inertia_zz=0.0484
        meshes=tibia_r.vtp
      PinJoint knee2: parent_body=tibia_1 location_in_parent=(0.0033 -0.4009 0) location=(0 0 0)
        Coordinate knee_angle_2: motion_type=rotational default_value=0 range=(-2.094395 0.3141593) clamped=false
  ForceSet:
    Thelen2003Muscle vas_int_r: max_isometric_force=5000 optimal_fiber_length=0.207 tendon_slack_length=0.316
        pennation_angle_at_optimal=0.05235988 [radians] activation_time_constant=0.01 deactivation_time_constant=0.04
        FmaxTendonStrain=0.033 FmaxMuscleStrain=0.6 KshapeActive=0.5 KshapePassive=4 Af=0.3 Flen=1.8
      PathPoint P1: femur (0.029 -0.1924 0.031)
      PathPoint P2: femur (0.0335 -0.2084 0.0285)
      ConditionalPathPoint P3: femur (0.0343 -0.403 0.0055) range=(-2.61799 -1.42) coordinate=knee_angle_1
      MovingPathPoint P4: tibia_1 (0.0554632 0.0252923 0.0018) x_coordinate=knee_angle_1 y_coordinate=knee_angle_1
          z_coordinate=knee_angle_1
        x_location: SimmSpline: x=(-2.0944 -1.99997 -1.5708 -1.45752 -1.39626 -1.0472 -0.698132 -0.526391 -0.349066 -0.174533 0 0.00017453 0.00034907 0.0279253 0.0872665 0.174533 2.0944)
            y=(0.0082733 0.0106866 0.0202042 0.022353 0.0234583 0.0292715 0.0349465 0.037871 0.0412569 0.0465287 0.0554632 0.0554735 0.0554837 0.0571717 0.061272 0.0684368 0.0648818)
        y_location: SimmSpline: x=(-2.0944 -1.99997 -1.5708 -1.45752 -1.39626 -1.0472 -0.698132 -0.526391 -0.349066 -0.174533 0 0.00017453 0.00034907 0.0279253 0.0872665 0.174533 2.0944)
            y=(0.025599 0.0259487 0.0273124 0.0274796 0.0275151 0.0271363 0.0265737 0.0263073 0.0261187 0.0260129 0.0252923 0.0252911 0.0252898 0.0250526 0.0242191 0.0218288 -0.0685706)
        z_location: SimmSpline: x=(-2.0944 2.0944) y=(0.0018 0.0018)
      MovingPathPoint P5: tibia_2 (0.0554632 0.0252923 0.0018) x_coordinate=knee_angle_2 y_coordinate=knee_angle_2
          z_coordinate=knee_angle_2
        x_location: SimmSpline: x=(-2.0944 -1.99997 -1.5708 -1.45752 -1.39626 -1.0472 -0.698132 -0.526391 -0.349066 -0.174533 0 0.00017453 0.00034907 0.0279253 0.0872665 0.174533 2.0944)
            y=(0.0082733 0.0106866 0.0202042 0.022353 0.0234583 0.0292715 0.0349465 0.037871 0.0412569 0.0465287 0.0554632 0.0554735 0.0554837 0.0571717 0.061272 0.0684368 0.0648818)
        y_location: SimmSpline: x=(-2.0944 -1.99997 -1.5708 -1.45752 -1.39626 -1.0472 -0.698132 -0.526391 -0.349066 -0.174533 0 0.00017453 0.00034907 0.0279253 0.0872665 0.174533 2.0944)
            y=(0.025599 0.0259487 0.0273124 0.0274796 0.0275151 0.0271363 0.0265737 0.0263073 0.0261187 0.0260129 0.0252923 0.0252911 0.0252898 0.0250526 0.0242191 0.0218288 -0.0685706)
        z_location: SimmSpline: x=(-2.0944 2.0944) y=(0.0018 0.0018)
