# OpenSim document version 20001
Model:
  gravity: 0 -9.80665 0
  ForceSet:
    Thelen2003Muscle muscle1: max_isometric_force=1000 optimal_fiber_length=0.1 tendon_slack_length=0.2
        pennation_angle=0 activation_time_constant=0.01 deactivation_time_constant=0.04 Vmax=10 Vmax0=5
        FmaxTendonStrain=0.033 FmaxMuscleStrain=0.6 KshapeActive=0.5 KshapePassive=4 damping=0.05 Af=0.3 Flen=1.8
      PathPoint muscle-on-thigh1: thigh (0.005 -0.2111 0.0234)
      PathPoint muscle-on-shank1: shank (-0.0301 -0.036 0.02943)
  BodySet:
    Body ground: mass=0 mass_center=(0 0 0) inertia_xx=1 inertia_yy=1 inertia_zz=1
    Body thigh: mass=8.806 mass_center=(0 0.5 0) inertia_xx=0.1268 inertia_yy=0.0332 inertia_zz=0.1337
        meshes=femur_r.vtp
      WeldJoint: parent_body=ground location_in_parent=(0 0 0) location=(0.002 0.1715 0)
    Body shank: mass=3.51 mass_center=(0 0 0) inertia_xx=0.0477 inertia_yy=0.0048 inertia_zz=0.0484 meshes=tibia_r.vtp
      BallJoint: parent_body=thigh location_in_parent=(0.0033 -0.4009 0) orientation_in_parent=(0 -1.570796 0)
          location=(0 0 0) orientation=(0 -1.570796 0) use_euler_angles=true
        Coordinate knee_q: motion_type=rotational default_value=0 initial_value=0 range=(-3.141593 0.1570796)
            clamped=false
        Coordinate _coord_1: motion_type=rotational default_value=0 initial_value=0 range=(-999999.9 999999.9)
            clamped=false
        Coordinate _coord_2: motion_type=rotational default_value=0 initial_value=0 range=(-999999.9 999999.9)
            clamped=false
