# OpenSim document version 20001
Model PathOnConstrainedBodyMomentArmTest:
  length_units: meters
  force_units: N
  gravity: 0 -9.80665 0
  ForceSet:
    Thelen2003Muscle vas_int_r: max_isometric_force=1365 optimal_fiber_length=0.087 tendon_slack_length=0.136
        pennation_angle=0.05235988 activation_time_constant=0.01 deactivation_time_constant=0.04 Vmax=10 Vmax0=5
        FmaxTendonStrain=0.033 FmaxMuscleStrain=0.6 KshapeActive=0.5 KshapePassive=4 damping=0.05 Af=0.3 Flen=1.8
      PathPoint P1: femur_r (0.029 -0.1924 0.031)
      PathPoint P2: femur_r (0.0335 -0.2084 0.0285)
      ConditionalPathPoint P3: femur_r (0.0343 -0.403 0.0055) range=(-2.617994 -1.42) coordinate=knee_angle_r
      PathPoint P4: patella_r (0.0058 0.048 -0.0006)
  BodySet:
    Body ground: mass=0 mass_center=(0 0 0) inertia_xx=0 inertia_yy=0 inertia_zz=0
    Body femur_r: mass=9.3014 mass_center=(0 -0.17 0) inertia_xx=0.1339 inertia_yy=0.0351 inertia_zz=0.1412
        meshes=femur.vtp
      WeldJoint hip_r: parent_body=ground location_in_parent=(0 0 0) location=(0 0 0)
    Body tibia_r: mass=3.6075 mass_center=(0 -0.187 0) inertia_xx=0.0504 inertia_yy=0.0051 inertia_zz=0.0511
        meshes=(tibia.vtp fibula.vtp)
      CustomJoint knee_r: parent_body=femur_r location_in_parent=(0 0 0) location=(0 0 0)
        Coordinate knee_angle_r: motion_type=rotational default_value=0 initial_value=0 range=(-2.094395 0.1745329)
            clamped=true
        Coordinate tib_tx_r: motion_type=translational default_value=-0.004499856 initial_value=-0.004499856
            range=(-5 5) clamped=false
        Coordinate tib_ty_r: motion_type=translational default_value=-0.3958207 initial_value=-0.3958207 range=(-1 2)
            clamped=false
        SpatialTransform: axes_held_at_zero=(rotation2 rotation3 translation3)
          TransformAxis rotation1: coordinates=knee_angle_r axis=(0 0 1) LinearFunction(coefficients=1 0)
          TransformAxis translation1: coordinates=tib_tx_r axis=(1 0 0) LinearFunction(coefficients=1 0)
          TransformAxis translation2: coordinates=tib_ty_r axis=(0 1 0) LinearFunction(coefficients=1 0)
    Body patella_r: mass=0.1 mass_center=(0 0 0) inertia_xx=0.001 inertia_yy=0.001 inertia_zz=0.001 meshes=pat.vtp
      CustomJoint tib_pat_r: parent_body=tibia_r location_in_parent=(0 0 0) location=(0 0 0)
        Coordinate pat_angle_r: motion_type=rotational default_value=-0.001169164 initial_value=-0.001169164
            range=(-2.094 0.175) clamped=false
        Coordinate pat_tx_r: motion_type=translational default_value=0.0496 initial_value=0.0496 range=(-5 5)
            clamped=false
        Coordinate pat_ty_r: motion_type=translational default_value=-0.0227 initial_value=-0.0227 range=(-5 5)
            clamped=false
        SpatialTransform: axes_held_at_zero=(rotation2 rotation3 translation3)
          TransformAxis rotation1: coordinates=pat_angle_r axis=(0 0 1) LinearFunction(coefficients=1 0)
          TransformAxis translation1: coordinates=pat_tx_r axis=(1 0 0) LinearFunction(coefficients=1 0)
          TransformAxis translation2: coordinates=pat_ty_r axis=(0 1 0) LinearFunction(coefficients=1 0)
  ConstraintSet:
    CoordinateCouplerConstraint [values shared by the 5 below unless stated]: independent_coordinate_names=knee_angle_r
        scale_factor=1
    CoordinateCouplerConstraint knee_tx_r: dependent_coordinate_name=tib_tx_r
      coupled_coordinates_function: NaturalCubicSpline: x=(-2.094395 -1.745329 -1.396263 -1.047198 -0.6981317 -0.3490659 -0.1745329 0.1973442 0.337395 0.4901776 1.52146 2.094395)
          y=(-0.0032 0.00179 0.00411 0.0041 0.00212 -0.001 -0.0031 -0.005227 -0.005435 -0.005574 -0.005435 -0.00525)
    CoordinateCouplerConstraint knee_ty_r: dependent_coordinate_name=tib_ty_r
      coupled_coordinates_function: NaturalCubicSpline: x=(-2.094395 -1.22173 -0.5235988 -0.3490659 -0.1745329 0.1591486 2.094395)
          y=(-0.4226 -0.4082 -0.399 -0.3976 -0.3966 -0.395264 -0.396)
    CoordinateCouplerConstraint pat_tx_r: dependent_coordinate_name=pat_tx_r
      coupled_coordinates_function: NaturalCubicSpline: x=(-2.094395 -1.396263 -1.047198 -0.6981317 -0.3490659 -0.1745329 0 0.00017453 0.00034907 0.08726646 2.094395)
          y=(0.0173 0.0324 0.0381 0.043 0.0469 0.0484 0.0496 0.0496 0.0496 0.0496 0.0496)
    CoordinateCouplerConstraint pat_ty_r: dependent_coordinate_name=pat_ty_r
      coupled_coordinates_function: NaturalCubicSpline: x=(-2.094395 -1.570796 -1.396263 -1.047198 -0.6981317 -0.3490659 -0.1745329 0 0.00017453 0.00034907 0.08726646 2.094395)
          y=(-0.0219 -0.0202 -0.02 -0.0204 -0.0211 -0.0219 -0.0223 -0.0227 -0.0227 -0.0227 -0.0227 -0.0227)
    CoordinateCouplerConstraint pat_angle_r: dependent_coordinate_name=pat_angle_r
      coupled_coordinates_function: NaturalCubicSpline: x=(-2.094395 -1.999973 -1.457524 -0.5263913 0.02792527 0.1745329)
          y=(0.3080506 0.3080506 0.3063053 0.270177 -0.03700098 -0.2799508)
