# OpenSim document version 20001
Model WrapPathCustomJointMomentArmTest:
  gravity: 0 -9.8 0
  ForceSet:
    Thelen2003Muscle vas_int_r: max_isometric_force=5000 optimal_fiber_length=0.207 tendon_slack_length=0.316
        pennation_angle=0.05235988 activation_time_constant=0.01 deactivation_time_constant=0.04 Vmax=10 Vmax0=5
        FmaxTendonStrain=0.033 FmaxMuscleStrain=0.6 KshapeActive=0.5 KshapePassive=4 damping=0.05 Af=0.3 Flen=1.8
      PathPoint P1: femur_r (0.029 -0.1924 0.031)
      PathPoint P2: femur_r (0.0335 -0.2084 0.0285)
      PathPoint P4: tibia_r (0.04246158 -0.05572212 0.0009081754)
      PathWrap: wrap_object=KneeWrap method=hybrid
  BodySet:
    Body ground: mass=0 mass_center=(0 0 0) inertia_xx=1 inertia_yy=1 inertia_zz=1
    Body femur_r: mass=8.806 mass_center=(0 0.5 0) inertia_xx=0.1268 inertia_yy=0.0332 inertia_zz=0.1337
        meshes=femur_r.vtp
      WeldJoint: parent_body=ground location_in_parent=(0 0 0) location=(0.002 0.1715 0)
      WrapCylinder KneeWrap: translation=(0.01 -0.4 0) quadrant=x radius=0.04 length=0.05
    Body tibia_r: mass=3.7075 mass_center=(0 -0.1867 0) inertia_xx=0.0504 inertia_yy=0.0051 inertia_zz=0.0511
        meshes=(tibia.vtp fibula.vtp)
      CustomJoint knee_r: parent_body=femur_r location_in_parent=(0 0 0) location=(0 0 0)
        Coordinate knee_angle_r: motion_type=rotational default_value=0.1745329 initial_value=0.1745329
            range=(-2.094395 0.1745329) clamped=false
        SpatialTransform: axes_held_at_zero=(rotation2 rotation3 translation3)
          TransformAxis rotation1: coordinates=knee_angle_r axis=(0 0 1) LinearFunction(coefficients=1 0)
          TransformAxis translation1: coordinates=knee_angle_r axis=(1 0 0)
            NaturalCubicSpline: x=(-2.094395 -1.745329 -1.396263 -1.047198 -0.6981317 -0.3490659 -0.1745329 0.1973442 0.337395 0.4901776 1.52146 2.094395)
                y=(-0.0032 0.00179 0.00411 0.0041 0.00212 -0.001 -0.0031 -0.005227 -0.005435 -0.005574 -0.005435 -0.00525)
          TransformAxis translation2: coordinates=knee_angle_r axis=(0 1 0)
            NaturalCubicSpline: x=(-2.094395 -1.22173 -0.5235988 -0.3490659 -0.1745329 0.1591486 2.094395)
                y=(-0.4226 -0.4082 -0.399 -0.3976 -0.3966 -0.395264 -0.396)
