# OpenSim document version 30501
Model double_pendulum:
  gravity: 0 -9.80665 0
  credits: Ajay Seth
  publications: For testing
  length_units: meters
  force_units: N
  BodySet:
    Body rod1: mass=1 [kg] mass_center=(0 0.2 0) inertia=(0 0 0 0 0 0) meshes=(cylinder.vtp sphere.vtp)
    Body rod2: mass=1 mass_center=(0 0 0) inertia=(0 0 0 0 0 0) meshes=(cylinder.vtp sphere.vtp)
  JointSet:
    PinJoint pin1: location_in_parent=(0 0 0) location_in_child=(0 0.5 0) orientation_in_child=(0 0 0) [radians]
      connectors: parent_body=../ground child_body=../rod1
      Coordinate q1: motion_type=rotational default_value=-0.7853982 range=(-1.570796 1.570796) clamped=false
    PinJoint pin2: location_in_parent=(0 0 0) location_in_child=(0 0.5 0) orientation_in_child=(0 0 0)
      connectors: parent_body=rod1 child_body=rod2
      Coordinate q2: motion_type=rotational default_value=-1.047198 range=(-1.570796 1.570796) clamped=false
