# OpenSim document version 20200
Model:
  length_units: meters
  force_units: N
  gravity: 0 -9.8065 0
  ForceSet:
    ElasticFoundationForce contact: transition_velocity=0.1
      ContactParametersSet:
        ContactParameters: geometry=(sphere floor) stiffness=10000 dissipation=0.75 static_friction=0.3
            dynamic_friction=0.3 viscous_friction=0.3
  BodySet:
    Body ground: mass=0 mass_center=(0 0 0) inertia_xx=0 inertia_yy=0 inertia_zz=0
    Body ball: mass=1 mass_center=(0 0 0) inertia_xx=1 inertia_yy=1 inertia_zz=1
      FreeJoint ground_ball: parent_body=ground location_in_parent=(0 0 0) location=(0 0 0) use_euler_angles=true
        Coordinate ball_rx: motion_type=rotational default_value=0 initial_value=0 range=(-1.570796 1.570796)
            clamped=false
        Coordinate ball_ry: motion_type=rotational default_value=0 initial_value=0 range=(-1.570796 1.570796)
            clamped=false
        Coordinate ball_rz: motion_type=rotational default_value=0 initial_value=0 range=(-1.570796 1.570796)
            clamped=false
        Coordinate ball_tx: motion_type=translational default_value=0 initial_value=0 range=(-5 5) clamped=false
        Coordinate ball_ty: motion_type=translational default_value=0 initial_value=0 range=(-1 2) clamped=false
        Coordinate ball_tz: motion_type=translational default_value=0 initial_value=0 range=(-3 3) clamped=false
  ContactGeometrySet:
    ContactHalfSpace floor: body_name=ground location=(0 0 0) orientation=(0 0 -1.570796)
    ContactMesh sphere: body_name=ball location=(0 0 0) filename=sphere.obj
