# OpenSim document version 40600
Model:
  Station p1_in_pof1: pof1 (0.06 0 0)
  Station p2_in_pof2: pof2 (0.06 0 0)
  Station p3_in_pof3: pof3 (0.06 0 0)
  StationDefinedFrame parent_sdf: socket_point_a=/p1_in_pof1 socket_point_b=/p2_in_pof2 socket_point_c=/p3_in_pof3
      socket_origin_point=/p2_in_pof2 ab_axis=z ab_x_ac_axis=x
  Station p3_in_child_body: child_body (-0.05 0 0.05)
  Station p1_in_child_pof1: child_pof1
  Station p2_in_child_pof2: child_pof2
  Station porigin_in_child_body: child_body (-0.002732514 0.1099469 -0.03909056)
  StationDefinedFrame child_sdf: socket_point_a=/p1_in_child_pof1 socket_point_b=/p2_in_child_pof2
      socket_point_c=/p3_in_child_body socket_origin_point=/porigin_in_child_body
  PhysicalOffsetFrame ground_offset2: socket_parent=/jointset/freejoint/ground_offset
      translation=(0 0.1318485 0.1832045) [meters]
  Ground
  BodySet:
    Body root_body: mass=1 [kg] mass_center=(0 0 0) inertia=(1 1 1 0 0 0)
      PhysicalOffsetFrame pof1: socket_parent=.. translation=(0 0 0.25)
        Sphere pof1_geom_1: radius=0.06
      PhysicalOffsetFrame pof2: socket_parent=.. translation=(0 -0.25 0)
        Sphere pof2_geom_1: radius=0.06
      PhysicalOffsetFrame pof3: socket_parent=.. translation=(-0.25 0 0)
        Sphere pof3_geom_1: radius=0.06
    Body child_body: mass=1 mass_center=(0.1 0.1 0) inertia=(1 1 1 0 0 0)
      PhysicalOffsetFrame child_pof1: socket_parent=.. translation=(0.1 0 0)
        Brick child_pof1_geom_1: half_lengths=(0.025 0.025 0.025)
      PhysicalOffsetFrame child_pof2: socket_parent=.. translation=(0 0 -0.1)
        Brick child_pof2_geom_1: half_lengths=(0.025 0.025 0.025)
      PhysicalOffsetFrame geom_offset: socket_parent=.. translation=(0 -0.1 0)
        Cylinder geom_offset_geom_1: radius=0.1 half_height=0.1
  JointSet:
    FreeJoint: socket_parent_frame=/ground_offset2 socket_child_frame=root_body_offset
      Coordinate rx: default_value=0 locked=true
      Coordinate ry1: default_value=6.521754
      Coordinate rz: default_value=0 locked=true
      Coordinate tx: default_value=0 locked=true
      Coordinate ty: default_value=1 locked=true
      Coordinate tz: default_value=0 locked=true
      PhysicalOffsetFrame ground_offset: socket_parent=/ground
      PhysicalOffsetFrame root_body_offset: socket_parent=/bodyset/root_body
    FreeJoint freejoint_2: socket_parent_frame=/parent_sdf socket_child_frame=/child_sdf
      Coordinate rx: default_value=0 locked=true
      Coordinate ry2: default_value=0 locked=true
      Coordinate rz: default_value=-0.3519631
      Coordinate tx: default_value=0 locked=true
      Coordinate ty: default_value=-0.435 locked=true
      Coordinate tz: default_value=0 locked=true
