# OpenSim document version 30000
Model knee_patella_ligament:
  credits: Model authors names..
  publications: List of publications related to model...
  length_units: meters
  force_units: N
  gravity: 0 -9.80665 0
  BodySet:
    Body ground: mass=0 mass_center=(0 0 0) inertia_xx=0 inertia_yy=0 inertia_zz=0 meshes=pelvis.vtp
    Body femur_r: mass=9.3014 mass_center=(0 -0.17 0) inertia_xx=0.1339 inertia_yy=0.0351 inertia_zz=0.1412
        meshes=femur_r.vtp
      WeldJoint hip_r: parent_body=ground location_in_parent=(-0.0707 -0.0661 0.0835) location=(0 0 0)
    Body tibia_r: mass=3.7075 mass_center=(0 -0.1867 0) inertia_xx=0.0504 inertia_yy=0.0051 inertia_zz=0.0511
        meshes=(tibia_r.vtp fibula_r.vtp)
      CustomJoint knee_r: parent_body=femur_r location_in_parent=(0 -0.404 0) location=(0 0 0)
        Coordinate knee_angle_r: motion_type=rotational default_value=0 range=(-2.094395 0.1745329) clamped=true
        SpatialTransform: axes_held_at_zero=(rotation2 rotation3 translation3)
          TransformAxis rotation1: coordinates=knee_angle_r axis=(0 0 1) LinearFunction(coefficients=1 0)
          TransformAxis translation1: coordinates=knee_angle_r axis=(1 0 0)
            SimmSpline: x=(-2.0944 -1.74533 -1.39626 -1.0472 -0.698132 -0.349066 -0.174533 0.197344 0.337395 0.490178 1.52146 2.0944)
                y=(-0.0032 0.00179 0.00411 0.0041 0.00212 -0.001 -0.0031 -0.005227 -0.005435 -0.005574 -0.005435 -0.00525)
          TransformAxis translation2: coordinates=knee_angle_r axis=(0 1 0)
            SimmSpline: x=(-2.0944 -1.22173 -0.523599 -0.349066 -0.174533 0.159149 2.0944)
                y=(-0.0186 -0.0042 0.005 0.0064 0.0074 0.0087 0.008)
    Body patella_r: mass=0.1 mass_center=(0 0 0) inertia_xx=0.001 inertia_yy=0.001 inertia_zz=0.001 meshes=pat.vtp
      CustomJoint fem_pat_r: parent_body=femur_r location_in_parent=(0 0 0.0024) location=(0 0 0)
        Coordinate patella_r_constrained_knee_angle: motion_type=rotational default_value=0 range=(-2.094395 0.1745329)
            clamped=true is_free_to_satisfy_constraints=true
        SpatialTransform: axes_held_at_zero=(rotation2 rotation3 translation3)
          TransformAxis rotation1: coordinates=patella_r_constrained_knee_angle axis=(0 0 1)
            SimmSpline: x=(-2.0944 -1.45752 -0.526391 0 0.0523599 0.174533)
                y=(-1.68636 -1.09112 -0.256161 -0.0012 -0.0187016 -0.1054)
          TransformAxis translation1: coordinates=patella_r_constrained_knee_angle axis=(1 0 0)
            SimmSpline: x=(-2.0944 -1.91986 -1.5708 -1.39626 -1.0472 -0.698132 -0.349066 -0.174533 0 0.0872665 0.174533 2.0944)
                y=(-0.03082 -0.02767 -0.01694 -0.00996 0.00548 0.0215 0.03599 0.04069 0.0451 0.04648 0.04761 0.04648)
          TransformAxis translation2: coordinates=patella_r_constrained_knee_angle axis=(0 1 0)
            SimmSpline: x=(-2.0944 -1.91986 -1.5708 -1.39626 -1.0472 -0.698132 -0.349066 -0.174533 0 0.0872665 0.174533 2.0944)
                y=(-0.42663 -0.43292 -0.44314 -0.44644 -0.44869 -0.44463 -0.43373 -0.42697 -0.41852 -0.41379 -0.40896 -0.41379)
  ConstraintSet:
    ConstantDistanceConstraint patellar_ligament_r: body_1=patella_r body_2=tibia_r
        location_body_1=(0.0021 0.0015 0.0001) location_body_2=(0.039 -0.0822 0) constant_distance=0.0635
  MarkerSet:
    Marker patella: patella_r (0.005 0.00247 0)
    Marker tib_tuberosity: tibia_r (0.03789 -0.07142 0.00066)
