# OpenSim document version 20001
Model Arnold2010_pelvisFixed:
  credits: Arnold, E.M., Ward, S.R., Lieber, R. L., and Delp, S.L.
  length_units: meters
  force_units: N
  gravity: 0 -9.80665 0
  publications:
    Arnold, E.M., Ward, S.R., Lieber, R. L., and Delp, S.L., A model of the lower limb for analysis of human movement, Annals of Biomedical Engineering, 2009, DOI: 10.1007/s10439-009-9852-5
    DETAILED COMMENTS AND REFERENCES FOR USE WITH THE 7 SEGMENT KINEMATIC MODEL OF THE LOWER LIMB CREATED BY EDITH M. ARNOLD: Arnoldetal2009OneLeg.osim
    This file contains three options for muscle models:
    Thelen2003Muscle
    Schutte1993Muscle
    Delp1990Muscle
    This musculoskeletal model was Uses the Schutte1993Model because it is similar to the Delp1990Muscle, but should be more stable during ComputedMuscleControl
    The definition of each muscle contains a list of coordinates that describe its line of action and the parameters (peak isometric force, optimal fiber length, tendon slack length, and pennation angle) needed to compute isometric muscle force. Additional parameters can be added to create a dynamics-based muscle model.
    The joint definitions describe the kinematics of a 7 segment, 7 degree-of-freedom model of the pelvis, femur, patella, tibia, calcaneus, talus, and toes.
    The model is a right leg.
    The model represents a nominal adult male, and is based on the lower limb models developed by Delp et al. (1990) and A.S. Arnold (1999).
    It includes the following modifications, relative to the Delp et al. model:
    1. Expanded architecture data
    This architecture of these muscles is based on a study of 21 cadavers by Ward et al. (2009), an improvement over the data by Wickiewicz (1983) Friederich and Brand (1990)which included only 5 total.
    2. Fiber length-joint angle relationship
    Ward et al. explicitly linked measured fiber lengths to joint angles. This allows examination of the fiber length operating range in relation to joint angle.
    3. Experimentally based tendon lengths
    In the Delp model tendon lengths were set so that resultant passive moments matched experimental results. In this model they were set using an experimentally measured relationship between fiber length and joint angle.
    4. Longer plantarflexor fibers
    In the Delp model the fiber lengths of soleus and the gastrocnemii were lengthened beyond the data reported by Wickiewicz et al. This was necessary to achieve physiolgically reasonable results. The plantarflexor fiber lengths measured by Ward et al. were longer and thus lengthening was not necessary.
    5. Walker knee
    In this model, 3D tibiofemoral kinematics are based on experimental data published by Walker et al. (1988) and adapted from a SIMM model by A.S. Arnold et al. (2000) Knee flexion is positive and full extension is 0 degrees.
    Walker, P. S., J. S. Rovick, and D. D. Robertson. The effects of knee brace hinge design and placement on joint mechanics. J. Biomech. 21:965-974, 1988.
    6. Altered wrapping and attachment points
    Wrapping surfaces were added and some attachment points were modified to refine muscle paths and moment arms. Additions are a combination of surfaces adapted from A.S. Arnold et al. (2000) and new surfaces.
    7. Right and left hemipelves and sacrum were re-oriented.
    Adapted from A.S. Arnold et al. (2000)
    In this model, spatial relationships between the hemipelves and sacrum are more consistent with pelves constructed from MR images.
    8. Femur was re-digitized.
    Adapted from A.S. Arnold et al. (2000)
    The femur from Delp's model (Specimen A55, Stanford University) was digitized at higher resolution.
    9. Tibia was replaced.
    Adapted from A.S. Arnold et al. (2000)
    The tibia in Delp's model did not match the Specimen A55 femur.
    The tibia from Specimen A55 was digitized and used in place of the tibia in Delp's model.
    10. Fibula was scaled by 97% and re-oriented.
    Adapted from A.S. Arnold et al. (2000)
    11. Pelvis coordinate system was revised.
    Adapted from A.S. Arnold et al. (2000)
    In this model, the "neutral position" was defined such that the ASISs and pubic tubercle lie in the frontal plane. In Delp's model, the "neutral position" was defined to be coincident with the anatomical position. This difference corresponds to an offset in pelvic tilt and hip flexion angle of about 5 degrees. This may also differ from a gait lab convention and care should be taken to ensure appropriate interpretations according to the convention used.
    JOURNAL ARTICLE REFERENCES
    The model of the lower limb is defined as an input file for OpenSim.
    An overview of this software and its input file structure is given in:
    Delp SL, Anderson FC, Arnold AS, Loan P, Habib A, John CT, Guendelman E, Thelen DG. OpenSim: Open-source Software to Create and Analyze Dynamic Simulations of Movement. IEEE Transactions on Biomedical Engineering 54(11):1940-50, 2007.
    The details of the lower limb model are described in the follow publications:
    Arnold, E.M., Ward, S.R., Lieber, R. L., and Delp, S.L., A model of the lower limb for analysis of human movement, Annals of Biomedical Engineering, 2009, DOI: 10.1007/s10439-009-9852-5
    Arnold, A.S., Asakawa, D.J., and Delp, S.L., Do the hamstrings and adductors contribute to excessive internal rotation of the hip in persons with cerebral palsy? Gait Posture 11:181-90, 2000.
    Delp, S.L., Loan, J.P., Hoy, M.G., Zajac, F.E., Topp E.L., Rosen, J.M., An interactive graphics-based model of the lower extremity to study orthopaedic surgical procedures, IEEE Transactions on Biomedical
    Engineering, vol. 37, pp. 757-767, 1990.
    Delp, Surgery Simulation: A computer graphics system to analyze and design musculoskeletal reconstructions of the lower extremity, Ph.D.
    Dissertation, Stanford University, 1990.
    Ward, S. R., Eng, C.M., Smallwood, L.H., Lieber, R.L.: Are Current Measurements of Lower Extremity Muscle Architecture Accurate? Clin Orthop Relat Res 467:1074-82, 2009.
    Additional information on the model of the lower limb can be obtained by
    contacting Scott L. Delp.
    Bioengineering Department, Stanford University,
    Clark Center, Room S321
    Stanford, California 94305
    http://www.stanford.edu/group/nmbl/
    Additional information on the musculoskeletal modeling software (OpenSim) can be obtained from simtk.org at https://simtk.org/home/opensim
    The muscle model used with the lower limb model is described in the following publications:
    Zajac, Muscle and tendon: Properties, models, scaling, and application to biomechanics and motor control, in CRC reviews in biomedical engineering vol.17, issue 4, pp. 359-411, 1989.
    Delp, S.L. and Loan, J.P.: A software system to develop and analyze models of musculoskeletal structures, Computers in Biology and Medicine, vol. 25, pp. 21-34, 1995.
    Buchanan and Lloyd Passive Curve
    Schutte LM Passive Curve
    REFERENCES FOR THE MUSCLE-TENDON PARAMETERS
    References are given for each musculotendon parameter in Table 1 of
    Arnold, E.M., Ward, S.R., Lieber, R. L., and Delp, S.L., A model of the lower limb for analysis of human movement,
    Annals of Biomedical Engineering, 2009, DOI: 10.1007/s10439-009-9852-5
    LOCATION OF REFERENCE FRAMES
    Each musculotendon path is defined as series of three-dimensional coordinates. Each coordinate is fixed in a body-segmental reference frame. In the anatomical position, the X-axes point anteriorly, the Y-axes point
    superiorly, and the Z-axes point laterally.
    The location of these frames is as follows.
    PELVIS: The pelvic reference frame is fixed at the midpoint of the line connecting the two ASIS.
    FEMUR: The femoral frame is fixed at the center of the femoral head
    TIBIA: The tibial segment is located at the midpoint of the line between the medial and lateral femoral epicondyles.
    PATELLA: The patellar frame is located at the most distal point of the patella.
    TALUS: The talar frame is located at the midpoint of the line between the apeces of the medial and lateral maleoli.
    CALCANUS: The calcaneal frame is located at the most distal, inferior point on the posterior surface of the calcaneus.
    TOES: The toe frame is located at the base of the second metatarsal
    Walker et al. used a different convention for the femur and tibia frame when describing the knee joint. In the anatomical position the X-axis points medially (left), Y-axis points superiorly, Z-axis points anteriorly. These frames are translated to the FEMUR and TIBIA frame via fixed joints.
    FEMUR_WLKR: Located at the midpoint of the line between the medial and lateral femoral epicondyles.
    TIBIA_WLKR: Coincident with FEMUR_WLKR at knee_angle = 0
    SHAFT_AXIS: A fixed reference frame oriented along the line of the femur shaft used to simplify the placement of wrapping surfaces during model development.
  defaults: Schutte1993Muscle default: time_scale=0.1 activation1=7.6 activation2=2.5 max_isometric_force=0
      optimal_fiber_length=0 tendon_slack_length=0 pennation_angle=0 max_contraction_velocity=10 damping=0.05
    tendon_force_length_curve: NaturalCubicSpline: x=(-10 -0.002 -0.001 0 0.00131 0.00281 0.00431 0.00581 0.00731 0.00881 0.0103 0.0118 0.0123 9.2 9.201 9.202 20)
        y=(0 0 0 0 0.0108 0.0257 0.0435 0.0652 0.0915 0.123 0.161 0.208 0.227 345 345 345 345)
    active_force_length_curve: NaturalCubicSpline: x=(-5.307692 -4.307692 -1.923077 -0.884615 -0.269231 0.230769 0.461538 0.52725 0.62875 0.71875 0.86125 1.045 1.2175 1.43875 1.5 1.615385 2 2.961538 3.692308 5.461538 9.901902)
        y=(0.012188 0.021899 0.036466 0.052493 0.075312 0.114158 0.157859 0.226667 0.636667 0.856667 0.95 0.993333 0.77 0.246667 0.193821 0.133252 0.072683 0.044417 0.036341 0.021899 0.007332)
    passive_force_length_curve: NaturalCubicSpline: x=(-5 0.998 0.999 1 1.1 1.2 1.3 1.4 1.5 1.6 1.601 1.602 5)
        y=(0 0 0 0 0.035 0.12 0.26 0.55 1.17 2 2 2 2)
  ForceSet:
    Schutte1993Muscle [values shared by the 6 below unless stated]: time_scale=0.1 activation1=7.6 activation2=2.5
        max_contraction_velocity=10 damping=0.05
      tendon_force_length_curve: NaturalCubicSpline: x=(-10 -0.002 -0.001 0 0.00131 0.00281 0.00431 0.00581 0.00731 0.00881 0.0103 0.0118 0.0123 9.2 9.201 9.202 20)
          y=(0 0 0 0 0.0108 0.0257 0.0435 0.0652 0.0915 0.123 0.161 0.208 0.227 345 345 345 345)
      active_force_length_curve: NaturalCubicSpline: x=(-5.307692 -4.307692 -1.923077 -0.884615 -0.269231 0.230769 0.461538 0.52725 0.62875 0.71875 0.86125 1.045 1.2175 1.43875 1.5 1.615385 2 2.961538 3.692308 5.461538 9.901902)
          y=(0.012188 0.021899 0.036466 0.052493 0.075312 0.114158 0.157859 0.226667 0.636667 0.856667 0.95 0.993333 0.77 0.246667 0.193821 0.133252 0.072683 0.044417 0.036341 0.021899 0.007332)
      passive_force_length_curve: NaturalCubicSpline: x=(-5 0.998 0.999 1 1.1 1.2 1.3 1.4 1.5 1.6 1.601 1.602 5)
          y=(0 0 0 0 0.035 0.12 0.26 0.55 1.17 2 2 2 2)
    Schutte1993Muscle gaslat_r: max_isometric_force=606.4 optimal_fiber_length=0.06562534 tendon_slack_length=0.4263415
        pennation_angle=0.2094395
      PathPoint P1: femur_r (-0.00311121 -0.395538 0.02872681)
      PathPoint P2: calcn_r (0.00442543 0.03117918 -0.00533063)
      PathWrap: wrap_object=Gastroc_at_shank_r method=hybrid
      PathWrap: wrap_object=Gastroc_at_condyles_r method=hybrid
    Schutte1993Muscle gasmed_r: max_isometric_force=1308 optimal_fiber_length=0.05684736 tendon_slack_length=0.4467534
        pennation_angle=0.1727876
      PathPoint P1: femur_r (0.00829655 -0.3928417 -0.02157103)
      PathPoint P2: calcn_r (0.00442543 0.03117918 -0.00533063)
      PathWrap: wrap_object=Gastroc_at_shank_r method=hybrid
      PathWrap: wrap_object=Gastroc_at_condyles_r method=hybrid
    Schutte1993Muscle semimem_r: max_isometric_force=1162.7 optimal_fiber_length=0.07234091
        tendon_slack_length=0.3648498 pennation_angle=0.2635447
      PathPoint P1: pelvis (-0.0976454 -0.1127819 0.06074394)
      PathPoint P2: tibia_r (-0.03228673 -0.04642609 -0.02182138)
      PathWrap: wrap_object=SM_at_condyles_r method=hybrid
    Schutte1993Muscle semiten_r: max_isometric_force=301.9 optimal_fiber_length=0.2041097 tendon_slack_length=0.259103
        pennation_angle=0.2251475
      PathPoint P1: pelvis (-0.1026909 -0.1239612 0.05094973)
      PathPoint P2: tibia_r (-0.03473607 -0.05655745 -0.02549538)
      PathPoint P3: tibia_r (0.00211534 -0.08606084 -0.01302603)
      PathWrap: wrap_object=ST_at_condyles_r method=hybrid
    Schutte1993Muscle bflh_r: max_isometric_force=705.2 optimal_fiber_length=0.102402 tendon_slack_length=0.3378426
        pennation_angle=0.2024582
      PathPoint P1: pelvis (-0.1028888 -0.1178274 0.05797386)
      PathPoint P2: tibia_r (-0.03529274 -0.04731676 0.03707407)
      PathWrap: wrap_object=BFLH_at_gastroc_r method=hybrid
    Schutte1993Muscle bfsh_r: max_isometric_force=315.8 optimal_fiber_length=0.1158942 tendon_slack_length=0.1092747
        pennation_angle=0.2146755
      PathPoint P1: femur_r (0.00518534 -0.2189252 0.02426741)
      PathPoint P2: tibia_r (-0.0335114 -0.04664876 0.03540407)
      PathWrap: wrap_object=BFLH_at_gastroc_r method=hybrid
  BodySet:
    Body ground: mass=0 mass_center=(0 0 0) inertia_xx=0 inertia_yy=0 inertia_zz=0
    Body pelvis: mass=10.30177 mass_center=(-0.06994457 0 0) inertia_xx=0.08801151 inertia_yy=0.07457006
        inertia_zz=0.04957068 meshes=(r_pelvis.vtp l_pelvis.vtp sacrum.vtp)
      WeldJoint ground_pelvis: parent_body=ground location_in_parent=(0 0.95 0) location=(0 0 0)
      WrapEllipsoid PS_at_brim_r: translation=(-0.07894734 -0.06470121 0.06489907) quadrant=all
          dimensions=(0.05144438 0.0486743 0.07024137)
      WrapEllipsoid IL_at_brim_r: translation=(-0.06776808 -0.05510485 0.07479222) quadrant=all
          dimensions=(0.0543134 0.06578945 0.07024137)
      WrapEllipsoid Gmax_at_pelvis_r: xyz_body_rotation=(-0.6370452 0.3836234 -0.6848672)
          translation=(-0.07865055 -0.08161849 0.06578945) quadrant=all dimensions=(0.0395726 0.0395726 0.0593589)
      WrapEllipsoid PS_at_brim_l: translation=(-0.07894734 -0.06470121 -0.06489907) quadrant=all
          dimensions=(0.05144438 0.0486743 0.07024137)
      WrapEllipsoid IL_at_brim_l: translation=(-0.06776808 -0.05510485 -0.07479222) quadrant=all
          dimensions=(0.0543134 0.06578945 0.07024137)
      WrapEllipsoid Gmax_at_pelvis_l: xyz_body_rotation=(0.6370452 -0.3836234 -0.6848672)
          translation=(-0.07865055 -0.08161849 -0.06578945) quadrant=all dimensions=(0.0395726 0.0395726 0.0593589)
    Body femur_r: mass=8.136271 mass_center=(0 -0.1763017 0) inertia_xx=0.1259716 inertia_yy=0.03302169
        inertia_zz=0.1328394 meshes=r_femur.vtp
      CustomJoint hip_r: parent_body=pelvis location_in_parent=(-0.05567469 -0.07765134 0.07643448) location=(0 0 0)
        Coordinate hip_flexion_r: motion_type=rotational default_value=-0.02813802 initial_value=-0.02813802
            range=(-0.5235988 2.094395) clamped=true
        Coordinate hip_adduction_r: motion_type=rotational default_value=-0.02970323 initial_value=-0.02970323
            range=(-0.8726646 0.5235988) clamped=true
        Coordinate hip_rotation_r: motion_type=rotational default_value=-0.00618763 initial_value=-0.00618763
            range=(-0.6981317 0.6981317) clamped=true
        SpatialTransform: axes_held_at_zero=(translation1 translation2 translation3)
          TransformAxis rotation1: coordinates=hip_flexion_r axis=(0 0 1)
            NaturalCubicSpline: x=(-6.283185 6.283185) y=(-6.283185 6.283185)
          TransformAxis rotation2: coordinates=hip_adduction_r axis=(1 0 0)
            NaturalCubicSpline: x=(-6.283185 6.283185) y=(-6.283185 6.283185)
          TransformAxis rotation3: coordinates=hip_rotation_r axis=(0 1 0)
            NaturalCubicSpline: x=(-6.283185 6.283185) y=(-6.283185 6.283185)
      WrapEllipsoid Gastroc_at_condyles_r: xyz_body_rotation=(0.05899213 -0.09372418 0.02321288)
          translation=(0.00497793 -0.4226055 0.00031112) quadrant=all dimensions=(0.03111206 0.02592672 0.05185344)
    Body femur_wlkr_r: mass=0 mass_center=(0 0 0) inertia_xx=0 inertia_yy=0 inertia_zz=0
      WeldJoint femur_coord_r: parent_body=femur_r location_in_parent=(-0.00838989 -0.4230826 -0.00285194)
          orientation_in_parent=(-1.641568 1.446181 1.570796) location=(0 0 0)
    Body tibia_wlkr_r: mass=0 mass_center=(0 0 0) inertia_xx=0 inertia_yy=0 inertia_zz=0
      CustomJoint walker_knee_r: parent_body=femur_wlkr_r location_in_parent=(0 0 0) location=(0 0 0)
        Coordinate knee_angle_r: motion_type=rotational default_value=0.0174521 initial_value=0.0174521
            range=(0 2.094395) clamped=true
        SpatialTransform: axes_held_at_zero=translation3
          TransformAxis rotation1: coordinates=knee_angle_r axis=(1 0 0) LinearFunction(coefficients=1 0)
          TransformAxis rotation2: coordinates=knee_angle_r axis=(0 0 1)
            NaturalCubicSpline: x=(0 0.1745329 0.3490659 0.5235988 0.6981317 0.8726646 1.047198 1.22173 1.396263 1.570796 1.745329 1.919862 2.094395)
                y=(0 0.01268093 0.02269692 0.02960539 0.03320492 0.0335354 0.03087791 0.02575478 0.01892953 0.01140698 0.00443314 -0.00050475 -0.0016782)
          TransformAxis rotation3: coordinates=knee_angle_r axis=(0 1 0)
            NaturalCubicSpline: x=(0 0.1745329 0.3490659 0.5235988 0.6981317 0.8726646 1.047198 1.22173 1.396263 1.570796 1.745329 1.919862 2.094395)
                y=(0 0.05946103 0.1093995 0.1506181 0.1839197 0.2101071 0.229983 0.2443502 0.2540116 0.2597698 0.2624277 0.262788 0.2616536)
          TransformAxis translation1: coordinates=knee_angle_r axis=(0 1 0)
            MultiplierFunction: scale=1.037069
              NaturalCubicSpline: x=(0 0.1745329 0.3490659 0.5235988 0.6981317 0.8726646 1.047198 1.22173 1.396263 1.570796 1.745329 1.919862 2.094395)
                  y=(0 0.000479 0.000835 0.001086 0.001251 0.001346 0.001391 0.001403 0.0014 0.0014 0.001421 0.001481 0.001599)
          TransformAxis translation2: coordinates=knee_angle_r axis=(0 0 1)
            MultiplierFunction: scale=1.037069
              NaturalCubicSpline: x=(0 0.1745329 0.3490659 0.5235988 0.6981317 0.8726646 1.047198 1.22173 1.396263 1.570796 1.745329 1.919862 2.094395)
                  y=(0 0.000988 0.001899 0.002734 0.003492 0.004173 0.004777 0.005305 0.005756 0.00613 0.006427 0.006648 0.006792)
    Body tibia_r: mass=3.243084 mass_center=(0 -0.2078598 0) inertia_xx=0.05464618 inertia_yy=0.00552967
        inertia_zz=0.05540515 meshes=(r_tibialoan.vtp r_fibula.vtp)
      WeldJoint tibia_coord_r: parent_body=tibia_wlkr_r location_in_parent=(-0.00192718 0.00265976 0.00940991)
          orientation_in_parent=(1.695412 -1.500024 1.570796) location=(0 0 0)
      WrapEllipsoid GR_at_condyles_r: xyz_body_rotation=(0 0 -0.1832596) translation=(0 0 0) quadrant=all
          dimensions=(0.04008008 0.07069681 0.05934078)
      WrapEllipsoid SM_at_condyles_r: xyz_body_rotation=(0 0 -0.296706) translation=(0 0 0) quadrant=all
          dimensions=(0.03918941 0.0670228 0.05444211)
      WrapEllipsoid ST_at_condyles_r: xyz_body_rotation=(0 0 -0.270526) translation=(0 0 0) quadrant=all
          dimensions=(0.04731676 0.07682015 0.06368279)
      WrapEllipsoid BFLH_at_gastroc_r: xyz_body_rotation=(0 0 0.270526)
          translation=(-0.06891547 -0.05566678 0.00077933) quadrant=y dimensions=(0.03729674 0.02226671 0.09274085)
      WrapCylinder Gastroc_at_shank_r: xyz_body_rotation=(2.967234 0.02897247 -1.478119)
          translation=(-0.00823868 -0.08238683 -0.00367401) quadrant=-y radius=0.06123346 length=0.1113336
    Body shaft_axis_r: mass=0 mass_center=(0 0 0) inertia_xx=0 inertia_yy=0 inertia_zz=0
      WeldJoint femoral_shaft_r: parent_body=femur_r location_in_parent=(-0.01583604 -0.03569591 0.03603814)
          orientation_in_parent=(0.1117011 0 0.03665191) location=(0 0 0)
      WrapEllipsoid AB_at_femshaft_r: xyz_body_rotation=(0 0 0.1396263) translation=(0.02779344 -0.0874249 0)
          quadrant=all dimensions=(0.01711163 0.07259482 0.02177844)
      WrapEllipsoid AL_at_femshaft_r: xyz_body_rotation=(0 0 0.01745329) translation=(0.04003086 -0.214051 0)
          quadrant=all dimensions=(0.02084508 0.1037069 0.01866724)
      WrapEllipsoid AMprox_at_femshaft_r: xyz_body_rotation=(0 0 0.1745329) translation=(0.02043026 -0.04583844 0)
          quadrant=all dimensions=(0.02188215 0.07259482 0.0331862)
      WrapEllipsoid AMmid_at_femshaft_r: xyz_body_rotation=(0 0 0.08726646) translation=(0.03484551 -0.1331596 0)
          quadrant=all dimensions=(0.02219327 0.1244482 0.03214913)
      WrapEllipsoid AMdist_at_femshaft_r: xyz_body_rotation=(0 0 0.1396263) translation=(0.03899379 -0.2377999 0)
          quadrant=all dimensions=(0.0226081 0.2074138 0.02229698)
      WrapEllipsoid AMisch_at_condyles_r: xyz_body_rotation=(0 0 -0.4712389) translation=(-0.02696379 -0.3567517 0)
          quadrant=all dimensions=(0.05185344 0.2488965 0.04169017)
      WrapEllipsoid PECT_at_femshaft_r: xyz_body_rotation=(0 0 0.1745329) translation=(0.02177844 -0.05392758 0)
          quadrant=all dimensions=(0.01721534 0.05185344 0.0135856)
      WrapCylinder KnExt_at_fem_r: xyz_body_rotation=(-0.1720895 0.05707227 -0.9286897)
          translation=(0.00549646 -0.3838192 0.00891879) quadrant=all radius=0.02592672 length=0.1037069
    Body patella_r: mass=0.07540226 mass_center=(0.00186672 0.02737862 0) inertia_xx=0.0000027 inertia_yy=0.00001233
        inertia_zz=0.00001233 meshes=r_pat.vtp
      CustomJoint patellofemoral_r: parent_body=femur_r location_in_parent=(0 0 0) location=(0 0 0)
        Coordinate patellofemoral_r_r3: motion_type=rotational default_value=0.00575363 initial_value=0.00575363
            range=(-99999.9 99999.9) clamped=false
        Coordinate patellofemoral_r_tx: motion_type=translational default_value=0.0440483 initial_value=0.0440483
            range=(-99999.9 99999.9) clamped=false
        Coordinate patellofemoral_r_ty: motion_type=translational default_value=-0.4195724 initial_value=-0.4195724
            range=(-99999.9 99999.9) clamped=false
        SpatialTransform: axes_held_at_zero=(rotation2 rotation3 translation3)
          TransformAxis rotation1: coordinates=patellofemoral_r_r3 axis=(0 0 1) LinearFunction(coefficients=1 0)
          TransformAxis translation1: coordinates=patellofemoral_r_tx axis=(1 0 0)
              MultiplierFunction(scale=1.037069, LinearFunction(coefficients=1 0))
          TransformAxis translation2: coordinates=patellofemoral_r_ty axis=(0 1 0)
              MultiplierFunction(scale=1.037069, LinearFunction(coefficients=1 0))
    Body talus_r: mass=0.08747362 mass_center=(0 0 0) inertia_xx=0.00108425 inertia_yy=0.00108425 inertia_zz=0.00108425
        meshes=talus_r.vtp
      CustomJoint ankle_r: parent_body=tibia_r location_in_parent=(-0.01113336 -0.4453342 0) location=(0 0 0)
        Coordinate ankle_angle_r: motion_type=rotational default_value=0.08907536 initial_value=0.08907536
            range=(-0.6981317 0.5235988) clamped=true
        SpatialTransform: axes_held_at_zero=(rotation2 rotation3 translation1 translation2 translation3)
          TransformAxis rotation1: coordinates=ankle_angle_r axis=(-0.105014 -0.1740221 0.9791263)
            NaturalCubicSpline: x=(-6.283185 6.283185) y=(-6.283185 6.283185)
    Body calcn_r: mass=1.09342 mass_center=(0.100578 0.0301734 0) inertia_xx=0.00123883 inertia_yy=0.00345102
        inertia_zz=0.003628 meshes=r_foot.vtp
      CustomJoint subtalar_r: parent_body=talus_r location_in_parent=(-0.05429737 -0.04670443 0.00881762)
          location=(0 0 0)
        Coordinate subtalar_angle_r: motion_type=rotational default_value=0 initial_value=0
            range=(-0.3490659 0.3490659) clamped=false locked=true
        SpatialTransform: axes_held_at_zero=(rotation2 rotation3 translation1 translation2 translation3)
          TransformAxis rotation1: coordinates=subtalar_angle_r axis=(0.78718 0.604747 -0.120949)
            NaturalCubicSpline: x=(-6.283185 6.283185) y=(-6.283185 6.283185)
    Body toes_r: mass=0.1894679 mass_center=(0.03479999 0.00603468 -0.01760115) inertia_xx=0.00008849
        inertia_yy=0.00017698 inertia_zz=0.00088488 meshes=r_bofoot.vtp
      CustomJoint mtp_r: parent_body=calcn_r location_in_parent=(0.1798335 -0.00201156 0.00108624) location=(0 0 0)
        Coordinate mtp_angle_r: motion_type=rotational default_value=0 initial_value=0 range=(-0.5235988 0.5235988)
            clamped=false locked=true
        SpatialTransform: axes_held_at_zero=(rotation2 rotation3 translation1 translation2 translation3)
          TransformAxis rotation1: coordinates=mtp_angle_r axis=(0.5809542 0 -0.8139363)
            NaturalCubicSpline: x=(-6.283185 6.283185) y=(-6.283185 6.283185)
    Body femur_l: mass=8.136271 mass_center=(0 -0.1763017 0) inertia_xx=0.1259716 inertia_yy=0.03302169
        inertia_zz=0.1328394 meshes=l_femur.vtp
      CustomJoint hip_l: parent_body=pelvis location_in_parent=(-0.05567469 -0.07765134 -0.07643448) location=(0 0 0)
        Coordinate hip_flexion_l: motion_type=rotational default_value=-0.01031992 initial_value=-0.01031992
            range=(-0.5235988 2.094395) clamped=true
        Coordinate hip_adduction_l: motion_type=rotational default_value=-0.07259825 initial_value=-0.07259825
            range=(-0.8726646 0.5235988) clamped=true
        Coordinate hip_rotation_l: motion_type=rotational default_value=-0.04456054 initial_value=-0.04456054
            range=(-0.6981317 0.6981317) clamped=true
        SpatialTransform: axes_held_at_zero=(translation1 translation2 translation3)
          TransformAxis rotation1: coordinates=hip_flexion_l axis=(0 0 1) LinearFunction(coefficients=1 0)
          TransformAxis rotation2: coordinates=hip_adduction_l axis=(1 0 0)
            NaturalCubicSpline: x=(-6.283185 6.283185) y=(6.283185 -6.283185)
          TransformAxis rotation3: coordinates=hip_rotation_l axis=(0 1 0)
            NaturalCubicSpline: x=(-6.283185 6.283185) y=(6.283185 -6.283185)
      WrapEllipsoid Gastroc_at_condyles_l: xyz_body_rotation=(-0.05899213 0.09372418 0.02321288)
          translation=(0.00497793 -0.4226055 -0.00031112) quadrant=all dimensions=(0.03111206 0.02592672 0.05185344)
    Body femur_wlkr_l: mass=0 mass_center=(0 0 0) inertia_xx=0 inertia_yy=0 inertia_zz=0
      WeldJoint femur_coord_l: parent_body=femur_l location_in_parent=(-0.00838989 -0.4230826 0.00285194)
          orientation_in_parent=(1.641568 -1.446181 1.570796) location=(0 0 0)
    Body tibia_wlkr_l: mass=0 mass_center=(0 0 0) inertia_xx=0 inertia_yy=0 inertia_zz=0
      CustomJoint walker_knee_l: parent_body=femur_wlkr_l location_in_parent=(0 0 0) location=(0 0 0)
        Coordinate knee_angle_l: motion_type=rotational default_value=0.07473536 initial_value=0.07473536
            range=(0 2.094395) clamped=true
        SpatialTransform: axes_held_at_zero=translation3
          TransformAxis rotation1: coordinates=knee_angle_l axis=(1 0 0)
            NaturalCubicSpline: x=(-6.283185 6.283185) y=(6.283185 -6.283185)
          TransformAxis rotation2: coordinates=knee_angle_l axis=(0 0 1)
            NaturalCubicSpline: x=(0 0.1745329 0.3490659 0.5235988 0.6981317 0.8726646 1.047198 1.22173 1.396263 1.570796 1.745329 1.919862 2.094395)
                y=(0 0.01268093 0.02269692 0.02960539 0.03320492 0.0335354 0.03087791 0.02575478 0.01892953 0.01140698 0.00443314 -0.00050475 -0.0016782)
          TransformAxis rotation3: coordinates=knee_angle_l axis=(0 1 0)
            NaturalCubicSpline: x=(0 0.1745329 0.3490659 0.5235988 0.6981317 0.8726646 1.047198 1.22173 1.396263 1.570796 1.745329 1.919862 2.094395)
                y=(0 -0.05946103 -0.1093995 -0.1506181 -0.1839197 -0.2101071 -0.229983 -0.2443502 -0.2540116 -0.2597698 -0.2624277 -0.262788 -0.2616536)
          TransformAxis translation1: coordinates=knee_angle_l axis=(0 1 0)
            MultiplierFunction: scale=1.037069
              NaturalCubicSpline: x=(0 0.1745329 0.3490659 0.5235988 0.6981317 0.8726646 1.047198 1.22173 1.396263 1.570796 1.745329 1.919862 2.094395)
                  y=(0 0.000479 0.000835 0.001086 0.001251 0.001346 0.001391 0.001403 0.0014 0.0014 0.001421 0.001481 0.001599)
          TransformAxis translation2: coordinates=knee_angle_l axis=(0 0 1)
            MultiplierFunction: scale=1.037069
              NaturalCubicSpline: x=(0 0.1745329 0.3490659 0.5235988 0.6981317 0.8726646 1.047198 1.22173 1.396263 1.570796 1.745329 1.919862 2.094395)
                  y=(0 -0.000988 -0.001899 -0.002734 -0.003492 -0.004173 -0.004777 -0.005305 -0.005756 -0.00613 -0.006427 -0.006648 -0.006792)
    Body tibia_l: mass=3.243084 mass_center=(0 -0.2078598 0) inertia_xx=0.05464618 inertia_yy=0.00552967
        inertia_zz=0.05540515 meshes=(l_tibialoan.vtp l_fibula.vtp)
      WeldJoint tibia_coord_l: parent_body=tibia_wlkr_l location_in_parent=(-0.00192718 0.00265976 -0.00940991)
          orientation_in_parent=(-1.695412 1.500024 1.570796) location=(0 0 0)
      WrapEllipsoid GR_at_condyles_l: xyz_body_rotation=(0 0 -0.1832596) translation=(0 0 0) quadrant=all
          dimensions=(0.04008008 0.07069681 0.05934078)
      WrapEllipsoid SM_at_condyles_l: xyz_body_rotation=(0 0 -0.296706) translation=(0 0 0) quadrant=all
          dimensions=(0.03918941 0.0670228 0.05444211)
      WrapEllipsoid ST_at_condyles_l: xyz_body_rotation=(0 0 -0.270526) translation=(0 0 0) quadrant=all
          dimensions=(0.04731676 0.07682015 0.06368279)
      WrapEllipsoid BFLH_at_gastroc_l: xyz_body_rotation=(0 0 0.270526)
          translation=(-0.06891547 -0.05566678 -0.00077933) quadrant=y dimensions=(0.03729674 0.02226671 0.09274085)
      WrapCylinder Gastroc_at_shank_l: xyz_body_rotation=(-2.967234 -0.02897247 -1.478119)
          translation=(-0.00823868 -0.08238683 0.00367401) quadrant=-y radius=0.06123346 length=0.1113336
    Body shaft_axis_l: mass=0 mass_center=(0 0 0) inertia_xx=0 inertia_yy=0 inertia_zz=0
      WeldJoint femoral_shaft_l: parent_body=femur_l location_in_parent=(-0.01583604 -0.03569591 -0.03603814)
          orientation_in_parent=(-0.1117011 0 0.03665191) location=(0 0 0)
      WrapEllipsoid AB_at_femshaft_l: xyz_body_rotation=(0 0 0.1396263) translation=(0.02779344 -0.0874249 0)
          quadrant=all dimensions=(0.01711163 0.07259482 0.02177844)
      WrapEllipsoid AL_at_femshaft_l: xyz_body_rotation=(0 0 0.01745329) translation=(0.04003086 -0.214051 0)
          quadrant=all dimensions=(0.02084508 0.1037069 0.01866724)
      WrapEllipsoid AMprox_at_femshaft_l: xyz_body_rotation=(0 0 0.1745329) translation=(0.02043026 -0.04583844 0)
          quadrant=all dimensions=(0.02188215 0.07259482 0.0331862)
      WrapEllipsoid AMmid_at_femshaft_l: xyz_body_rotation=(0 0 0.08726646) translation=(0.03484551 -0.1331596 0)
          quadrant=all dimensions=(0.02219327 0.1244482 0.03214913)
      WrapEllipsoid AMdist_at_femshaft_l: xyz_body_rotation=(0 0 0.1396263) translation=(0.03899379 -0.2377999 0)
          quadrant=all dimensions=(0.0226081 0.2074138 0.02229698)
      WrapEllipsoid AMisch_at_condyles_l: xyz_body_rotation=(0 0 -0.4712389) translation=(-0.02696379 -0.3567517 0)
          quadrant=all dimensions=(0.05185344 0.2488965 0.04169017)
      WrapEllipsoid PECT_at_femshaft_l: xyz_body_rotation=(0 0 0.1745329) translation=(0.02177844 -0.05392758 0)
          quadrant=all dimensions=(0.01721534 0.05185344 0.0135856)
      WrapCylinder KnExt_at_fem_l: xyz_body_rotation=(0.1720895 -0.05707227 0.9286897)
          translation=(0.00549646 -0.3838192 -0.00891879) quadrant=all radius=0.02592672 length=0.1037069
    Body patella_l: mass=0.07540226 mass_center=(0.00186672 0.02737862 0) inertia_xx=0.0000027 inertia_yy=0.00001233
        inertia_zz=0.00001233 meshes=l_pat.vtp
      CustomJoint patellofemoral_l: parent_body=femur_l location_in_parent=(0 0 0) location=(0 0 0)
        Coordinate patellofemoral_l_r3: motion_type=rotational default_value=0.01196087 initial_value=0.01196087
            range=(-99999.9 99999.9) clamped=false
        Coordinate patellofemoral_l_tx: motion_type=translational default_value=0.04295802 initial_value=0.04295802
            range=(-99999.9 99999.9) clamped=false
        Coordinate patellofemoral_l_ty: motion_type=translational default_value=-0.4223461 initial_value=-0.4223461
            range=(-99999.9 99999.9) clamped=false
        SpatialTransform: axes_held_at_zero=(rotation2 rotation3 translation3)
          TransformAxis rotation1: coordinates=patellofemoral_l_r3 axis=(0 0 1) LinearFunction(coefficients=1 0)
          TransformAxis translation1: coordinates=patellofemoral_l_tx axis=(1 0 0)
              MultiplierFunction(scale=1.037069, LinearFunction(coefficients=1 0))
          TransformAxis translation2: coordinates=patellofemoral_l_ty axis=(0 1 0)
              MultiplierFunction(scale=1.037069, LinearFunction(coefficients=1 0))
    Body talus_l: mass=0.08747362 mass_center=(0 0 0) inertia_xx=0.00108425 inertia_yy=0.00108425 inertia_zz=0.00108425
        meshes=l_talus.vtp
      CustomJoint ankle_l: parent_body=tibia_l location_in_parent=(-0.01113336 -0.4453342 0) location=(0 0 0)
        Coordinate ankle_angle_l: motion_type=rotational default_value=0.1258629 initial_value=0.1258629
            range=(-0.6981317 0.5235988) clamped=true
        SpatialTransform: axes_held_at_zero=(rotation2 rotation3 translation1 translation2 translation3)
          TransformAxis rotation1: coordinates=ankle_angle_l axis=(-0.105014 -0.1740221 -0.9791263)
            NaturalCubicSpline: x=(-6.283185 6.283185) y=(6.283185 -6.283185)
    Body calcn_l: mass=1.09342 mass_center=(0.100578 0.0301734 0) inertia_xx=0.00123883 inertia_yy=0.00345102
        inertia_zz=0.003628 meshes=l_foot.vtp
      CustomJoint subtalar_l: parent_body=talus_l location_in_parent=(-0.05429737 -0.04670443 -0.00881762)
          location=(0 0 0)
        Coordinate subtalar_angle_l: motion_type=rotational default_value=0 initial_value=0
            range=(-0.3490659 0.3490659) clamped=false locked=true
        SpatialTransform: axes_held_at_zero=(rotation2 rotation3 translation1 translation2 translation3)
          TransformAxis rotation1: coordinates=subtalar_angle_l axis=(0.78718 0.604747 0.120949)
            NaturalCubicSpline: x=(-6.283185 6.283185) y=(6.283185 -6.283185)
    Body toes_l: mass=0.1894679 mass_center=(0.03479999 0.00603468 0.01760115) inertia_xx=0.00008849
        inertia_yy=0.00017698 inertia_zz=0.00088488 meshes=l_bofoot.vtp
      CustomJoint mtp_l: parent_body=calcn_l location_in_parent=(0.1798335 -0.00201156 -0.00108624) location=(0 0 0)
        Coordinate mtp_angle_l: motion_type=rotational default_value=0 initial_value=0 range=(-0.5235988 0.5235988)
            clamped=false locked=true
        SpatialTransform: axes_held_at_zero=(rotation2 rotation3 translation1 translation2 translation3)
          TransformAxis rotation1: coordinates=mtp_angle_l axis=(0.5809542 0 0.8139363)
            NaturalCubicSpline: x=(-6.283185 6.283185) y=(6.283185 -6.283185)
    Body torso: mass=29.94799 mass_center=(-0.03273154 0.3491365 0) inertia_xx=1.535368 inertia_yy=0.7866871
        inertia_zz=1.490488 meshes=(hat_spine.vtp hat_jaw.vtp hat_skull.vtp hat_ribs.vtp)
      CustomJoint back: parent_body=pelvis location_in_parent=(-0.09962403 0.08062918 0) location=(0 0 0)
        Coordinate lumbar_extension: motion_type=rotational default_value=-0.00185871 initial_value=-0.00185871
            range=(-1.570796 1.570796) clamped=true locked=true
        Coordinate lumbar_bending: motion_type=rotational default_value=-0.00070564 initial_value=-0.00070564
            range=(-1.570796 1.570796) clamped=true locked=true
        Coordinate lumbar_rotation: motion_type=rotational default_value=0.01236527 initial_value=0.01236527
            range=(-1.570796 1.570796) clamped=true locked=true
        SpatialTransform: axes_held_at_zero=(translation1 translation2 translation3)
          TransformAxis rotation1: coordinates=lumbar_extension axis=(0 0 1) LinearFunction(coefficients=1 0)
          TransformAxis rotation2: coordinates=lumbar_bending axis=(1 0 0) LinearFunction(coefficients=1 0)
          TransformAxis rotation3: coordinates=lumbar_rotation axis=(0 1 0) LinearFunction(coefficients=1 0)
  ConstraintSet:
    CoordinateCouplerConstraint patellofemoral_r_r3_con: independent_coordinate_names=knee_angle_r
        dependent_coordinate_name=patellofemoral_r_r3 scale_factor=1
      coupled_coordinates_function: NaturalCubicSpline f11: x=(0 0.1745329 0.3490659 0.5235988 0.6981317 0.8726646 1.047198 1.22173 1.396263 1.570796 1.745329 1.919862 2.094395)
          y=(0.00113686 -0.00629212 -0.1055824 -0.2536831 -0.4142454 -0.5790471 -0.7472436 -0.9179899 -1.090441 -1.263787 -1.43763 -1.611855 -1.786344)
    CoordinateCouplerConstraint patellofemoral_r_tx_con: independent_coordinate_names=knee_angle_r
        dependent_coordinate_name=patellofemoral_r_tx scale_factor=1
      coupled_coordinates_function: NaturalCubicSpline f9: x=(0 0.1745329 0.3490659 0.5235988 0.6981317 0.8726646 1.047198 1.22173 1.396263 1.570796 1.745329 1.919862 2.094395)
          y=(0.04435 0.040692 0.035581 0.029012 0.021473 0.013523 0.005483 -0.002412 -0.009959 -0.016903 -0.022926 -0.027739 -0.030815)
    CoordinateCouplerConstraint patellofemoral_r_ty_con: independent_coordinate_names=knee_angle_r
        dependent_coordinate_name=patellofemoral_r_ty scale_factor=1
      coupled_coordinates_function: NaturalCubicSpline f10: x=(0 0.1745329 0.3490659 0.5235988 0.6981317 0.8726646 1.047198 1.22173 1.396263 1.570796 1.745329 1.919862 2.094395)
          y=(-0.418712 -0.426965 -0.43422 -0.440152 -0.444617 -0.447495 -0.448724 -0.448337 -0.446353 -0.442826 -0.438035 -0.432448 -0.426632)
    CoordinateCouplerConstraint patellofemoral_l_r3_con: independent_coordinate_names=knee_angle_l
        dependent_coordinate_name=patellofemoral_l_r3 scale_factor=1
      coupled_coordinates_function: NaturalCubicSpline f25: x=(0 0.1745329 0.3490659 0.5235988 0.6981317 0.8726646 1.047198 1.22173 1.396263 1.570796 1.745329 1.919862 2.094395)
          y=(0.00113686 -0.00629212 -0.1055824 -0.2536831 -0.4142454 -0.5790471 -0.7472436 -0.9179899 -1.090441 -1.263787 -1.43763 -1.611855 -1.786344)
    CoordinateCouplerConstraint patellofemoral_l_tx_con: independent_coordinate_names=knee_angle_l
        dependent_coordinate_name=patellofemoral_l_tx scale_factor=1
      coupled_coordinates_function: NaturalCubicSpline f23: x=(0 0.1745329 0.3490659 0.5235988 0.6981317 0.8726646 1.047198 1.22173 1.396263 1.570796 1.745329 1.919862 2.094395)
          y=(0.04435 0.040692 0.035581 0.029012 0.021473 0.013523 0.005483 -0.002412 -0.009959 -0.016903 -0.022926 -0.027739 -0.030815)
    CoordinateCouplerConstraint patellofemoral_l_ty_con: independent_coordinate_names=knee_angle_l
        dependent_coordinate_name=patellofemoral_l_ty scale_factor=1
      coupled_coordinates_function: NaturalCubicSpline f24: x=(0 0.1745329 0.3490659 0.5235988 0.6981317 0.8726646 1.047198 1.22173 1.396263 1.570796 1.745329 1.919862 2.094395)
          y=(-0.418712 -0.426965 -0.43422 -0.440152 -0.444617 -0.447495 -0.448724 -0.448337 -0.446353 -0.442826 -0.438035 -0.432448 -0.426632)
  MarkerSet:
    Marker Sternum: torso (0.0923626 0.3476238 0.00005165)
    Marker R.Acromium: torso (-0.05635598 0.4473312 0.1826272)
    Marker L.Acromium: torso (-0.06423205 0.4491075 -0.1588665)
    Marker Top.Head: torso (0.06281597 0.6954805 0.00368527)
    Marker R.ASIS: pelvis (0.02654179 0.0383321 0.1289098)
    Marker L.ASIS: pelvis (0.02148277 0.03533711 -0.1242864)
    Marker V.Sacral: pelvis (-0.1732997 0.02361867 -0.00332804)
    Marker R.Thigh.Upper: femur_r (0.02970828 -0.1996708 0.09312381)
    Marker R.Thigh.Front: femur_r (0.1010222 -0.2547918 0.03012756)
    Marker R.Thigh.Rear: femur_r (0.00479119 -0.2969395 0.08317573)
    Marker R.Knee.Lat: femur_r (-0.00388204 -0.4203153 0.06334474)
    Marker R.Knee.Med: femur_r (0.00374208 -0.4301728 -0.0642919)
    Marker R.Shank.Upper: tibia_r (-0.00435463 -0.08407122 0.07183731)
    Marker R.Shank.Front: tibia_r (0.05135026 -0.1479987 0.0247227)
    Marker R.Shank.Rear: tibia_r (-0.00926515 -0.167975 0.07657896)
    Marker R.Ankle.Lat: tibia_r (-0.01769085 -0.4442341 0.04918984)
    Marker R.Ankle.Med: tibia_r (0.00067737 -0.4273633 -0.03374175)
    Marker R.Heel: calcn_r (-0.016425 0.02008895 -0.00444079)
    Marker R.Midfoot.Sup: calcn_r (0.1267371 0.02161796 -0.03828729)
    Marker R.Midfoot.Lat: calcn_r (0.09761252 0.00809959 0.06006263)
    Marker R.Toe.Lat: calcn_r (0.1920717 -0.00652576 0.07236047)
    Marker R.Toe.Med: calcn_r (0.1968101 -0.00953764 -0.04069329)
    Marker R.Toe.Tip: calcn_r (0.2644943 0.01457035 -0.00295459)
    Marker L.Thigh.Upper: femur_l (0.03834385 -0.1949575 -0.09723291)
    Marker L.Thigh.Front: femur_l (0.1022997 -0.2604133 -0.01945603)
    Marker L.Thigh.Rear: femur_l (0.02500545 -0.3246266 -0.07880259)
    Marker L.Knee.Lat: femur_l (-0.01375597 -0.4131435 -0.06084836)
    Marker L.Knee.Med: femur_l (0.01236449 -0.4279847 0.05774018)
    Marker L.Shank.Upper: tibia_l (-0.02685241 -0.09491013 -0.07546892)
    Marker L.Shank.Front: tibia_l (0.0473652 -0.162663 -0.03274078)
    Marker L.Shank.Rear: tibia_l (-0.03928891 -0.1660866 -0.07843607)
    Marker L.Ankle.Lat: tibia_l (-0.01668725 -0.4431475 -0.04782014)
    Marker L.Ankle.Med: tibia_l (0.00392065 -0.4304301 0.04109351)
    Marker L.Heel: calcn_l (-0.01910456 0.01653451 -0.00374123)
    Marker L.Midfoot.Sup: calcn_l (0.1216321 0.01748136 0.04262875)
    Marker L.Midfoot.Lat: calcn_l (0.1100128 -0.00134478 -0.05864401)
    Marker L.Toe.Lat: calcn_l (0.1885012 -0.0178527 -0.07344053)
    Marker L.Toe.Med: calcn_l (0.1973206 -0.00460015 0.03847388)
    Marker L.Toe.Tip: calcn_l (0.2630968 0.01468472 0.00519122)
