# OpenSim document version 20101
Model test_wrapEllipsoid_vasint:
  credits: Model authors names..
  publications: List of publications related to model...
  length_units: meters
  force_units: N
  gravity: 0 -9.80665 0
  ForceSet:
    Thelen2003Muscle vas_int_r: max_isometric_force=5000 optimal_fiber_length=0.107 tendon_slack_length=0.116
        pennation_angle=0.05235988 activation_time_constant=0.01 deactivation_time_constant=0.04 Vmax=10 Vmax0=5
        FmaxTendonStrain=0.033 FmaxMuscleStrain=0.6 KshapeActive=0.5 KshapePassive=4 damping=0.05 Af=0.3 Flen=1.8
      PathPoint P1: femur_r (0.029 -0.1924 0.031)
      PathPoint P2: femur_r (0.0335 -0.2084 0.0285)
      PathPoint P4: patella_r (0.0058 0.048 -0.0006)
      PathWrap: wrap_object=KnExt_at_fem_r method=hybrid
      PathWrap: wrap_object=KnExt_at_fem_r2 method=hybrid
      PathWrap: wrap_object=KnExt_at_fem_r3 method=hybrid
    Thelen2003Muscle bifemsh_r: max_isometric_force=804 optimal_fiber_length=0.173 tendon_slack_length=0.089
        pennation_angle=0.4014257 activation_time_constant=0.01 deactivation_time_constant=0.04 Vmax=10 Vmax0=5
        FmaxTendonStrain=0.033 FmaxMuscleStrain=0.6 KshapeActive=0.5 KshapePassive=4 damping=0.05 Af=0.3 Flen=1.8
      PathPoint P1: femur_r (0.005 -0.2111 0.0234)
      PathPoint P2: tibia_r (-0.0301 -0.036 0.02943)
      PathPoint P3: tibia_r (-0.0234 -0.0563 0.0343)
  BodySet:
    Body ground: mass=0 mass_center=(0 0 0) inertia_xx=0 inertia_yy=0 inertia_zz=0
    Body femur_r: mass=9.3014 mass_center=(0 -0.17 0) inertia_xx=0.1339 inertia_yy=0.0351 inertia_zz=0.1412
        meshes=femur.vtp
      WeldJoint hip_r: parent_body=ground location_in_parent=(0 0 0) orientation_in_parent=(0 0 1.57) location=(0 0 0)
    Body tibia_r: mass=30.7075 mass_center=(0 -0.1867 0) inertia_xx=0.0504 inertia_yy=0.0051 inertia_zz=0.0511
        meshes=(tibia.vtp fibula.vtp)
      CustomJoint knee_r: parent_body=femur_r location_in_parent=(0 0 0) location=(0 0 0)
        Coordinate knee_angle_r: motion_type=rotational default_value=-2.094395 initial_value=-2.094395
            range=(-2.094395 0.1745329) clamped=true
        SpatialTransform: axes_held_at_zero=(rotation2 rotation3 translation3)
          TransformAxis rotation1: coordinates=knee_angle_r axis=(0 0 1) LinearFunction(coefficients=1 0)
          TransformAxis translation1: coordinates=knee_angle_r axis=(1 0 0)
            NaturalCubicSpline: x=(-2.094395 -1.745329 -1.396263 -1.047198 -0.6981317 -0.3490659 -0.1745329 0.1973442 0.337395 0.4901776 1.52146 2.094395)
                y=(-0.0032 0.00179 0.00411 0.0041 0.00212 -0.001 -0.0031 -0.005227 -0.005435 -0.005574 -0.005435 -0.00525)
          TransformAxis translation2: coordinates=knee_angle_r axis=(0 1 0)
            NaturalCubicSpline: x=(-2.094395 -1.22173 -0.5235988 -0.3490659 -0.1745329 0.1591486 2.094395)
                y=(-0.4226 -0.4082 -0.399 -0.3976 -0.3966 -0.395264 -0.396)
    Body patella_r: mass=0.1 mass_center=(0 0 0) inertia_xx=0.001 inertia_yy=0.001 inertia_zz=0.001 meshes=pat.vtp
      CustomJoint tib_pat_r: parent_body=tibia_r location_in_parent=(0 0 0) location=(0 0 0)
        Coordinate tib_pat_r_r3: motion_type=rotational default_value=0.05789867 initial_value=0.05789867
            range=(-99999.9 99999.9) clamped=false
        Coordinate tib_pat_r_tx: motion_type=translational default_value=0.04944371 initial_value=0.04944371
            range=(-99999.9 99999.9) clamped=false
        Coordinate tib_pat_r_ty: motion_type=translational default_value=-0.02264558 initial_value=-0.02264558
            range=(-99999.9 99999.9) clamped=false
        Coordinate tib_pat_r_tz: motion_type=translational default_value=0.0024 initial_value=0.0024
            range=(-99999.9 99999.9) clamped=false
        SpatialTransform: axes_held_at_zero=(rotation2 rotation3)
          TransformAxis rotation1: coordinates=tib_pat_r_r3 axis=(0 0 1) LinearFunction(coefficients=1 0)
          TransformAxis translation1: coordinates=tib_pat_r_tx axis=(1 0 0) LinearFunction(coefficients=1 0)
          TransformAxis translation2: coordinates=tib_pat_r_ty axis=(0 1 0) LinearFunction(coefficients=1 0)
          TransformAxis translation3: coordinates=tib_pat_r_tz axis=(0 0 1) LinearFunction(coefficients=1 0)
    Body shaft_axis_r: mass=0 mass_center=(0 0 0) inertia_xx=0 inertia_yy=0 inertia_zz=0
      WeldJoint femoral_shaft_r: parent_body=femur_r location_in_parent=(-0.01583604 -0.03569591 0.03603814)
          orientation_in_parent=(0.1117011 0 0.03665191) location=(0 0 0)
      WrapEllipsoid KnExt_at_fem_r: xyz_body_rotation=(0.1720895 0.5570723 -0.9286897) translation=(0.015 -0.35 0)
          quadrant=all dimensions=(0.03 0.03 0.1)
      WrapCylinder KnExt_at_fem_r2: xyz_body_rotation=(-0.172 -0.17 -0.929) translation=(0.03 -0.3 0.009) quadrant=all
          radius=0.03 length=0.1
      WrapCylinder KnExt_at_fem_r3: xyz_body_rotation=(-0.172 0.17 -0.929) translation=(0.03 -0.23 0.009) quadrant=all
          radius=0.03 length=0.1
  ConstraintSet:
    CoordinateCouplerConstraint tib_pat_r_r3_con: independent_coordinate_names=knee_angle_r
        dependent_coordinate_name=tib_pat_r_r3 scale_factor=1
      coupled_coordinates_function: NaturalCubicSpline: x=(-2.094395 -1.999973 -1.457524 -0.5263913 0.02792527 0.1745329)
          y=(0.3080506 0.3080506 0.3063053 0.270177 -0.03700098 -0.2799508)
    CoordinateCouplerConstraint tib_pat_r_tx_con: independent_coordinate_names=knee_angle_r
        dependent_coordinate_name=tib_pat_r_tx scale_factor=1
      coupled_coordinates_function: NaturalCubicSpline: x=(-2.094395 -1.396263 -1.047198 -0.6981317 -0.3490659 -0.1745329 0 0.00017453 0.00034907 0.08726646 2.094395)
          y=(0.0173 0.0324 0.0381 0.043 0.0469 0.0484 0.0496 0.0496 0.0496 0.0496 0.0496)
    CoordinateCouplerConstraint tib_pat_r_ty_con: independent_coordinate_names=knee_angle_r
        dependent_coordinate_name=tib_pat_r_ty scale_factor=1
      coupled_coordinates_function: NaturalCubicSpline: x=(-2.094395 -1.570796 -1.396263 -1.047198 -0.6981317 -0.3490659 -0.1745329 0 0.00017453 0.00034907 0.08726646 2.094395)
          y=(-0.0219 -0.0202 -0.02 -0.0204 -0.0211 -0.0219 -0.0223 -0.0227 -0.0227 -0.0227 -0.0227 -0.0227)
    CoordinateCouplerConstraint tib_pat_r_tz_con: independent_coordinate_names=knee_angle_r
        dependent_coordinate_name=tib_pat_r_tz scale_factor=1
      coupled_coordinates_function: PiecewiseLinearFunction: x=(-17453.29 17453.29) y=(0.0024 0.0024)
