# OpenSim document version 20302
Model testWrapObject_updateFromXMLNode30515:
  credits: Parts copied from TestShoulderModel.osim
  publications: List of publications related to model...
  length_units: meters
  force_units: N
  gravity: 0 -9.80665 0
  BodySet:
    Body ground:
      WrapSphere: translation=(-0.0032 0.0049 -0.002) quadrant=all radius=0.023
      WrapCylinder: xyz_body_rotation=(1.6308 -0.0412 0.4875) translation=(0.0006 -0.0598 -0.0025) quadrant=-y
          radius=0.0095 length=0.1
      WrapEllipsoid: xyz_body_rotation=(1.6607 -0.0188 0.0325) translation=(-0.0008 -0.0598 -0.0017) quadrant=-y
          dimensions=(0.002 0.007 0.08)
