# OpenSim document version 30000
AnalyzeTool upper_limb:
  model_file: upper_limb.osim
  results_directory: Results
  output_precision: 20
  initial_time: 0
  final_time: 0
  states_file: initial_states.sto
  lowpass_cutoff_frequency_for_coordinates: -1
  AnalysisSet Analyses:
    Kinematics: step_interval=1 in_degrees=true
    Actuation: step_interval=1 in_degrees=true
    BodyKinematics: step_interval=1 in_degrees=true
    MuscleAnalysis: step_interval=1 in_degrees=true muscle_list=(DELT2 INFSP)
  ControllerSet:
    ControlSetController: controls_file=upper_limb_controls.xml
