# OpenSim document version 10901
Model osimModel:
  gravity: 0 -9.80665 0
  ForceSet:
    LiuThelen2003Muscle muscle1: max_isometric_force=2000 optimal_fiber_length=0.2 tendon_slack_length=0.2
        pennation_angle=0 activation_time_constant=0.0001 deactivation_time_constant=1 Vmax=10 Vmax0=5
        FmaxTendonStrain=0.033 FmaxMuscleStrain=0.6 KshapeActive=0.5 KshapePassive=4 damping=0.05 Af=0.3 Flen=1.8
        fatigue_factor=0 recovery_factor=0
      MusclePoint point1: ground (0 0.05 -0.35)
      MusclePoint point2: block (0 0 -0.05)
    Thelen2003Muscle muscle2: max_isometric_force=1000 optimal_fiber_length=0.2 tendon_slack_length=0.2
        pennation_angle=0 activation_time_constant=0.0001 deactivation_time_constant=1 Vmax=10 Vmax0=5
        FmaxTendonStrain=0.033 FmaxMuscleStrain=0.6 KshapeActive=0.5 KshapePassive=4 damping=0.05 Af=0.3 Flen=1.8
      MusclePoint point1: ground (0 0.05 0.35)
      MusclePoint point2: block (0 0 0.05)
    ElasticFoundationForce: transition_velocity=0.01
      ContactParametersSet:
        ContactParameters: geometry=(block ground) stiffness=100000000 dissipation=0.01 static_friction=0
            dynamic_friction=0.25 viscous_friction=0
  BodySet:
    Body ground: mass=0 mass_center=(0 0 0) inertia_xx=1 inertia_yy=1 inertia_zz=1
        meshes=(ground.vtp anchor1.vtp anchor2.vtp)
    Body block: mass=20 mass_center=(0 0 0) inertia_xx=0.03333333 inertia_yy=0.03333333 inertia_zz=0.03333333
        meshes=block.vtp
      FreeJoint: parent_body=ground location_in_parent=(0 0.05 0) location=(0 0 0) use_euler_angles=true
        Coordinate xRotation: motion_type=rotational default_value=0 initial_value=0 range=(-1.570796 1.570796)
            clamped=true
        Coordinate yRotation: motion_type=rotational default_value=0 initial_value=0 range=(-1.570796 1.570796)
            clamped=true
        Coordinate zRotation: motion_type=rotational default_value=0 initial_value=0 range=(-1.570796 1.570796)
            clamped=true
        Coordinate xTranslation: motion_type=translational default_value=0 initial_value=0 range=(-1 1) clamped=true
        Coordinate yTranslation: motion_type=translational default_value=0 initial_value=0 range=(-1 1) clamped=true
        Coordinate zTranslation: motion_type=translational default_value=0 initial_value=0 range=(-1 1) clamped=true
  ConstraintSet:
    PointOnLineConstraint: line_body=ground line_direction_vec=(1 0 -1) point_on_line=(1 0 -1) follower_body=block
        point_on_follower=(0 -0.05 0)
  ContactGeometrySet:
    ContactHalfSpace ground: body_name=ground location=(0 0 0) orientation=(0 0 -1.570796)
    ContactMesh block: body_name=block location=(0 0 0) filename=blockRemesh192.obj
