# OpenSim document version 20302
Model tugOfWar:
  length_units: meters
  force_units: N
  gravity: 0 -9.80665 0
  ForceSet:
    Schutte1993Muscle muscle1: min_control=0 max_control=1 optimal_force=1 max_isometric_force=1000
        optimal_fiber_length=0.1 tendon_slack_length=0.2 pennation_angle_at_optimal=0 max_contraction_velocity=10
        time_scale=0.1 activation1=0.0001 activation2=1 damping=0.1
      PathPoint point1: ground (0 0.05 -0.35)
      PathPoint point2: block (0 0 -0.05)
      tendon_force_length_curve: NaturalCubicSpline: x=(-10 -0.002 -0.001 0 0.00131 0.00281 0.00431 0.00581 0.00731 0.00881 0.0103 0.0118 0.0123 9.2 9.201 9.202 20)
          y=(0 0 0 0 0.0108 0.0257 0.0435 0.0652 0.0915 0.123 0.161 0.208 0.227 345 345 345 345)
      active_force_length_curve: NaturalCubicSpline: x=(-5.307692 -4.307692 -1.923077 -0.884615 -0.269231 0.230769 0.461538 0.52725 0.62875 0.71875 0.86125 1.045 1.2175 1.43875 1.5 1.615385 2 2.961538 3.692308 5.461538 9.901902)
          y=(0.012188 0.021899 0.036466 0.052493 0.075312 0.114158 0.157859 0.226667 0.636667 0.856667 0.95 0.993333 0.77 0.246667 0.193821 0.133252 0.072683 0.044417 0.036341 0.021899 0.007332)
      passive_force_length_curve: NaturalCubicSpline: x=(-5 0.998 0.999 1 1.1 1.2 1.3 1.4 1.5 1.6 1.601 1.602 5)
          y=(0 0 0 0 0.035 0.12 0.26 0.55 1.17 2 2 2 2)
    Thelen2003Muscle muscle2: min_control=0 max_control=1 optimal_force=1 max_isometric_force=1000
        optimal_fiber_length=0.1 tendon_slack_length=0.2 pennation_angle_at_optimal=0 max_contraction_velocity=10
        activation_time_constant=0.0001 deactivation_time_constant=1 Vmax=10 Vmax0=5 FmaxTendonStrain=0.033
        FmaxMuscleStrain=0.6 KshapeActive=0.5 KshapePassive=4 damping=0.05 Af=0.3 Flen=1.8
      PathPoint point1: ground (0 0.05 0.35)
      PathPoint point2: block (0 0 0.05)
    ElasticFoundationForce contactForce: transition_velocity=0.01
      ContactParametersSet:
        ContactParameters: geometry=(cube floor) stiffness=100000000 dissipation=0.01 static_friction=0.25
            dynamic_friction=0 viscous_friction=0
    PrescribedForce: body=block pointIsGlobal=false forceIsGlobal=true
      FunctionSet forceFunctions: PiecewiseLinearFunction(x=0 0.6, y=0 -588.399) Constant(value=0) Constant(value=0)
      FunctionSet pointFunctions: PiecewiseLinearFunction(x=0 0.6, y=0 0.1) Constant(value=0) Constant(value=0)
  BodySet:
    Body ground: mass=0 mass_center=(0 0 0) inertia_xx=1 inertia_yy=1 inertia_zz=1
        meshes=(ground.vtp anchor1.vtp anchor2.vtp)
    Body block: mass=20 mass_center=(0 0 0) inertia_xx=0.1333333 inertia_yy=0.1333333 inertia_zz=0.1333333
        meshes=block.vtp
      FreeJoint blockToGround: parent_body=ground location_in_parent=(0 0.05 0) location=(0 0 0) use_euler_angles=true
        Coordinate blockToGround_xRotation: motion_type=rotational default_value=0 initial_value=0
            range=(-1.570796 1.570796) clamped=false
        Coordinate blockToGround_yRotation: motion_type=rotational default_value=0 initial_value=0
            range=(-1.570796 1.570796) clamped=false
        Coordinate blockToGround_zRotation: motion_type=rotational default_value=0 initial_value=0
            range=(-1.570796 1.570796) clamped=false
        Coordinate blockToGround_xTranslation: motion_type=translational default_value=0.05110025
            default_speed_value=0.1 initial_value=0 range=(-1 1) clamped=false
        Coordinate blockToGround_yTranslation: motion_type=translational default_value=0.00117617 initial_value=0
            range=(-1 1) clamped=false
        Coordinate blockToGround_zTranslation: motion_type=translational default_value=0 initial_value=0 range=(-1 1)
            clamped=false
  ConstraintSet:
    PointOnLineConstraint: line_body=ground line_direction_vec=(1 0 -1) point_on_line=(1 0 -1) follower_body=block
        point_on_follower=(0 -0.05 0)
  ContactGeometrySet:
    ContactHalfSpace floor: body_name=ground location=(0 0 0) orientation=(0 0 -1.570796)
    ContactMesh cube: body_name=block location=(0 0 0) filename=blockRemesh192.obj
