# OpenSim document version 30503
Model BuiltinGeometry:
  Ground: mass=0 [kg] mass_center=(0 0 0)
    geometry:
      Brick: scale_factors=(1 1 1) half_lengths=(0.5 0.01 0.5)
        connectors: Connector_PhysicalFrame_ frame: connected_to_name=ground
      Brick: scale_factors=(5 1 1) half_lengths=(0.05 0.05 0.05)
        connectors: Connector_PhysicalFrame_ frame: connected_to_name=LeftAnchor
      Brick: scale_factors=(5 1 1) half_lengths=(0.05 0.05 0.05)
        connectors: Connector_PhysicalFrame_ frame: connected_to_name=RightAnchor
      Cylinder: radius=0.2 half_height=0.3
        connectors: Connector_PhysicalFrame_ frame: connected_to_name=CylAnchor
      Ellipsoid: radii=(0.2 0.7 0.5)
        connectors: Connector_PhysicalFrame_ frame: connected_to_name=EllipsoidAnchor
  BodySet:
    Body block: mass=20 [kg] mass_center=(0 0 0) inertia=(0.1333333 0.1333333 0.1333333 0 0 0)
      geometry: Sphere: radius=0.1
        connectors: Connector_PhysicalFrame_ frame: connected_to_name=block
  FrameSet:
    PhysicalOffsetFrame LeftAnchor: translation=(0 0.05 0.35)
      connectors: Connector_PhysicalFrame_ parent: connected_to_name=ground
    PhysicalOffsetFrame RightAnchor: translation=(0 0.05 -0.35)
      connectors: Connector_PhysicalFrame_ parent: connected_to_name=ground
    PhysicalOffsetFrame CylAnchor: translation=(-0.2 0 0)
      connectors: Connector_PhysicalFrame_ parent: connected_to_name=ground
    PhysicalOffsetFrame EllipsoidAnchor: translation=(-0.6 0.6 0)
      connectors: Connector_PhysicalFrame_ parent: connected_to_name=ground
  JointSet:
    FreeJoint blockToGround: location_in_parent=(0 0.05 0) location_in_child=(0 0 0)
        orientation_in_child=(0 0 0) [radians]
      connectors:
        Connector_PhysicalFrame_ parent_body: connected_to_name=ground
        Connector_PhysicalFrame_ child_body: connected_to_name=block
      Coordinate blockToGround_xRotation: motion_type=rotational range=(-1.570796 1.570796)
      Coordinate blockToGround_yRotation: motion_type=rotational range=(-1.570796 1.570796)
      Coordinate blockToGround_zRotation: motion_type=rotational range=(-1.570796 1.570796)
      Coordinate blockToGround_xTranslation: motion_type=translational default_value=0.2 range=(-1 1)
      Coordinate blockToGround_yTranslation: motion_type=translational default_value=-0.00196133 range=(-1 1)
      Coordinate blockToGround_zTranslation: motion_type=translational range=(-1 1)
  ControllerSet:
    PrescribedController: actuator_list=(muscle1 muscle2)
      FunctionSet ControlFunctions: LinearFunction(coefficients=-0.333333 1) LinearFunction(coefficients=0.316667 0.05)
  ConstraintSet:
    ConstantDistanceConstraint: location_body_1=(0 0.05 0) location_body_2=(0 0 0) constant_distance=0.2
      connectors:
        Connector_PhysicalFrame_ body_1: connected_to_name=ground
        Connector_PhysicalFrame_ body_2: connected_to_name=block
  ForceSet:
    Thelen2003Muscle muscle1: min_control=0 max_control=1 max_isometric_force=1000 optimal_fiber_length=0.25
        tendon_slack_length=0.1 pennation_angle_at_optimal=0 [radians] default_activation=1 default_fiber_length=0.25
      PathPoint point1: ground (0 0.05 -0.35)
      PathPoint point2: block (0 0 -0.05)
    Thelen2003Muscle muscle2: min_control=0 max_control=1 max_isometric_force=1000 optimal_fiber_length=0.25
        tendon_slack_length=0.1 pennation_angle_at_optimal=0 default_activation=0.05 default_fiber_length=0.25
      PathPoint point1: ground (0 0.05 0.35)
      PathPoint point2: block (0 0 0.05)
    PrescribedForce: body=block
      FunctionSet forceFunctions: PiecewiseLinearFunction(x=0 3, y=0 588.399) Constant(value=0) Constant(value=0)
      FunctionSet pointFunctions: Constant(value=0) Constant(value=0) Constant(value=0)
  ContactGeometrySet:
    ContactHalfSpace floor: body_name=ground location=(0 0 0) orientation=(0 0 -1.570796)
