# OpenSim document version 30000
Model Pendulum:
  gravity: 0 -9.80655 0
  BodySet:
    Body ground: mass=0 mass_center=(0 0 0) inertia_xx=1 inertia_yy=1 inertia_zz=1
    Body block: mass=10 mass_center=(0 0 0) inertia_xx=0.25 inertia_yy=0.25 inertia_zz=0.25 meshes=block.vtp
      PinJoint: parent_body=ground location_in_parent=(0 0.05 0) location=(0 0.5 0)
        Coordinate zR: motion_type=rotational default_value=0 range=(-1.5708 1.5708) clamped=true
