# OpenSim document version 20302
Model neck point constraint:
  credits: Model authors names..
  publications: List of publications related to model...
  length_units: meters
  force_units: N
  gravity: 0 -9.80665 0
  defaults: Schutte1993Muscle default: min_control=0 max_control=1 optimal_force=1 max_isometric_force=1000
      optimal_fiber_length=0.1 tendon_slack_length=0.2 pennation_angle_at_optimal=0 max_contraction_velocity=10
      time_scale=0.1 activation1=0.01 activation2=0.04 damping=0.05
    tendon_force_length_curve: NaturalCubicSpline: x=(-10 -0.002 -0.001 0 0.00131 0.00281 0.00431 0.00581 0.00731 0.00881 0.0103 0.0118 0.0123 9.2 9.201 9.202 20)
        y=(0 0 0 0 0.0108 0.0257 0.0435 0.0652 0.0915 0.123 0.161 0.208 0.227 345 345 345 345)
    active_force_length_curve: NaturalCubicSpline: x=(-5 0 0.401 0.402 0.4035 0.52725 0.62875 0.71875 0.86125 1.045 1.2175 1.43875 1.61875 1.62 1.621 2.2 5)
        y=(0 0 0 0 0 0.226667 0.636667 0.856667 0.95 0.993333 0.77 0.246667 0 0 0 0 0)
    passive_force_length_curve: NaturalCubicSpline: x=(-5 0.998 0.999 1 1.1 1.2 1.3 1.4 1.5 1.6 1.601 1.602 5)
        y=(0 0 0 0 0.035 0.12 0.26 0.55 1.17 2 2 2 2)
  ForceSet:
    Schutte1993Muscle [values shared by the 5 below unless stated]: min_control=0 max_control=1 optimal_force=1
        max_contraction_velocity=10 time_scale=0.1 activation1=0.01 activation2=0.04 damping=0.05
      tendon_force_length_curve: NaturalCubicSpline: x=(-10 -0.002 -0.001 0 0.00131 0.00281 0.00431 0.00581 0.00731 0.00881 0.0103 0.0118 0.0123 9.2 9.201 9.202 20)
          y=(0 0 0 0 0.0108 0.0257 0.0435 0.0652 0.0915 0.123 0.161 0.208 0.227 345 345 345 345)
      active_force_length_curve: NaturalCubicSpline: x=(-5 0 0.401 0.402 0.4035 0.52725 0.62875 0.71875 0.86125 1.045 1.2175 1.43875 1.61875 1.62 1.621 2.2 5)
          y=(0 0 0 0 0 0.226667 0.636667 0.856667 0.95 0.993333 0.77 0.246667 0 0 0 0 0)
      passive_force_length_curve: NaturalCubicSpline: x=(-5 0.998 0.999 1 1.1 1.2 1.3 1.4 1.5 1.6 1.601 1.602 5)
          y=(0 0 0 0 0.035 0.12 0.26 0.55 1.17 2 2 2 2)
    Schutte1993Muscle stern_mast_L: max_isometric_force=86.1 optimal_fiber_length=0.1033 tendon_slack_length=0.0775
        pennation_angle_at_optimal=0.2617994
      PathPoint P1: ribcage (-0.0007 0.3269 -0.0096)
      PathPoint P2: skull (0.01242 -0.00101 -0.0643)
    Schutte1993Muscle cleid_mast_L: max_isometric_force=43.05 optimal_fiber_length=0.1027 tendon_slack_length=0.0558
        pennation_angle_at_optimal=0.2617994
      PathPoint P1: lclavicle (0.00388 0.00542 -0.0352)
      PathPoint P2: skull (0.01242 -0.00101 -0.0643)
    Schutte1993Muscle cleid_occ_L: max_isometric_force=43.05 optimal_fiber_length=0.1127 tendon_slack_length=0.0699
        pennation_angle_at_optimal=0.2617994
      PathPoint P1: lclavicle (0.00388 0.00542 -0.0352)
      PathPoint P2: skull (-0.01689 0.0161 -0.0664)
    Schutte1993Muscle splen_cap_sklc6_R: max_isometric_force=54.95 optimal_fiber_length=0.0943
        tendon_slack_length=0.0209 pennation_angle_at_optimal=0
      PathPoint P1: cerv6 (-0.06135 -0.0101 0.00305)
      PathPoint P2: skull (-0.04365 0.01322 0.044)
    Schutte1993Muscle splen_cap_sklthx_R: max_isometric_force=53.2 optimal_fiber_length=0.1122
        tendon_slack_length=0.0589 pennation_angle_at_optimal=0
      PathPoint P1: spine (-0.10384 0.33902 0.003)
      PathPoint P2: skull (-0.02247 0.00429 0.05423)
    ObjectGroup sterno: members=(cleid_mast_L cleid_occ_L stern_mast_L)
    ObjectGroup flexion: members=(cleid_mast_L cleid_occ_L stern_mast_L)
    ObjectGroup rotation_contra: members=(cleid_mast_L cleid_occ_L stern_mast_L)
    ObjectGroup lat_bending: members=(cleid_mast_L cleid_occ_L splen_cap_sklc6_R splen_cap_sklthx_R stern_mast_L)
    ObjectGroup scalenus
    ObjectGroup extension: members=(splen_cap_sklc6_R splen_cap_sklthx_R)
    ObjectGroup rotation_ipsi: members=(splen_cap_sklc6_R splen_cap_sklthx_R)
    ObjectGroup longus
    ObjectGroup trapezius
    ObjectGroup splenius: members=(splen_cap_sklc6_R splen_cap_sklthx_R)
    ObjectGroup semispinalis
    ObjectGroup levator_scap
    ObjectGroup erectorspinae
    ObjectGroup suboccipital
    ObjectGroup multifidus
  BodySet:
    Body ground: mass=0 mass_center=(0 0 0) inertia_xx=0 inertia_yy=0 inertia_zz=0
    Body auxspine: mass=1 mass_center=(0 0 0) inertia_xx=0.1 inertia_yy=0.1 inertia_zz=0.1
      CustomJoint auxspine: parent_body=ground location_in_parent=(0 0 0) location=(0 0 0)
        Coordinate gndpitch: motion_type=rotational default_value=0 initial_value=0 range=(-3.141593 3.141593)
            clamped=true
        Coordinate gndroll: motion_type=rotational default_value=0 initial_value=0 range=(-3.141593 3.141593)
            clamped=true
        Coordinate gndyaw: motion_type=rotational default_value=0 initial_value=0 range=(-3.141593 3.141593)
            clamped=true
        SpatialTransform: axes_held_at_zero=(translation1 translation2 translation3)
          TransformAxis rotation1: coordinates=gndpitch axis=(0 0 1) LinearFunction(coefficients=1 0)
          TransformAxis rotation2: coordinates=gndroll axis=(1 0 0) LinearFunction(coefficients=1 0)
          TransformAxis rotation3: coordinates=gndyaw axis=(0 1 0) LinearFunction(coefficients=1 0)
    Body spine: mass=0 mass_center=(0 0 0) inertia_xx=0 inertia_yy=0 inertia_zz=0 meshes=tlspine.vtp
      WeldJoint spine: parent_body=auxspine location_in_parent=(0 0 0) location=(0 0 0)
    Body rscapula: mass=0 mass_center=(0 0 0) inertia_xx=0 inertia_yy=0 inertia_zz=0 meshes=rscapula.vtp
      WeldJoint rscapulajnt: parent_body=spine location_in_parent=(-0.0366 0.3623 0.1837)
          orientation_in_parent=(0.1745329 -0.296706 -0.1745329) location=(0 0 0)
    Body rclavicle: mass=0 mass_center=(0 0 0) inertia_xx=0 inertia_yy=0 inertia_zz=0 meshes=rclavicle.vtp
      WeldJoint rclaviclejnt: parent_body=spine location_in_parent=(-0.0118 0.3353 0.022)
          orientation_in_parent=(0 0.1396263 0) location=(0 0 0)
    Body lscapula: mass=0 mass_center=(0 0 0) inertia_xx=0 inertia_yy=0 inertia_zz=0 meshes=lscapula.vtp
      WeldJoint lscapulajnt: parent_body=spine location_in_parent=(-0.0366 0.3623 -0.1837)
          orientation_in_parent=(-0.1745329 0.296706 -0.1745329) location=(0 0 0)
    Body lclavicle: mass=0 mass_center=(0 0 0) inertia_xx=0 inertia_yy=0 inertia_zz=0 meshes=lclavicle.vtp
      WeldJoint lclaviclejnt: parent_body=spine location_in_parent=(-0.0118 0.3353 -0.022)
          orientation_in_parent=(0 -0.1396263 0) location=(0 0 0)
    Body ribcage: mass=0 mass_center=(0 0 0) inertia_xx=0 inertia_yy=0 inertia_zz=0 meshes=ribcage.vtp
      WeldJoint ribcagejnt: parent_body=spine location_in_parent=(0 0 0) location=(0 0 0)
    Body auxt1: mass=1 mass_center=(0 0 0) inertia_xx=0.1 inertia_yy=0.1 inertia_zz=0.1
      CustomJoint auxt1jnt: parent_body=spine location_in_parent=(-0.0475 0.3613 0) location=(0 0 0)
        Coordinate pitch: motion_type=rotational default_value=0 initial_value=0 range=(-0.8726646 1.256637)
            clamped=true
        Coordinate roll: motion_type=rotational default_value=0 initial_value=0 range=(-0.6981317 0.6981317)
            clamped=true
        Coordinate yaw: motion_type=rotational default_value=0 initial_value=0 range=(-1.308997 1.308997) clamped=true
        SpatialTransform: axes_held_at_zero=(translation1 translation2 translation3)
          TransformAxis rotation1: coordinates=pitch axis=(0 0 1)
            NaturalCubicSpline: x=(-1.745329 1.745329) y=(-0.1151917 0.1151917)
          TransformAxis rotation2: coordinates=roll axis=(1 0 0)
            NaturalCubicSpline: x=(-1.745329 1.745329) y=(-0.1151917 0.1151917)
          TransformAxis rotation3: coordinates=yaw axis=(0 1 0)
            NaturalCubicSpline: x=(-1.745329 1.745329) y=(-0.04537856 0.04537856)
    Body cerv7: mass=0.22 mass_center=(0 0 0) inertia_xx=0.00022 inertia_yy=0.00043 inertia_zz=0.00022
        meshes=cerv7rz.vtp
      WeldJoint cerv7jnt: parent_body=auxt1 location_in_parent=(0.0058 0.0095 0) orientation_in_parent=(0 0 -0.408407)
          location=(0 0 0)
    Body aux7: mass=0 mass_center=(0 0 0) inertia_xx=0 inertia_yy=0 inertia_zz=0
      CustomJoint aux7jnt: parent_body=cerv7 location_in_parent=(-0.00108 0.006742 0) location=(0 0 0)
        Coordinate aux7jnt_r3: motion_type=rotational default_value=0 initial_value=0 range=(-99999.9 99999.9)
            clamped=false
        Coordinate aux7jnt_r1: motion_type=rotational default_value=0 initial_value=0 range=(-99999.9 99999.9)
            clamped=false
        Coordinate aux7jnt_r2: motion_type=rotational default_value=0 initial_value=0 range=(-99999.9 99999.9)
            clamped=false
        SpatialTransform: axes_held_at_zero=(translation1 translation2 translation3)
          TransformAxis rotation1: coordinates=aux7jnt_r3 axis=(0 0 1) LinearFunction(coefficients=1 0)
          TransformAxis rotation2: coordinates=aux7jnt_r1 axis=(1 0 0) LinearFunction(coefficients=1 0)
          TransformAxis rotation3: coordinates=aux7jnt_r2 axis=(0 1 0) LinearFunction(coefficients=1 0)
    Body cerv6: mass=0.24 mass_center=(0 0 0) inertia_xx=0.00024 inertia_yy=0.00047 inertia_zz=0.00024
        meshes=cerv6rz.vtp
      WeldJoint cerv6jnt: parent_body=aux7 location_in_parent=(-0.00241 0.010382 0)
          orientation_in_parent=(0 0 0.05131268) location=(0 0 0)
    Body aux6: mass=0 mass_center=(0 0 0) inertia_xx=0 inertia_yy=0 inertia_zz=0
      CustomJoint aux6jnt: parent_body=cerv6 location_in_parent=(-0.00197 0.004208 0) location=(0 0 0)
        Coordinate aux6jnt_r3: motion_type=rotational default_value=0 initial_value=0 range=(-99999.9 99999.9)
            clamped=false
        Coordinate aux6jnt_r1: motion_type=rotational default_value=0 initial_value=0 range=(-99999.9 99999.9)
            clamped=false
        Coordinate aux6jnt_r2: motion_type=rotational default_value=0 initial_value=0 range=(-99999.9 99999.9)
            clamped=false
        SpatialTransform: axes_held_at_zero=(translation1 translation2 translation3)
          TransformAxis rotation1: coordinates=aux6jnt_r3 axis=(0 0 1) LinearFunction(coefficients=1 0)
          TransformAxis rotation2: coordinates=aux6jnt_r1 axis=(1 0 0) LinearFunction(coefficients=1 0)
          TransformAxis rotation3: coordinates=aux6jnt_r2 axis=(0 1 0) LinearFunction(coefficients=1 0)
    Body cerv5: mass=0.23 mass_center=(0 0 0) inertia_xx=0.00023 inertia_yy=0.00044 inertia_zz=0.00023
        meshes=cerv5rz.vtp
      WeldJoint cerv5jnt: parent_body=aux6 location_in_parent=(-0.00055 0.014277 0)
          orientation_in_parent=(0 0 0.02321288) location=(0 0 0)
    Body aux5: mass=0 mass_center=(0 0 0) inertia_xx=0 inertia_yy=0 inertia_zz=0
      CustomJoint aux5jnt: parent_body=cerv5 location_in_parent=(-0.00251 0.001505 0) location=(0 0 0)
        Coordinate aux5jnt_r3: motion_type=rotational default_value=0 initial_value=0 range=(-99999.9 99999.9)
            clamped=false
        Coordinate aux5jnt_r1: motion_type=rotational default_value=0 initial_value=0 range=(-99999.9 99999.9)
            clamped=false
        Coordinate aux5jnt_r2: motion_type=rotational default_value=0 initial_value=0 range=(-99999.9 99999.9)
            clamped=false
        SpatialTransform: axes_held_at_zero=(translation1 translation2 translation3)
          TransformAxis rotation1: coordinates=aux5jnt_r3 axis=(0 0 1) LinearFunction(coefficients=1 0)
          TransformAxis rotation2: coordinates=aux5jnt_r1 axis=(1 0 0) LinearFunction(coefficients=1 0)
          TransformAxis rotation3: coordinates=aux5jnt_r2 axis=(0 1 0) LinearFunction(coefficients=1 0)
    Body cerv4: mass=0.23 mass_center=(0 0 0) inertia_xx=0.00023 inertia_yy=0.00044 inertia_zz=0.00023
        meshes=cerv4rz.vtp
      WeldJoint cerv4jnt: parent_body=aux5 location_in_parent=(-0.00089 0.017745 0)
          orientation_in_parent=(0 0 0.04939282) location=(0 0 0)
    Body aux4: mass=0 mass_center=(0 0 0) inertia_xx=0 inertia_yy=0 inertia_zz=0
      CustomJoint aux4jnt: parent_body=cerv4 location_in_parent=(-0.00322 0.000294 0) location=(0 0 0)
        Coordinate aux4jnt_r3: motion_type=rotational default_value=0 initial_value=0 range=(-99999.9 99999.9)
            clamped=false
        Coordinate aux4jnt_r1: motion_type=rotational default_value=0 initial_value=0 range=(-99999.9 99999.9)
            clamped=false
        Coordinate aux4jnt_r2: motion_type=rotational default_value=0 initial_value=0 range=(-99999.9 99999.9)
            clamped=false
        SpatialTransform: axes_held_at_zero=(translation1 translation2 translation3)
          TransformAxis rotation1: coordinates=aux4jnt_r3 axis=(0 0 1) LinearFunction(coefficients=1 0)
          TransformAxis rotation2: coordinates=aux4jnt_r1 axis=(1 0 0) LinearFunction(coefficients=1 0)
          TransformAxis rotation3: coordinates=aux4jnt_r2 axis=(0 1 0) LinearFunction(coefficients=1 0)
    Body cerv3: mass=0.24 mass_center=(0 0 0) inertia_xx=0.00024 inertia_yy=0.00046 inertia_zz=0.00024
        meshes=cerv3rz.vtp
      WeldJoint cerv3jnt: parent_body=aux4 location_in_parent=(0.000248 0.016652 0)
          orientation_in_parent=(0 0 0.1308997) location=(0 0 0)
    Body aux3: mass=0 mass_center=(0 0 0) inertia_xx=0 inertia_yy=0 inertia_zz=0
      CustomJoint aux3jnt: parent_body=cerv3 location_in_parent=(-0.00411 -0.00207 0) location=(0 0 0)
        Coordinate aux3jnt_r3: motion_type=rotational default_value=0 initial_value=0 range=(-99999.9 99999.9)
            clamped=false
        Coordinate aux3jnt_r1: motion_type=rotational default_value=0 initial_value=0 range=(-99999.9 99999.9)
            clamped=false
        Coordinate aux3jnt_r2: motion_type=rotational default_value=0 initial_value=0 range=(-99999.9 99999.9)
            clamped=false
        SpatialTransform: axes_held_at_zero=(translation1 translation2 translation3)
          TransformAxis rotation1: coordinates=aux3jnt_r3 axis=(0 0 1) LinearFunction(coefficients=1 0)
          TransformAxis rotation2: coordinates=aux3jnt_r1 axis=(1 0 0) LinearFunction(coefficients=1 0)
          TransformAxis rotation3: coordinates=aux3jnt_r2 axis=(0 1 0) LinearFunction(coefficients=1 0)
    Body cerv2: mass=0.25 mass_center=(0 0 0) inertia_xx=0.00025 inertia_yy=0.00048 inertia_zz=0.00025
        meshes=Cerv2_new.vtp
      WeldJoint cerv2jnt: parent_body=aux3 location_in_parent=(-0.00036 0.023131 0)
          orientation_in_parent=(0 0 0.1391027) location=(0 0 0)
    Body aux2: mass=0 mass_center=(0 0 0) inertia_xx=0 inertia_yy=0 inertia_zz=0
      CustomJoint aux2jnt: parent_body=cerv2 location_in_parent=(0.001447 0.022 0) location=(0 0 0)
        Coordinate aux2jnt_r3: motion_type=rotational default_value=0 initial_value=0 range=(-99999.9 99999.9)
            clamped=false
        Coordinate aux2jnt_r1: motion_type=rotational default_value=0 initial_value=0 range=(-99999.9 99999.9)
            clamped=false
        Coordinate aux2jnt_r2: motion_type=rotational default_value=0 initial_value=0 range=(-99999.9 99999.9)
            clamped=false
        SpatialTransform: axes_held_at_zero=(translation1 translation2 translation3)
          TransformAxis rotation1: coordinates=aux2jnt_r3 axis=(0 0 1) LinearFunction(coefficients=1 0)
          TransformAxis rotation2: coordinates=aux2jnt_r1 axis=(1 0 0) LinearFunction(coefficients=1 0)
          TransformAxis rotation3: coordinates=aux2jnt_r2 axis=(0 1 0) LinearFunction(coefficients=1 0)
    Body cerv1: mass=0.22 mass_center=(0 0 0) inertia_xx=0.00025 inertia_yy=0.00048 inertia_zz=0.00025
        meshes=cerv1rz.vtp
      WeldJoint cerv1jnt: parent_body=aux2 location_in_parent=(-0.0186 -0.01155 0)
          orientation_in_parent=(0 0 0.06265732) location=(0 0 0)
    Body aux1: mass=0 mass_center=(0 0 0) inertia_xx=0 inertia_yy=0 inertia_zz=0
      CustomJoint aux1jnt: parent_body=cerv1 location_in_parent=(0 0.031151 0) location=(0 0 0)
        Coordinate aux1jnt_r3: motion_type=rotational default_value=0 initial_value=0 range=(-99999.9 99999.9)
            clamped=false
        Coordinate aux1jnt_r1: motion_type=rotational default_value=0 initial_value=0 range=(-99999.9 99999.9)
            clamped=false
        Coordinate aux1jnt_r2: motion_type=rotational default_value=0 initial_value=0 range=(-99999.9 99999.9)
            clamped=false
        SpatialTransform: axes_held_at_zero=(translation1 translation2 translation3)
          TransformAxis rotation1: coordinates=aux1jnt_r3 axis=(0 0 1) LinearFunction(coefficients=1 0)
          TransformAxis rotation2: coordinates=aux1jnt_r1 axis=(1 0 0) LinearFunction(coefficients=1 0)
          TransformAxis rotation3: coordinates=aux1jnt_r2 axis=(0 1 0) LinearFunction(coefficients=1 0)
    Body skull: mass=4.7 mass_center=(-0.01899 0.018765 0) inertia_xx=0.0181 inertia_yy=0.0173 inertia_zz=0.0236
        meshes=skullrz.vtp
      WeldJoint skulljnt: parent_body=aux1 location_in_parent=(-0.00188 -0.00994 0)
          orientation_in_parent=(0 0 -0.01308997) location=(0 0 0)
    Body jaw: mass=0 mass_center=(0 0 0) inertia_xx=0 inertia_yy=0 inertia_zz=0 meshes=jaw.vtp
      WeldJoint jawjnt: parent_body=skull location_in_parent=(0.0172 -0.0083 0) orientation_in_parent=(0 0 -0.03525565)
          location=(0 0 0)
    Body load_cell: mass=0 mass_center=(0 0 0) inertia_xx=0 inertia_yy=0 inertia_zz=0
      WeldJoint LCjnt: parent_body=skull location_in_parent=(0 0.386515 0) orientation_in_parent=(0 0 -0.03508112)
          location=(0 0 0)
  ConstraintSet:
    CoordinateCouplerConstraint aux7jnt_r1_con: independent_coordinate_names=roll dependent_coordinate_name=aux7jnt_r1
        scale_factor=1
      coupled_coordinates_function: NaturalCubicSpline: x=(-1.745329 1.745329) y=(-0.2007129 0.2007129)
    CoordinateCouplerConstraint aux7jnt_r2_con: independent_coordinate_names=yaw dependent_coordinate_name=aux7jnt_r2
        scale_factor=1
      coupled_coordinates_function: NaturalCubicSpline: x=(-1.745329 1.745329) y=(-0.1361357 0.1361357)
    CoordinateCouplerConstraint aux7jnt_r3_con: independent_coordinate_names=pitch dependent_coordinate_name=aux7jnt_r3
        scale_factor=1
      coupled_coordinates_function: NaturalCubicSpline: x=(-1.745329 1.745329) y=(-0.2181662 0.2181662)
    CoordinateCouplerConstraint aux6jnt_r1_con: independent_coordinate_names=roll dependent_coordinate_name=aux6jnt_r1
        scale_factor=1
      coupled_coordinates_function: NaturalCubicSpline: x=(-1.745329 1.745329) y=(-0.2286381 0.2286381)
    CoordinateCouplerConstraint aux6jnt_r2_con: independent_coordinate_names=yaw dependent_coordinate_name=aux6jnt_r2
        scale_factor=1
      coupled_coordinates_function: NaturalCubicSpline: x=(-1.745329 1.745329) y=(-0.158825 0.158825)
    CoordinateCouplerConstraint aux6jnt_r3_con: independent_coordinate_names=pitch dependent_coordinate_name=aux6jnt_r3
        scale_factor=1
      coupled_coordinates_function: NaturalCubicSpline: x=(-1.745329 1.745329) y=(-0.2565634 0.2565634)
    CoordinateCouplerConstraint aux5jnt_r1_con: independent_coordinate_names=roll dependent_coordinate_name=aux5jnt_r1
        scale_factor=1
      coupled_coordinates_function: NaturalCubicSpline: x=(-1.745329 1.745329) y=(-0.3141593 0.3141593)
    CoordinateCouplerConstraint aux5jnt_r2_con: independent_coordinate_names=yaw dependent_coordinate_name=aux5jnt_r2
        scale_factor=1
      coupled_coordinates_function: NaturalCubicSpline: x=(-1.745329 1.745329) y=(-0.158825 0.158825)
    CoordinateCouplerConstraint aux5jnt_r3_con: independent_coordinate_names=pitch dependent_coordinate_name=aux5jnt_r3
        scale_factor=1
      coupled_coordinates_function: NaturalCubicSpline: x=(-1.745329 1.745329) y=(-0.2565634 0.2565634)
    CoordinateCouplerConstraint aux4jnt_r1_con: independent_coordinate_names=roll dependent_coordinate_name=aux4jnt_r1
        scale_factor=1
      coupled_coordinates_function: NaturalCubicSpline: x=(-1.745329 1.745329) y=(-0.3141593 0.3141593)
    CoordinateCouplerConstraint aux4jnt_r2_con: independent_coordinate_names=yaw dependent_coordinate_name=aux4jnt_r2
        scale_factor=1
      coupled_coordinates_function: NaturalCubicSpline: x=(-1.745329 1.745329) y=(-0.158825 0.158825)
    CoordinateCouplerConstraint aux4jnt_r3_con: independent_coordinate_names=pitch dependent_coordinate_name=aux4jnt_r3
        scale_factor=1
      coupled_coordinates_function: NaturalCubicSpline: x=(-1.745329 1.745329) y=(-0.1919862 0.1919862)
    CoordinateCouplerConstraint aux3jnt_r1_con: independent_coordinate_names=roll dependent_coordinate_name=aux3jnt_r1
        scale_factor=1
      coupled_coordinates_function: NaturalCubicSpline: x=(-1.745329 1.745329) y=(-0.286234 0.286234)
    CoordinateCouplerConstraint aux3jnt_r2_con: independent_coordinate_names=yaw dependent_coordinate_name=aux3jnt_r2
        scale_factor=1
      coupled_coordinates_function: NaturalCubicSpline: x=(-1.745329 1.745329) y=(-0.06806784 0.06806784)
    CoordinateCouplerConstraint aux3jnt_r3_con: independent_coordinate_names=pitch dependent_coordinate_name=aux3jnt_r3
        scale_factor=1
      coupled_coordinates_function: NaturalCubicSpline: x=(-1.745329 1.745329) y=(-0.1291544 0.1291544)
    CoordinateCouplerConstraint aux2jnt_r1_con: independent_coordinate_names=roll dependent_coordinate_name=aux2jnt_r1
        scale_factor=1
      coupled_coordinates_function: NaturalCubicSpline: x=(-1.745329 1.745329) y=(-0.143117 0.143117)
    CoordinateCouplerConstraint aux2jnt_r2_con: independent_coordinate_names=yaw dependent_coordinate_name=aux2jnt_r2
        scale_factor=1
      coupled_coordinates_function: NaturalCubicSpline: x=(-1.745329 1.745329) y=(-0.9058259 0.9058259)
    CoordinateCouplerConstraint aux2jnt_r3_con: independent_coordinate_names=pitch dependent_coordinate_name=aux2jnt_r3
        scale_factor=1
      coupled_coordinates_function: NaturalCubicSpline: x=(-1.745329 1.745329) y=(-0.2565634 0.2565634)
    CoordinateCouplerConstraint aux1jnt_r1_con: independent_coordinate_names=roll dependent_coordinate_name=aux1jnt_r1
        scale_factor=1
      coupled_coordinates_function: NaturalCubicSpline: x=(-1.745329 1.745329) y=(-0.143117 0.143117)
    CoordinateCouplerConstraint aux1jnt_r2_con: independent_coordinate_names=yaw dependent_coordinate_name=aux1jnt_r2
        scale_factor=1
      coupled_coordinates_function: NaturalCubicSpline: x=(-1.745329 1.745329) y=(-0.1134464 0.1134464)
    CoordinateCouplerConstraint aux1jnt_r3_con: independent_coordinate_names=pitch dependent_coordinate_name=aux1jnt_r3
        scale_factor=1
      coupled_coordinates_function: NaturalCubicSpline: x=(-1.745329 1.745329) y=(-0.3211406 0.3211406)
    PointConstraint: body_1=ground body_2=load_cell location_body_1=(-0.06365 0.88207 0) location_body_2=(0 0 0)
  MarkerSet:
    Marker LoadCell: load_cell (0 0 0)
    Marker LoadCellInSkull: skull (0 0.386515 0)
    Marker LoadCellInGround: ground (-0.06365283 0.882069 0)
