# OpenSim document version 20302
Model snowboard_kinematics_2010:
  length_units: meters
  force_units: N
  gravity: 0 -9.80665 0
  credits:
    Delp S.L., Loan J.P., Hoy M.G., Zajac F.E., Topp E.L., Rosen J.M., Thelen D.G., Anderson F.C., Seth A.
  publications:
    Notes: 3D, 23 DOF gait model created by D.G. Thelen, Univ. of Wisconsin-Madison, and Ajay Seth, Frank C. Anderson, and Scott L. Delp, Stanford University. Lower extremity joint defintions based on Delp et al. (1990). Low back joint and anthropometry based on Anderson and Pandy (1999, 2001). Planar knee model of Yamaguchi and Zajac (1989). Seth removed the patella to avoid kinematic constraints; insertions of the quadrucepts are handled with moving points in the tibia frame.
    Delp, S.L., Loan, J.P., Hoy, M.G., Zajac, F.E., Topp E.L., Rosen, J.M.: An interactive graphics-based model of the lower extremity to study orthopaedic surgical procedures, IEEE Transactions on Biomedical Engineering, vol. 37, pp. 757-767, 1990.
    Yamaguchi G.T., Zajac F.E.: A planar model of the knee joint to characterize the knee extensor mechanism." J . Biomecl7. vol. 21. pp. 1-10. 1989.
    Anderson F.C., Pandy M.G.: A dynamic optimization solution for vertical jumping in three dimensions. Computer Methods in Biomechanics and Biomedical Engineering 2:201-231, 1999.
    Anderson F.C., Pandy M.G.: Dynamic optimization of human walking. Journal of Biomechanical Engineering 123:381-390, 2001.
  BodySet:
    Body ground: mass=0 mass_center=(0 0 0) inertia_xx=0 inertia_yy=0 inertia_zz=0 meshes=treadmill.vtp
    Body board: mass=0 mass_center=(0 0 0) inertia_xx=0 inertia_yy=0 inertia_zz=0 meshes=paulnewsnowboard.vtp
      CustomJoint ground_board: parent_body=ground location_in_parent=(0 0 0) location=(0 0 0)
        Coordinate board_tilt: motion_type=rotational default_value=0 initial_value=0 range=(-10 10) clamped=true
        Coordinate board_list: motion_type=rotational default_value=0 initial_value=0 range=(-10 10) clamped=true
        Coordinate board_rotation: motion_type=rotational default_value=0 initial_value=0 range=(-10 10) clamped=true
        Coordinate board_tx: motion_type=translational default_value=0 initial_value=0 range=(-10 10) clamped=true
        Coordinate board_ty: motion_type=translational default_value=0 initial_value=0 range=(-10 10) clamped=true
        Coordinate board_tz: motion_type=translational default_value=0 initial_value=0 range=(-10 10) clamped=true
        SpatialTransform:
          TransformAxis rotation1: coordinates=board_tilt axis=(0 0 1) LinearFunction(coefficients=1 0)
          TransformAxis rotation2: coordinates=board_list axis=(1 0 0) LinearFunction(coefficients=1 0)
          TransformAxis rotation3: coordinates=board_rotation axis=(0 1 0) LinearFunction(coefficients=1 0)
          TransformAxis translation1: coordinates=board_tx axis=(1 0 0) LinearFunction(coefficients=1 0)
          TransformAxis translation2: coordinates=board_ty axis=(0 1 0) LinearFunction(coefficients=1 0)
          TransformAxis translation3: coordinates=board_tz axis=(0 0 1) LinearFunction(coefficients=1 0)
    Body tibia_r: mass=3.7075 mass_center=(0 -0.1867 0) inertia_xx=0.0504 inertia_yy=0.0051 inertia_zz=0.0511
        meshes=(tibia_r.vtp fibula_r.vtp)
      CustomJoint ankle_r: parent_body=talus_r location_in_parent=(0 0 0) location=(0 -0.425 0.004)
        Coordinate ankle_angle_r: motion_type=rotational default_value=0 initial_value=0 range=(-0.8726646 0.8726646)
            clamped=true
        SpatialTransform: axes_held_at_zero=(rotation2 rotation3 translation1 translation2 translation3)
          TransformAxis rotation1: coordinates=ankle_angle_r axis=(-0.1050135 -0.1740224 0.9791263)
              LinearFunction(coefficients=1 0)
    Body talus_r: mass=0.1 mass_center=(0 0 0) inertia_xx=0.001 inertia_yy=0.001 inertia_zz=0.001 meshes=talus.vtp
      CustomJoint subtalar_r: parent_body=calcn_r location_in_parent=(0.037 0.03 0) location=(0 -0.015 0)
        Coordinate subtalar_angle_r: motion_type=rotational default_value=0 initial_value=0 range=(-1.047198 1.047198)
            clamped=true
        SpatialTransform: axes_held_at_zero=(rotation2 rotation3 translation1 translation2 translation3)
          TransformAxis rotation1: coordinates=subtalar_angle_r axis=(0.8 0.6250285 -0.3070912)
              LinearFunction(coefficients=1 0)
    Body calcn_r: mass=1.25 mass_center=(0.1 0.03 0) inertia_xx=0.0014 inertia_yy=0.0039 inertia_zz=0.0041
        meshes=foot.vtp
      CustomJoint r_foot_board: parent_body=board location_in_parent=(-0.125 0.01 0) location=(0 0 0)
        Coordinate r_foot_rotation: motion_type=rotational default_value=0 initial_value=0 range=(-0.5235988 0.5235988)
            clamped=true
        Coordinate r_foot_tx: motion_type=translational default_value=0 initial_value=0 range=(-0.5 0.5) clamped=true
        Coordinate r_foot_tz: motion_type=translational default_value=0.0835 initial_value=0.0835 range=(-0.5 0.5)
            clamped=true
        SpatialTransform: axes_held_at_zero=(rotation2 rotation3 translation3)
          TransformAxis rotation1: coordinates=r_foot_rotation axis=(0 1 0) LinearFunction(coefficients=1 0)
          TransformAxis translation1: coordinates=r_foot_tx axis=(1 0 0) LinearFunction(coefficients=1 0)
          TransformAxis translation2: coordinates=r_foot_tz axis=(0 0 1) LinearFunction(coefficients=1 0)
    Body tibia_l: mass=3.7075 mass_center=(0 -0.1867 0) inertia_xx=0.0504 inertia_yy=0.0051 inertia_zz=0.0511
        meshes=(tibia_l.vtp l_fibula.vtp)
      CustomJoint ankle_l: parent_body=talus_l location_in_parent=(0 0 0) location=(0 -0.425 -0.004)
        Coordinate ankle_angle_l: motion_type=rotational default_value=0 initial_value=0 range=(-0.8726646 0.8726646)
            clamped=true
        SpatialTransform: axes_held_at_zero=(rotation2 rotation3 translation1 translation2 translation3)
          TransformAxis rotation1: coordinates=ankle_angle_l axis=(0.1050135 0.1740224 0.9791263)
              LinearFunction(coefficients=1 0)
    Body talus_l: mass=0.1 mass_center=(0 0 0) inertia_xx=0.001 inertia_yy=0.001 inertia_zz=0.001 meshes=l_talus.vtp
      CustomJoint subtalar_l: parent_body=calcn_l location_in_parent=(0.037 0.03 0) location=(0 -0.015 0)
        Coordinate subtalar_angle_l: motion_type=rotational default_value=0 initial_value=0 range=(-1.047198 1.047198)
            clamped=true
        SpatialTransform: axes_held_at_zero=(rotation2 rotation3 translation1 translation2 translation3)
          TransformAxis rotation1: coordinates=subtalar_angle_l axis=(0.8 0.6250285 0.3070912)
              LinearFunction(coefficients=1 0)
    Body calcn_l: mass=1.25 mass_center=(0.1 0.03 0) inertia_xx=0.0014 inertia_yy=0.0039 inertia_zz=0.0041
        meshes=l_foot.vtp
      CustomJoint l_foot_board: parent_body=board location_in_parent=(-0.125 0.01 0) location=(0 0 0)
        Coordinate l_foot_rotation: motion_type=rotational default_value=0 initial_value=0 range=(-0.5235988 0.5235988)
            clamped=true
        Coordinate l_foot_tx: motion_type=translational default_value=0 initial_value=0 range=(-0.5 0.5) clamped=true
        Coordinate l_foot_tz: motion_type=translational default_value=-0.0835 initial_value=-0.0835 range=(-0.5 0.5)
            clamped=true
        SpatialTransform: axes_held_at_zero=(rotation2 rotation3 translation3)
          TransformAxis rotation1: coordinates=l_foot_rotation axis=(0 1 0) LinearFunction(coefficients=1 0)
          TransformAxis translation1: coordinates=l_foot_tx axis=(1 0 0) LinearFunction(coefficients=1 0)
          TransformAxis translation2: coordinates=l_foot_tz axis=(0 0 1) LinearFunction(coefficients=1 0)
    Body toes_r: mass=0.2166 mass_center=(0.0346 0.006 0.0175) inertia_xx=0.0001 inertia_yy=0.0002 inertia_zz=0.0001
        meshes=bofoot.vtp
      CustomJoint mtp_l: parent_body=calcn_r location_in_parent=(0 0 0) location=(-0.1788 -0.002 -0.00108)
        Coordinate mtp_angle_l: motion_type=rotational default_value=0 initial_value=0 range=(-1.047198 1.047198)
            clamped=true
        SpatialTransform: axes_held_at_zero=(rotation2 rotation3 translation1 translation2 translation3)
          TransformAxis rotation1: coordinates=mtp_angle_l axis=(0.5809544 0 0.8139361)
              LinearFunction(coefficients=1 0)
    Body toes_l: mass=0.2166 mass_center=(0.0346 0.006 0.0175) inertia_xx=0.0001 inertia_yy=0.0002 inertia_zz=0.0001
        meshes=l_bofoot.vtp
      CustomJoint mtp_l: parent_body=calcn_l location_in_parent=(0 0 0) location=(-0.1788 -0.002 0.00108)
        Coordinate mtp_angle_l: motion_type=rotational default_value=0 initial_value=0 range=(-1.047198 1.047198)
            clamped=true
        SpatialTransform: axes_held_at_zero=(rotation2 rotation3 translation1 translation2 translation3)
          TransformAxis rotation1: coordinates=mtp_angle_l axis=(0.5809544 0 0.8139361)
              LinearFunction(coefficients=1 0)
  MarkerSet:
    Marker RMKNE: tibia_r (0.009 -0.01 -0.047)
    Marker RSHN: tibia_r (0.06761109 -0.1475716 0.00527734)
    Marker RSHAFT: tibia_r (0.01398196 -0.3031343 0.06211485)
    Marker RLMAL: tibia_r (-0.00571249 -0.4096279 0.05211637)
    Marker RMMAL: tibia_r (0.00885394 -0.4041089 -0.03159628)
    Marker RLCAL: calcn_r (0.008 0.01 0.019)
    Marker RMCAL: calcn_r (0.008 0.01 -0.03)
    Marker RP2MT: calcn_r (0.08911436 0.04734814 -0.01695878)
    Marker RBOOT1: calcn_r (0.1607524 -0.00031019 0.06488535)
    Marker RBOOT2: calcn_r (0.1971447 0.0276259 0.00920775)
    Marker RBOOT3: calcn_r (0.1797253 0.00357092 -0.050777)
    Marker LLKNE: tibia_l (0.01 -0.012 -0.045)
    Marker LMKNE: tibia_l (0.009 -0.01 0.05)
    Marker LSHN: tibia_l (0.05848064 -0.1438863 0.00076936)
    Marker LSHAFT: tibia_l (0.0171904 -0.3028888 -0.05458768)
    Marker LLMAL: tibia_l (-0.00571 -0.40963 -0.05212)
    Marker LMMAL: tibia_l (0.00885 -0.40411 0.0316)
    Marker LLCAL: calcn_l (0.008 0.01 -0.019)
    Marker LMCAL: calcn_l (0.008 0.01 0.03)
    Marker LP2MT: calcn_l (0.08911 0.04735 0.01696)
    Marker LBOOT1: calcn_l (0.1648024 0.00044849 -0.06506751)
    Marker LBOOT2: calcn_l (0.1922564 0.02926583 -0.00926003)
    Marker LBOOT3: calcn_l (0.1792282 0.00707181 0.05350806)
    Marker RLKNE: tibia_r (0.01 -0.012 0.045)
