# OpenSim document version 30000
Model test_wrapping_all:
  credits: Model authors names..
  publications: List of publications related to model...
  length_units: meters
  force_units: N
  gravity: 0 -9.80665 0
  BodySet:
    Body ground: mass=0 mass_center=(0 0 0) inertia_xx=0 inertia_yy=0 inertia_zz=0
    Body femur_r: mass=9.3014 mass_center=(0 -0.17 0) inertia_xx=0.1339 inertia_yy=0.0351 inertia_zz=0.1412
      WeldJoint hip_r: parent_body=ground location_in_parent=(0 0 0) orientation_in_parent=(0 0 1.57) location=(0 0 0)
    Body tibia_r: mass=30.7075 mass_center=(0 -0.1867 0) inertia_xx=0.0504 inertia_yy=0.0051 inertia_zz=0.0511
      CustomJoint knee_r: parent_body=femur_r location_in_parent=(0 0 0) location=(0 0 0)
        Coordinate knee_angle_r: motion_type=rotational default_value=-2.094395 range=(-2.094395 0.1745329)
            clamped=true
        SpatialTransform: axes_held_at_zero=(rotation2 rotation3 translation3)
          TransformAxis rotation1: coordinates=knee_angle_r axis=(0 0 1) LinearFunction(coefficients=1 0)
          TransformAxis translation1: coordinates=knee_angle_r axis=(1 0 0)
            SimmSpline: x=(-2.0944 -1.74533 -1.39626 -1.0472 -0.698132 -0.349066 -0.174533 0.197344 0.337395 0.490178 1.52146 2.0944)
                y=(-0.0032 0.00179 0.00411 0.0041 0.00212 -0.001 -0.0031 -0.005227 -0.005435 -0.005574 -0.005435 -0.00525)
          TransformAxis translation2: coordinates=knee_angle_r axis=(0 1 0)
            SimmSpline: x=(-2.0944 -1.22173 -0.523599 -0.349066 -0.174533 0.159149 2.0944)
                y=(-0.4226 -0.4082 -0.399 -0.3976 -0.3966 -0.395264 -0.396)
    Body patella_r: mass=0.1 mass_center=(0 0 0) inertia_xx=0.001 inertia_yy=0.001 inertia_zz=0.001
      CustomJoint tib_pat_r: parent_body=tibia_r location_in_parent=(0 0 0) location=(0 0 0)
        Coordinate tib_pat_r_r3: motion_type=rotational default_value=0.05789867 range=(-99999.9 99999.9) clamped=false
        Coordinate tib_pat_r_tx: motion_type=translational default_value=0.04944371 range=(-99999.9 99999.9)
            clamped=false
        Coordinate tib_pat_r_ty: motion_type=translational default_value=-0.02264558 range=(-99999.9 99999.9)
            clamped=false
        Coordinate tib_pat_r_tz: motion_type=translational default_value=0.0024 range=(-99999.9 99999.9) clamped=false
        SpatialTransform: axes_held_at_zero=(rotation2 rotation3)
          TransformAxis rotation1: coordinates=tib_pat_r_r3 axis=(0 0 1) LinearFunction(coefficients=1 0)
          TransformAxis translation1: coordinates=tib_pat_r_tx axis=(1 0 0) LinearFunction(coefficients=1 0)
          TransformAxis translation2: coordinates=tib_pat_r_ty axis=(0 1 0) LinearFunction(coefficients=1 0)
          TransformAxis translation3: coordinates=tib_pat_r_tz axis=(0 0 1) LinearFunction(coefficients=1 0)
    Body shaft_axis_r: mass=0 mass_center=(0 0 0) inertia_xx=0 inertia_yy=0 inertia_zz=0
      WeldJoint femoral_shaft_r: parent_body=femur_r location_in_parent=(-0.01583604 -0.03569591 0.03603814)
          orientation_in_parent=(0.1117011 0 0.03665191) location=(0 0 0)
      WrapCylinder KnExt_at_fem_r: translation=(0.00989646 -0.378819 0.00891879) active=false quadrant=all radius=0.025
          length=0.1
      WrapCylinder KnExt_at_fem_r_py: xyz_body_rotation=(0 0 1.57) translation=(0.025 -0.25 0) active=false quadrant=+y
          radius=0.03 length=0.1
      WrapCylinder KnExt_at_fem_r_ny: xyz_body_rotation=(0 0 1.57) translation=(0.05 -0.25 0) active=false quadrant=-y
          radius=0.03 length=0.1
      WrapSphere KnExt_at_fem_sphere_r: translation=(0.00989646 -0.32819 0.00891879) active=false quadrant=+x
          radius=0.055
      WrapEllipsoid KnExt_at_fem_ellpsoid_r: translation=(-.01 -0.5 0.00891879) active=false quadrant=all
          dimensions=(0.1 0.05 0.15)
      WrapTorus KnExt_at_fem_torus_r: xyz_body_rotation=(1.57 0 0) translation=(-.02 -0.6 0.00891879) active=false
          quadrant=all inner_radius=0.035 outer_radius=0.08
  ForceSet:
    Thelen2003Muscle vas_int_r: max_isometric_force=5000 optimal_fiber_length=0.107 tendon_slack_length=0.116
        pennation_angle_at_optimal=0.05235988 [radians] activation_time_constant=0.01 deactivation_time_constant=0.04
        FmaxTendonStrain=0.033 FmaxMuscleStrain=0.6 KshapeActive=0.5 KshapePassive=4 Af=0.3 Flen=1.8
      PathPoint P1: femur_r (0.029 -0.1924 0.031)
      PathPoint P2: femur_r (0.0335 -0.2084 0.0285)
      PathPoint P4: patella_r (0.227558 0.0225095 -0.0866807)
      PathWrap: wrap_object=KnExt_at_fem_r_ny method=hybrid range=(2 3)
      PathWrap: wrap_object=KnExt_at_fem_r_py method=hybrid range=(2 3)
      PathWrap: wrap_object=KnExt_at_fem_r method=hybrid range=(2 3)
      PathWrap: wrap_object=KnExt_at_fem_sphere_r range=(2 3)
      PathWrap: wrap_object=KnExt_at_fem_ellpsoid_r range=(2 3)
      PathWrap: wrap_object=KnExt_at_fem_torus_r range=(2 3)
