# OpenSim document version 30507
Model EF_Mesh_to_Mesh:
  gravity: 0 -9.8065 0
  Ground
  BodySet:
    Body ball: mass=1 [kg] mass_center=(0 0 0) inertia=(1 1 1 0 0 0)
  JointSet:
    FreeJoint free:
      connectors: parent_frame=ground_offset child_frame=ball_offset
      Coordinate free_coord_0
      Coordinate free_coord_1
      Coordinate free_coord_2
      Coordinate free_coord_3
      Coordinate free_coord_4
      Coordinate free_coord_5
      PhysicalOffsetFrame ground_offset: translation=(0 0 0)
        connectors: parent=../../model_/ground
      PhysicalOffsetFrame ball_offset: translation=(0 0 0)
        connectors: parent=ball
  ForceSet:
    ElasticFoundationForce contact1:
      ContactParametersSet contact_parameters:
        ContactParameters: geometry=(ball1 ball2) stiffness=5000000 dissipation=0.001 static_friction=0
            dynamic_friction=0 viscous_friction=0
      HuntCrossleyForce contact2:
        ContactParametersSet contact_parameters:
          ContactParameters: geometry=(ball3 plane) stiffness=1000000 dissipation=0.001 static_friction=0
              dynamic_friction=0 viscous_friction=0
  ContactGeometrySet:
    ContactMesh ball1: location=(0 0 0) filename=sphere_10cm_radius.obj
      connectors: frame=model_/ground
    ContactMesh ball2: location=(0 0 0) filename=sphere_10cm_radius.obj
      connectors: frame=model_/ball
    ContactSphere ball3: location=(0 0 0) radius=0.1
      connectors: frame=model_/ball
    ContactHalfSpace plane: location=(0 0 0) orientation=(1.57 0 .785)
      connectors: frame=model_/ground
