# OpenSim document version 40600
Model:
  Ground
  BodySet:
    Body new_body: mass=1 [kg] mass_center=(0 0 0) inertia=(1 1 1 0 0 0)
      Sphere new_body_geom_1: radius=0.1
  JointSet:
    PinJoint: socket_parent_frame=ground_offset socket_child_frame=new_body_offset
      Coordinate rz: default_value=1.570796
      PhysicalOffsetFrame ground_offset: socket_parent=/ground translation=(0 1 0) [meters]
      PhysicalOffsetFrame new_body_offset: socket_parent=/bodyset/new_body translation=(0 0.4672288 0)
