# OpenSim document version 40000
Model Tug_of_War:
  gravity: 0 -9.80665 0
  length_units: meters
  force_units: N
  credits:
    Author: The OpenSim Teams License: Creative Commons (CCBY 3.0). You are free to distribute, remix, tweak, and build upon this work, even commercially, as long as you credit us for the original creation. http://creativecommons.org/licenses/by/3.0/
  Ground
  BodySet:
    Body block: mass=20 [kg] mass_center=(0 0 0) inertia=(0.133333 0.133333 0.133333 0 0 0) meshes=block.vtp
  JointSet:
    SliderJoint ground_block: socket_parent_frame=ground_offset socket_child_frame=block_offset
      Coordinate block_tz: default_value=0 range=(-0.3 0.3) clamped=true
      PhysicalOffsetFrame ground_offset: socket_parent=/ground translation=(0 0 0) [meters]
          orientation=(0 -1.5708 0) [radians]
      PhysicalOffsetFrame block_offset: socket_parent=/bodyset/block translation=(0 -0.05 0) orientation=(0 -1.5708 0)
  ControllerSet:
    PrescribedController: actuator_list=actu_slider
      FunctionSet ControlFunctions:
        GCVSpline spline_slider: half_order=3 error_variance=0 x=(0 0.1 0.2 0.3 0.4 0.5 0.6 0.7 0.8 0.9 1)
            y=(0.573621 0.44629 0.319214 0.183898 0.0920755 0.0407125 -0.0085371 -0.040781 -0.0774591 -0.133466 -0.219896)
            weights=(1 1 1 1 1 1 1 1 1 1 1) coefficients=(0 0 0 0 0 0 0 0 0 0 0)
  ForceSet:
    CoordinateActuator actu_slider: min_control=-1 max_control=1 coordinate=block_tz optimal_force=150
