AbstractModel Dynamic Mocap Model:
  angle_units: radians
  force_units: N
  length_units: m
  defaults: SimmZajacHill defaultmuscle: pennation_angle=0 max_contraction_velocity=10 muscle_model=4 time_scale=0.1
      mass=0.00286 damping=0.1 activation1=7.667 activation2=1.459854
    tendon_force_length_curve: natCubicSpline: x=(-1 -0.002 -0.001 0 0.00131 0.00281 0.00431 0.00581 0.00731 0.00881 0.0103 0.0118 0.0123 9.2 9.201 9.202 12)
        y=(0 0 0 0 0.0108 0.0257 0.0435 0.0652 0.0915 0.123 0.161 0.208 0.227 345 345 345 345)
    active_force_length_curve: natCubicSpline: x=(0 0.401 0.402 0.4035 0.52725 0.62875 0.71875 0.86125 1.045 1.2175 1.43875 1.61875 1.62 1.621 2)
        y=(0 0 0 0 0.226667 0.636667 0.856667 0.95 0.993333 0.77 0.246667 0 0 0 0)
    passive_force_length_curve: natCubicSpline: x=(0.8 0.998 0.999 1 1.1 1.2 1.3 1.4 1.5 1.6 1.601 1.602 2)
        y=(0 0 0 0 0.035 0.12 0.26 0.55 1.17 2 2 2 2)
    force_velocity_curve: natCubicSpline: x=(-1.001 -1 -0.95 -0.9 -0.85 -0.8 -0.75 -0.7 -0.65 -0.6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)
        y=(0 0 0.010417 0.021739 0.034091 0.047619 0.0625 0.078947 0.097222 0.117647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)
  ActuatorSet:
    SimmZajacHill rectus_fem_r: max_isometric_force=779 optimal_fiber_length=0.084 tendon_slack_length=0.346
        pennation_angle=0.08726646 muscle_model=4 groups=(right leg_r hip_r knee_r)
      SimmMusclePointSet:
        SimmMusclePoint: location=(-0.0388 -0.0474 0.0918) body=pelvis
        SimmMuscleViaPoint: location=(0.0334 -0.403 0.0019) body=femur_r coordinate=knee_flex_r
            range=(1.459968 2.617994)
        SimmMusclePoint: location=(0.0121 0.0437 -0.001) body=patella_r
      MuscleWrap: wrap_object=pelvis_cyl
      MuscleWrap: wrap_object=femur_ell method=hybrid
    SimmZajacHill glut_max1_r: max_isometric_force=382 optimal_fiber_length=0.142 tendon_slack_length=0.125
        pennation_angle=0.08726646 muscle_model=4 groups=(right leg_r hip_r)
      SimmMusclePointSet:
        SimmMusclePoint: location=(-0.1253 0.0425 0.0606) body=pelvis
        SimmMusclePoint: location=(-0.1384 -0.0151 0.0836) body=pelvis
        SimmMusclePoint: location=(-0.0457 -0.0248 0.0392) body=femur_r
        SimmMusclePoint: location=(-0.0277 -0.0566 0.047) body=femur_r
    SimmZajacHill glut_max2_r: max_isometric_force=546 optimal_fiber_length=0.147 tendon_slack_length=0.127
        pennation_angle=0 muscle_model=4 groups=(right leg_r hip_r)
      SimmMusclePointSet:
        SimmMusclePoint: location=(-0.1442 0.0013 0.0513) body=pelvis
        SimmMusclePoint: location=(-0.1469 -0.0683 0.0864) body=pelvis
        SimmMusclePoint: location=(-0.0426 -0.053 0.0293) body=femur_r
        SimmMusclePoint: location=(-0.0156 -0.1016 0.0419) body=femur_r
    SimmZajacHill glut_max3_r: max_isometric_force=368 optimal_fiber_length=0.144 tendon_slack_length=0.114
        pennation_angle=0.08726646 muscle_model=4 groups=(right leg_r hip_r)
      SimmMusclePointSet:
        SimmMusclePoint: location=(-0.1642 -0.0792 0.0074) body=pelvis
        SimmMusclePoint: location=(-0.1622 -0.1215 0.0353) body=pelvis
        SimmMusclePoint: location=(-0.0299 -0.1041 0.0135) body=femur_r
        SimmMusclePoint: location=(-0.006 -0.1419 0.0411) body=femur_r
    SimmZajacHill glut_med1_r: max_isometric_force=546 optimal_fiber_length=0.0535 tendon_slack_length=0.078
        pennation_angle=0.1396263 muscle_model=4 groups=(right leg_r hip_r)
      SimmMusclePointSet:
        SimmMusclePoint: location=(-0.0501 0.0141 0.1159) body=pelvis
        SimmMusclePoint: location=(-0.0218 -0.0117 0.0555) body=femur_r
    SimmZajacHill glut_med2_r: max_isometric_force=382 optimal_fiber_length=0.0845 tendon_slack_length=0.037
        pennation_angle=0 muscle_model=4 groups=(right leg_r hip_r)
      SimmMusclePointSet:
        SimmMusclePoint: location=(-0.0964 0.0137 0.0792) body=pelvis
        SimmMusclePoint: location=(-0.0258 -0.0058 0.0527) body=femur_r
    SimmZajacHill glut_med3_r: max_isometric_force=435 optimal_fiber_length=0.0646 tendon_slack_length=0.053
        pennation_angle=0.3316126 muscle_model=4 groups=(right leg_r hip_r)
      SimmMusclePointSet:
        SimmMusclePoint: location=(-0.1316 -0.0058 0.0598) body=pelvis
        SimmMusclePoint: location=(-0.0309 -0.0047 0.0518) body=femur_r
    SimmZajacHill glut_min1_r: max_isometric_force=180 optimal_fiber_length=0.068 tendon_slack_length=0.016
        pennation_angle=0.1745329 muscle_model=4 groups=(right leg_r hip_r)
      SimmMusclePointSet:
        SimmMusclePoint: location=(-0.056 -0.0243 0.1006) body=pelvis
        SimmMusclePoint: location=(-0.0072 -0.0104 0.056) body=femur_r
    SimmZajacHill glut_min2_r: max_isometric_force=190 optimal_fiber_length=0.056 tendon_slack_length=0.026
        pennation_angle=0 muscle_model=4 groups=(right leg_r hip_r)
      SimmMusclePointSet:
        SimmMusclePoint: location=(-0.0726 -0.0228 0.0941) body=pelvis
        SimmMusclePoint: location=(-0.0096 -0.0104 0.056) body=femur_r
    SimmZajacHill glut_min3_r: max_isometric_force=215 optimal_fiber_length=0.038 tendon_slack_length=0.051
        pennation_angle=0.3665191 muscle_model=4 groups=(right leg_r hip_r)
      SimmMusclePointSet:
        SimmMusclePoint: location=(-0.0927 -0.0226 0.0806) body=pelvis
        SimmMusclePoint: location=(-0.0135 -0.0083 0.055) body=femur_r
    SimmZajacHill add_long_r: max_isometric_force=418 optimal_fiber_length=0.138 tendon_slack_length=0.1105
        pennation_angle=0.1047198 muscle_model=4 groups=(right leg_r hip_r)
      SimmMusclePointSet:
        SimmMusclePoint: location=(-0.0434 -0.1058 0.0098) body=pelvis
        SimmMusclePoint: location=(0.005 -0.2111 0.0234) body=femur_r
    SimmZajacHill add_brev_r: max_isometric_force=286 optimal_fiber_length=0.133 tendon_slack_length=0.013
        pennation_angle=0 muscle_model=4 groups=(right leg_r hip_r)
      SimmMusclePointSet:
        SimmMusclePoint: location=(-0.0685 -0.1124 0.0164) body=pelvis
        SimmMusclePoint: location=(0.0009 -0.1196 0.0294) body=femur_r
    SimmZajacHill add_mag1_r: max_isometric_force=346 optimal_fiber_length=0.087 tendon_slack_length=0.06
        pennation_angle=0.08726646 muscle_model=4 groups=(right leg_r hip_r)
      SimmMusclePointSet:
        SimmMusclePoint: location=(-0.0825 -0.1337 0.0205) body=pelvis
        SimmMusclePoint: location=(-0.0045 -0.1211 0.0339) body=femur_r
    SimmZajacHill add_mag2_r: max_isometric_force=312 optimal_fiber_length=0.121 tendon_slack_length=0.13
        pennation_angle=0.05235988 muscle_model=4 groups=(right leg_r hip_r)
      SimmMusclePointSet:
        SimmMusclePoint: location=(-0.0924 -0.1355 0.0258) body=pelvis
        SimmMusclePoint: location=(0.0054 -0.2285 0.0227) body=femur_r
    SimmZajacHill add_mag3_r: max_isometric_force=444 optimal_fiber_length=0.131 tendon_slack_length=0.26
        pennation_angle=0.08726646 muscle_model=4 groups=(right leg_r hip_r)
      SimmMusclePointSet:
        SimmMusclePoint: location=(-0.0864 -0.1344 0.0226) body=pelvis
        SimmMusclePoint: location=(0.007 -0.3837 -0.0266) body=femur_r
    SimmZajacHill pectineus_r: max_isometric_force=177 optimal_fiber_length=0.133 tendon_slack_length=0.001
        pennation_angle=0 muscle_model=4 groups=(right leg_r hip_r)
      SimmMusclePointSet:
        SimmMusclePoint: location=(-0.0524 -0.0931 0.0401) body=pelvis
        SimmMusclePoint: location=(-0.0122 -0.0822 0.0253) body=femur_r
    SimmZajacHill iliacus_r: max_isometric_force=429 optimal_fiber_length=0.1 tendon_slack_length=0.09
        pennation_angle=0.122173 muscle_model=4 groups=(right leg_r hip_r)
      SimmMusclePointSet:
        SimmMusclePoint: location=(-0.0784 0.0194 0.0828) body=pelvis
        SimmMusclePoint: location=(-0.0311 -0.0713 0.0801) body=pelvis
        SimmMusclePoint: location=(0.0017 -0.0543 0.0057) body=femur_r
        SimmMusclePoint: location=(-0.0193 -0.0621 0.0129) body=femur_r
    SimmZajacHill psoas_r: max_isometric_force=371 optimal_fiber_length=0.104 tendon_slack_length=0.113
        pennation_angle=0.1396263 muscle_model=4 groups=(right leg_r hip_r)
      SimmMusclePointSet:
        SimmMusclePoint: location=(-0.07817 0.05129 0.0207) body=pelvis
        SimmMusclePoint: location=(-0.0331 -0.0733 0.0709) body=pelvis
        SimmMusclePoint: location=(0.0016 -0.0507 0.0038) body=femur_r
        SimmMusclePoint: location=(-0.0188 -0.0597 0.0104) body=femur_r
    SimmZajacHill quad_fem_r: max_isometric_force=254 optimal_fiber_length=0.054 tendon_slack_length=0.024
        pennation_angle=0 muscle_model=4 groups=(right leg_r hip_r)
      SimmMusclePointSet:
        SimmMusclePoint: location=(-0.1236 -0.1314 0.047) body=pelvis
        SimmMusclePoint: location=(-0.0381 -0.0359 0.0366) body=femur_r
    SimmZajacHill gemellus_r: max_isometric_force=109 optimal_fiber_length=0.024 tendon_slack_length=0.039
        pennation_angle=0 muscle_model=4 groups=(right leg_r hip_r)
      SimmMusclePointSet:
        SimmMusclePoint: location=(-0.1226 -0.0983 0.0664) body=pelvis
        SimmMusclePoint: location=(-0.0142 -0.0033 0.0443) body=femur_r
    SimmZajacHill piri_r: max_isometric_force=296 optimal_fiber_length=0.026 tendon_slack_length=0.106
        pennation_angle=0.1745329 muscle_model=4 groups=(right leg_r hip_r)
      SimmMusclePointSet:
        SimmMusclePoint: location=(-0.1679 -0.0458 0.0291) body=pelvis
        SimmMusclePoint: location=(-0.1333 -0.0531 0.0605) body=pelvis
        SimmMusclePoint: location=(-0.0148 -0.0036 0.0437) body=femur_r
    SimmZajacHill TFL_r: max_isometric_force=155 optimal_fiber_length=0.095 tendon_slack_length=0.425
        pennation_angle=0.05235988 muscle_model=4 groups=(right leg_r hip_r)
      SimmMusclePointSet:
        SimmMusclePoint: location=(-0.0404 0.0051 0.1191) body=pelvis
        SimmMusclePoint: location=(0.0294 -0.0995 0.0597) body=femur_r
        SimmMusclePoint: location=(0.0054 -0.4049 0.0357) body=femur_r
        SimmMusclePoint: location=(0.006 -0.0487 0.0297) body=tibia_r
    SimmZajacHill gracilis_r: max_isometric_force=108 optimal_fiber_length=0.352 tendon_slack_length=0.14
        pennation_angle=0.05235988 muscle_model=4 groups=(right leg_r hip_r knee_r)
      SimmMusclePointSet:
        SimmMusclePoint: location=(-0.0656 -0.1201 0.0029) body=pelvis
        SimmMusclePoint: location=(-0.0154 -0.0475 -0.0358) body=tibia_r
        SimmMusclePoint: location=(0.006 -0.0836 -0.0228) body=tibia_r
    SimmZajacHill semimem_r: max_isometric_force=1030 optimal_fiber_length=0.08 tendon_slack_length=0.359
        pennation_angle=0.2617994 muscle_model=4 groups=(right leg_r hip_r knee_r)
      SimmMusclePointSet:
        SimmMusclePoint: location=(-0.1285 -0.1178 0.0645) body=pelvis
        SimmMusclePoint: location=(-0.0243 -0.0536 -0.0194) body=tibia_r
    SimmZajacHill semiten_r: max_isometric_force=328 optimal_fiber_length=0.201 tendon_slack_length=0.262
        pennation_angle=0.08726646 muscle_model=4 groups=(right leg_r hip_r knee_r)
      SimmMusclePointSet:
        SimmMusclePoint: location=(-0.133 -0.1206 0.0553) body=pelvis
        SimmMusclePoint: location=(-0.0314 -0.0545 -0.0146) body=tibia_r
        SimmMusclePoint: location=(-0.0113 -0.0746 -0.0245) body=tibia_r
        SimmMusclePoint: location=(0.0027 -0.0956 -0.0193) body=tibia_r
    SimmZajacHill bi_fem_lh_r: max_isometric_force=717 optimal_fiber_length=0.109 tendon_slack_length=0.341
        pennation_angle=0 muscle_model=4 groups=(right leg_r hip_r knee_r)
      SimmMusclePointSet:
        SimmMusclePoint: location=(-0.1337 -0.1164 0.0616) body=pelvis
        SimmMusclePoint: location=(-0.0081 -0.0729 0.0423) body=tibia_r
    SimmZajacHill bi_fem_sh_r: max_isometric_force=402 optimal_fiber_length=0.173 tendon_slack_length=0.1
        pennation_angle=0.4014257 muscle_model=4 groups=(right leg_r knee_r)
      SimmMusclePointSet:
        SimmMusclePoint: location=(0.005 -0.2111 0.0234) body=femur_r
        SimmMusclePoint: location=(-0.0101 -0.0725 0.0406) body=tibia_r
    SimmZajacHill sartorius_r: max_isometric_force=104 optimal_fiber_length=0.579 tendon_slack_length=0.04
        pennation_angle=0 muscle_model=4 groups=(right leg_r hip_r knee_r)
      SimmMusclePointSet:
        SimmMusclePoint: location=(-0.0296 -0.018 0.1198) body=pelvis
        SimmMusclePoint: location=(-0.003 -0.3568 -0.0421) body=femur_r
        SimmMusclePoint: location=(-0.0056 -0.0419 -0.0399) body=tibia_r
        SimmMusclePoint: location=(0.006 -0.0589 -0.0383) body=tibia_r
        SimmMusclePoint: location=(0.0243 -0.084 -0.0252) body=tibia_r
    SimmZajacHill vas_med_r: max_isometric_force=1294 optimal_fiber_length=0.089 tendon_slack_length=0.126
        pennation_angle=0.08726646 muscle_model=4 groups=(right leg_r knee_r)
      SimmMusclePointSet:
        SimmMusclePoint: location=(0.014 -0.2099 0.0188) body=femur_r
        SimmMusclePoint: location=(0.0356 -0.2769 0.0009) body=femur_r
        SimmMuscleViaPoint: location=(0.037 -0.4048 -0.0125) body=femur_r coordinate=knee_flex_r
            range=(1.209862 2.617994)
        SimmMuscleViaPoint: location=(0.0274 -0.4255 -0.0131) body=femur_r coordinate=knee_flex_r
            range=(1.780061 2.617994)
        SimmMusclePoint: location=(0.0063 0.0445 -0.017) body=patella_r
    SimmZajacHill vas_int_r: max_isometric_force=1365 optimal_fiber_length=0.087 tendon_slack_length=0.136
        pennation_angle=0.05235988 muscle_model=4 groups=(right leg_r knee_r)
      SimmMusclePointSet:
        SimmMusclePoint: location=(0.029 -0.1924 0.031) body=femur_r
        SimmMusclePoint: location=(0.0335 -0.2084 0.0285) body=femur_r
        SimmMuscleViaPoint: location=(0.0343 -0.403 0.0055) body=femur_r coordinate=knee_flex_r range=(1.42 2.617994)
        SimmMusclePoint: location=(0.0058 0.048 -0.0006) body=patella_r
    SimmZajacHill vas_lat_r: max_isometric_force=1871 optimal_fiber_length=0.084 tendon_slack_length=0.157
        pennation_angle=0.08726646 muscle_model=4 groups=(right leg_r knee_r)
      SimmMusclePointSet:
        SimmMusclePoint: location=(0.0048 -0.1854 0.0349) body=femur_r
        SimmMusclePoint: location=(0.0269 -0.2591 0.0409) body=femur_r
        SimmMuscleViaPoint: location=(0.0361 -0.403 0.0205) body=femur_r coordinate=knee_flex_r
            range=(1.209862 2.617994)
        SimmMuscleViaPoint: location=(0.0253 -0.4243 0.0184) body=femur_r coordinate=knee_flex_r
            range=(1.919862 2.617994)
        SimmMusclePoint: location=(0.0103 0.0423 0.0141) body=patella_r
    SimmZajacHill pat_lig_r: max_isometric_force=1 optimal_fiber_length=0.05 tendon_slack_length=0.005
        pennation_angle=0 muscle_model=4 groups=(right leg_r knee_r)
      SimmMusclePointSet:
        SimmMusclePoint: location=(0.039 -0.0822 0) body=tibia_r
        SimmMusclePoint: location=(0.0021 0.0015 0.0001) body=patella_r
    SimmZajacHill gas_med_r: max_isometric_force=1113 optimal_fiber_length=0.045 tendon_slack_length=0.408
        pennation_angle=0.296706 muscle_model=4 groups=(right leg_r knee_r ankle_r)
      SimmMusclePointSet:
        SimmMusclePoint: location=(-0.0127 -0.3929 -0.0235) body=femur_r
        SimmMuscleViaPoint: location=(-0.0239 -0.4022 -0.0258) body=femur_r coordinate=knee_flex_r
            range=(-0.3490659 0.7700393)
        SimmMusclePoint: location=(-0.0217 -0.0487 -0.0295) body=tibia_r
        SimmMusclePoint: location=(0.00336 0.03204 -0.00634) body=foot_r
    SimmZajacHill gas_lat_r: max_isometric_force=488 optimal_fiber_length=0.064 tendon_slack_length=0.385
        pennation_angle=0.1396263 muscle_model=4 groups=(right leg_r knee_r ankle_r)
      SimmMusclePointSet:
        SimmMusclePoint: location=(-0.0155 -0.3946 0.0272) body=femur_r
        SimmMuscleViaPoint: location=(-0.0254 -0.4018 0.0274) body=femur_r coordinate=knee_flex_r
            range=(-0.3490659 0.7700393)
        SimmMusclePoint: location=(-0.0242 -0.0481 0.0235) body=tibia_r
        SimmMusclePoint: location=(0.00336 0.03204 -0.00634) body=foot_r
    SimmZajacHill soleus_r: max_isometric_force=2839 optimal_fiber_length=0.03 tendon_slack_length=0.268
        pennation_angle=0.4363323 muscle_model=4 groups=(right leg_r ankle_r)
      SimmMusclePointSet:
        SimmMusclePoint: location=(-0.0024 -0.1533 0.0071) body=tibia_r
        SimmMusclePoint: location=(0.00336 0.03204 -0.00634) body=foot_r
    SimmZajacHill tib_post_r: max_isometric_force=1270 optimal_fiber_length=0.031 tendon_slack_length=0.31
        pennation_angle=0.2094395 muscle_model=4 groups=(right leg_r ankle_r)
      SimmMusclePointSet:
        SimmMusclePoint: location=(-0.0094 -0.1348 0.0019) body=tibia_r
        SimmMusclePoint: location=(-0.0144 -0.4051 -0.0229) body=tibia_r
        SimmMusclePoint: location=(0.0417 0.0334 -0.0286) body=foot_r
        SimmMusclePoint: location=(0.0772 0.0159 -0.0281) body=foot_r
    SimmZajacHill tib_ant_r: max_isometric_force=603 optimal_fiber_length=0.098 tendon_slack_length=0.223
        pennation_angle=0.08726646 muscle_model=4 groups=(right leg_r ankle_r)
      SimmMusclePointSet:
        SimmMusclePoint: location=(0.0179 -0.1624 0.0115) body=tibia_r
        SimmMusclePoint: location=(0.0329 -0.3951 -0.0177) body=tibia_r
        SimmMusclePoint: location=(0.1166 0.0178 -0.0305) body=foot_r
    SimmZajacHill ext_dig_r: max_isometric_force=341 optimal_fiber_length=0.102 tendon_slack_length=0.345
        pennation_angle=0.1396263 muscle_model=4 groups=(right leg_r ankle_r)
      SimmMusclePointSet:
        SimmMusclePoint: location=(0.0032 -0.1381 0.0276) body=tibia_r
        SimmMusclePoint: location=(0.0289 -0.4007 0.0072) body=tibia_r
        SimmMusclePoint: location=(0.0922 0.0388 -0.0001) body=foot_r
        SimmMusclePoint: location=(0.1616 0.0055 0.013) body=foot_r
        SimmMusclePoint: location=(0.0003 0.0047 0.0153) body=toes_r
        SimmMusclePoint: location=(0.0443 -0.0004 0.025) body=toes_r
    SimmZajacHill ext_hal_r: max_isometric_force=108 optimal_fiber_length=0.111 tendon_slack_length=0.305
        pennation_angle=0.1047198 muscle_model=4 groups=(right leg_r ankle_r)
      SimmMusclePointSet:
        SimmMusclePoint: location=(0.0012 -0.1767 0.0228) body=tibia_r
        SimmMusclePoint: location=(0.0326 -0.3985 -0.0085) body=tibia_r
        SimmMusclePoint: location=(0.097 0.0389 -0.0211) body=foot_r
        SimmMusclePoint: location=(0.1293 0.0309 -0.0257) body=foot_r
        SimmMusclePoint: location=(0.17778 0.01196 -0.0273) body=foot_r
        SimmMusclePoint: location=(0.01217 0.01039 -0.02633) body=toes_r
        SimmMusclePoint: location=(0.05628 -0.00131 -0.01852) body=toes_r
    SimmZajacHill flex_dig_r: max_isometric_force=310 optimal_fiber_length=0.034 tendon_slack_length=0.4
        pennation_angle=0.122173 muscle_model=4 groups=(right leg_r ankle_r)
      SimmMusclePointSet:
        SimmMusclePoint: location=(-0.0083 -0.2046 -0.0018) body=tibia_r
        SimmMusclePoint: location=(-0.0154 -0.4051 -0.0196) body=tibia_r
        SimmMusclePoint: location=(0.0436 0.0315 -0.028) body=foot_r
        SimmMusclePoint: location=(0.0708 0.0176 -0.0263) body=foot_r
        SimmMusclePoint: location=(0.16361 -0.00798 0.01009) body=foot_r
        SimmMusclePoint: location=(-0.0019 -0.0078 0.0147) body=toes_r
        SimmMusclePoint: location=(0.0285 -0.0071 0.0215) body=toes_r
        SimmMusclePoint: location=(0.0441 -0.006 0.0242) body=toes_r
    SimmZajacHill flex_hal_r: max_isometric_force=322 optimal_fiber_length=0.043 tendon_slack_length=0.38
        pennation_angle=0.1745329 muscle_model=4 groups=(right leg_r ankle_r)
      SimmMusclePointSet:
        SimmMusclePoint: location=(-0.0079 -0.2334 0.0244) body=tibia_r
        SimmMusclePoint: location=(-0.0186 -0.4079 -0.0174) body=tibia_r
        SimmMusclePoint: location=(0.0374 0.0276 -0.0241) body=foot_r
        SimmMusclePoint: location=(0.1038 0.0068 -0.0256) body=foot_r
        SimmMusclePoint: location=(0.16956 -0.00501 -0.02761) body=foot_r
        SimmMusclePoint: location=(0.00839 -0.00726 -0.0269) body=toes_r
        SimmMusclePoint: location=(0.05607 -0.00839 -0.01817) body=toes_r
    SimmZajacHill per_brev_r: max_isometric_force=348 optimal_fiber_length=0.05 tendon_slack_length=0.161
        pennation_angle=0.08726646 muscle_model=4 groups=(right leg_r ankle_r)
      SimmMusclePointSet:
        SimmMusclePoint: location=(-0.007 -0.2646 0.0325) body=tibia_r
        SimmMusclePoint: location=(-0.0198 -0.4184 0.0283) body=tibia_r
        SimmMusclePoint: location=(-0.0144 -0.4295 0.0289) body=tibia_r
        SimmMusclePoint: location=(0.0471 0.027 0.0233) body=foot_r
        SimmMusclePoint: location=(0.07569 0.01934 0.02942) body=foot_r
    SimmZajacHill per_long_r: max_isometric_force=754 optimal_fiber_length=0.049 tendon_slack_length=0.345
        pennation_angle=0.1745329 muscle_model=4 groups=(right leg_r ankle_r)
      SimmMusclePointSet:
        SimmMusclePoint: location=(0.0005 -0.1568 0.0362) body=tibia_r
        SimmMusclePoint: location=(-0.0207 -0.4205 0.0286) body=tibia_r
        SimmMusclePoint: location=(-0.0162 -0.4319 0.0289) body=tibia_r
        SimmMusclePoint: location=(0.0438 0.023 0.0221) body=foot_r
        SimmMusclePoint: location=(0.0681 0.0106 0.0284) body=foot_r
        SimmMusclePoint: location=(0.0852 0.0069 0.0118) body=foot_r
        SimmMusclePoint: location=(0.1203 0.0085 -0.0184) body=foot_r
    SimmZajacHill per_tert_r: max_isometric_force=90 optimal_fiber_length=0.079 tendon_slack_length=0.1
        pennation_angle=0.2268928 muscle_model=4 groups=(right leg_r ankle_r)
      SimmMusclePointSet:
        SimmMusclePoint: location=(0.001 -0.2804 0.0231) body=tibia_r
        SimmMusclePoint: location=(0.0229 -0.4069 0.0159) body=tibia_r
        SimmMusclePoint: location=(0.0857 0.0228 0.0299) body=foot_r
    SimmZajacHill glut_max1_l: max_isometric_force=382 optimal_fiber_length=0.142 tendon_slack_length=0.125
        pennation_angle=0.08726646 muscle_model=4 groups=(left leg_l hip_l)
      SimmMusclePointSet:
        SimmMusclePoint: location=(-0.1253 0.0425 -0.0606) body=pelvis
        SimmMusclePoint: location=(-0.1384 -0.0151 -0.0836) body=pelvis
        SimmMusclePoint: location=(-0.0457 -0.0248 -0.0392) body=femur_l
        SimmMusclePoint: location=(-0.0277 -0.0566 -0.047) body=femur_l
    SimmZajacHill glut_max2_l: max_isometric_force=546 optimal_fiber_length=0.147 tendon_slack_length=0.127
        pennation_angle=0 muscle_model=4 groups=(left leg_l hip_l)
      SimmMusclePointSet:
        SimmMusclePoint: location=(-0.1442 0.0013 -0.0513) body=pelvis
        SimmMusclePoint: location=(-0.1469 -0.0683 -0.0864) body=pelvis
        SimmMusclePoint: location=(-0.0426 -0.053 -0.0293) body=femur_l
        SimmMusclePoint: location=(-0.0156 -0.1016 -0.0419) body=femur_l
    SimmZajacHill glut_max3_l: max_isometric_force=368 optimal_fiber_length=0.144 tendon_slack_length=0.114
        pennation_angle=0.08726646 muscle_model=4 groups=(left leg_l hip_l)
      SimmMusclePointSet:
        SimmMusclePoint: location=(-0.1642 -0.0792 -0.0074) body=pelvis
        SimmMusclePoint: location=(-0.1622 -0.1215 -0.0353) body=pelvis
        SimmMusclePoint: location=(-0.0299 -0.1041 -0.0135) body=femur_l
        SimmMusclePoint: location=(-0.006 -0.1419 -0.0411) body=femur_l
    SimmZajacHill glut_med1_l: max_isometric_force=546 optimal_fiber_length=0.0535 tendon_slack_length=0.078
        pennation_angle=0.1396263 muscle_model=4 groups=(left leg_l hip_l)
      SimmMusclePointSet:
        SimmMusclePoint: location=(-0.0501 0.0141 -0.1159) body=pelvis
        SimmMusclePoint: location=(-0.0218 -0.0117 -0.0555) body=femur_l
    SimmZajacHill glut_med2_l: max_isometric_force=382 optimal_fiber_length=0.0845 tendon_slack_length=0.037
        pennation_angle=0 muscle_model=4 groups=(left leg_l hip_l)
      SimmMusclePointSet:
        SimmMusclePoint: location=(-0.0964 0.0137 -0.0792) body=pelvis
        SimmMusclePoint: location=(-0.0258 -0.0058 -0.0527) body=femur_l
    SimmZajacHill glut_med3_l: max_isometric_force=435 optimal_fiber_length=0.0646 tendon_slack_length=0.053
        pennation_angle=0.3316126 muscle_model=4 groups=(left leg_l hip_l)
      SimmMusclePointSet:
        SimmMusclePoint: location=(-0.1316 -0.0058 -0.0598) body=pelvis
        SimmMusclePoint: location=(-0.0309 -0.0047 -0.0518) body=femur_l
    SimmZajacHill glut_min1_l: max_isometric_force=180 optimal_fiber_length=0.068 tendon_slack_length=0.016
        pennation_angle=0.1745329 muscle_model=4 groups=(left leg_l hip_l)
      SimmMusclePointSet:
        SimmMusclePoint: location=(-0.056 -0.0243 -0.1006) body=pelvis
        SimmMusclePoint: location=(-0.0072 -0.0104 -0.056) body=femur_l
    SimmZajacHill glut_min2_l: max_isometric_force=190 optimal_fiber_length=0.056 tendon_slack_length=0.026
        pennation_angle=0 muscle_model=4 groups=(left leg_l hip_l)
      SimmMusclePointSet:
        SimmMusclePoint: location=(-0.0726 -0.0228 -0.0941) body=pelvis
        SimmMusclePoint: location=(-0.0096 -0.0104 -0.056) body=femur_l
    SimmZajacHill glut_min3_l: max_isometric_force=215 optimal_fiber_length=0.038 tendon_slack_length=0.051
        pennation_angle=0.3665191 muscle_model=4 groups=(left leg_l hip_l)
      SimmMusclePointSet:
        SimmMusclePoint: location=(-0.0927 -0.0226 -0.0806) body=pelvis
        SimmMusclePoint: location=(-0.0135 -0.0083 -0.055) body=femur_l
    SimmZajacHill add_long_l: max_isometric_force=418 optimal_fiber_length=0.138 tendon_slack_length=0.1105
        pennation_angle=0.1047198 muscle_model=4 groups=(left leg_l hip_l)
      SimmMusclePointSet:
        SimmMusclePoint: location=(-0.0434 -0.1058 -0.0098) body=pelvis
        SimmMusclePoint: location=(0.005 -0.2111 -0.0234) body=femur_l
    SimmZajacHill add_brev_l: max_isometric_force=286 optimal_fiber_length=0.133 tendon_slack_length=0.013
        pennation_angle=0 muscle_model=4 groups=(left leg_l hip_l)
      SimmMusclePointSet:
        SimmMusclePoint: location=(-0.0685 -0.1124 -0.0164) body=pelvis
        SimmMusclePoint: location=(0.0009 -0.1196 -0.0294) body=femur_l
    SimmZajacHill add_mag1_l: max_isometric_force=346 optimal_fiber_length=0.087 tendon_slack_length=0.06
        pennation_angle=0.08726646 muscle_model=4 groups=(left leg_l hip_l)
      SimmMusclePointSet:
        SimmMusclePoint: location=(-0.0825 -0.1337 -0.0205) body=pelvis
        SimmMusclePoint: location=(-0.0045 -0.1211 -0.0339) body=femur_l
    SimmZajacHill add_mag2_l: max_isometric_force=312 optimal_fiber_length=0.121 tendon_slack_length=0.13
        pennation_angle=0.05235988 muscle_model=4 groups=(left leg_l hip_l)
      SimmMusclePointSet:
        SimmMusclePoint: location=(-0.0924 -0.1355 -0.0258) body=pelvis
        SimmMusclePoint: location=(0.0054 -0.2285 -0.0227) body=femur_l
    SimmZajacHill add_mag3_l: max_isometric_force=444 optimal_fiber_length=0.131 tendon_slack_length=0.26
        pennation_angle=0.08726646 muscle_model=4 groups=(left leg_l hip_l)
      SimmMusclePointSet:
        SimmMusclePoint: location=(-0.0864 -0.1344 -0.0226) body=pelvis
        SimmMusclePoint: location=(0.007 -0.3837 -0.0266) body=femur_l
    SimmZajacHill pectineus_l: max_isometric_force=177 optimal_fiber_length=0.133 tendon_slack_length=0.001
        pennation_angle=0 muscle_model=4 groups=(left leg_l hip_l)
      SimmMusclePointSet:
        SimmMusclePoint: location=(-0.0524 -0.0931 -0.0401) body=pelvis
        SimmMusclePoint: location=(-0.0122 -0.0822 -0.0253) body=femur_l
    SimmZajacHill iliacus_l: max_isometric_force=429 optimal_fiber_length=0.1 tendon_slack_length=0.09
        pennation_angle=0.122173 muscle_model=4 groups=(left leg_l hip_l)
      SimmMusclePointSet:
        SimmMusclePoint: location=(-0.0784 0.0194 -0.0828) body=pelvis
        SimmMusclePoint: location=(-0.0311 -0.0713 -0.0801) body=pelvis
        SimmMusclePoint: location=(0.0017 -0.0543 -0.0057) body=femur_l
        SimmMusclePoint: location=(-0.0193 -0.0621 -0.0129) body=femur_l
    SimmZajacHill psoas_l: max_isometric_force=371 optimal_fiber_length=0.104 tendon_slack_length=0.113
        pennation_angle=0.1396263 muscle_model=4 groups=(left leg_l hip_l)
      SimmMusclePointSet:
        SimmMusclePoint: location=(-0.07817 0.05129 -0.0207) body=pelvis
        SimmMusclePoint: location=(-0.0331 -0.0733 -0.0709) body=pelvis
        SimmMusclePoint: location=(0.0016 -0.0507 -0.0038) body=femur_l
        SimmMusclePoint: location=(-0.0188 -0.0597 -0.0104) body=femur_l
    SimmZajacHill quad_fem_l: max_isometric_force=254 optimal_fiber_length=0.054 tendon_slack_length=0.024
        pennation_angle=0 muscle_model=4 groups=(left leg_l hip_l)
      SimmMusclePointSet:
        SimmMusclePoint: location=(-0.1236 -0.1314 -0.047) body=pelvis
        SimmMusclePoint: location=(-0.0381 -0.0359 -0.0366) body=femur_l
    SimmZajacHill gemellus_l: max_isometric_force=109 optimal_fiber_length=0.024 tendon_slack_length=0.039
        pennation_angle=0 muscle_model=4 groups=(left leg_l hip_l)
      SimmMusclePointSet:
        SimmMusclePoint: location=(-0.1226 -0.0983 -0.0664) body=pelvis
        SimmMusclePoint: location=(-0.0142 -0.0033 -0.0443) body=femur_l
    SimmZajacHill piri_l: max_isometric_force=296 optimal_fiber_length=0.026 tendon_slack_length=0.106
        pennation_angle=0.1745329 muscle_model=4 groups=(left leg_l hip_l)
      SimmMusclePointSet:
        SimmMusclePoint: location=(-0.1679 -0.0458 -0.0291) body=pelvis
        SimmMusclePoint: location=(-0.1333 -0.0531 -0.0605) body=pelvis
        SimmMusclePoint: location=(-0.0148 -0.0036 -0.0437) body=femur_l
    SimmZajacHill TFL_l: max_isometric_force=155 optimal_fiber_length=0.095 tendon_slack_length=0.425
        pennation_angle=0.05235988 muscle_model=4 groups=(left leg_l hip_l)
      SimmMusclePointSet:
        SimmMusclePoint: location=(-0.0404 0.0051 -0.1191) body=pelvis
        SimmMusclePoint: location=(0.0294 -0.0995 -0.0597) body=femur_l
        SimmMusclePoint: location=(0.0054 -0.4049 -0.0357) body=femur_l
        SimmMusclePoint: location=(0.006 -0.0487 -0.0297) body=tibia_l
    SimmZajacHill gracilis_l: max_isometric_force=108 optimal_fiber_length=0.352 tendon_slack_length=0.14
        pennation_angle=0.05235988 muscle_model=4 groups=(left leg_l hip_l knee_l)
      SimmMusclePointSet:
        SimmMusclePoint: location=(-0.0656 -0.1201 -0.0029) body=pelvis
        SimmMusclePoint: location=(-0.0154 -0.0475 0.0358) body=tibia_l
        SimmMusclePoint: location=(0.006 -0.0836 0.0228) body=tibia_l
    SimmZajacHill semimem_l: max_isometric_force=1030 optimal_fiber_length=0.08 tendon_slack_length=0.359
        pennation_angle=0.2617994 muscle_model=4 groups=(left leg_l hip_l knee_l)
      SimmMusclePointSet:
        SimmMusclePoint: location=(-0.1285 -0.1178 -0.0645) body=pelvis
        SimmMusclePoint: location=(-0.0243 -0.0536 0.0194) body=tibia_l
    SimmZajacHill semiten_l: max_isometric_force=328 optimal_fiber_length=0.201 tendon_slack_length=0.262
        pennation_angle=0.08726646 muscle_model=4 groups=(left leg_l hip_l knee_l)
      SimmMusclePointSet:
        SimmMusclePoint: location=(-0.133 -0.1206 -0.0553) body=pelvis
        SimmMusclePoint: location=(-0.0314 -0.0545 0.0146) body=tibia_l
        SimmMusclePoint: location=(-0.0113 -0.0746 0.0245) body=tibia_l
        SimmMusclePoint: location=(0.0027 -0.0956 0.0193) body=tibia_l
    SimmZajacHill bi_fem_lh_l: max_isometric_force=717 optimal_fiber_length=0.109 tendon_slack_length=0.341
        pennation_angle=0 muscle_model=4 groups=(left leg_l hip_l knee_l)
      SimmMusclePointSet:
        SimmMusclePoint: location=(-0.1337 -0.1164 -0.0616) body=pelvis
        SimmMusclePoint: location=(-0.0081 -0.0729 -0.0423) body=tibia_l
    SimmZajacHill bi_fem_sh_l: max_isometric_force=402 optimal_fiber_length=0.173 tendon_slack_length=0.1
        pennation_angle=0.4014257 muscle_model=4 groups=(left leg_l hip_l knee_l)
      SimmMusclePointSet:
        SimmMusclePoint: location=(0.005 -0.2111 -0.0234) body=femur_l
        SimmMusclePoint: location=(-0.0101 -0.0725 -0.0406) body=tibia_l
    SimmZajacHill sartorius_l: max_isometric_force=104 optimal_fiber_length=0.579 tendon_slack_length=0.04
        pennation_angle=0 muscle_model=4 groups=(left leg_l hip_l knee_l)
      SimmMusclePointSet:
        SimmMusclePoint: location=(-0.0296 -0.018 -0.1198) body=pelvis
        SimmMusclePoint: location=(-0.003 -0.3568 0.0421) body=femur_l
        SimmMusclePoint: location=(-0.0056 -0.0419 0.0399) body=tibia_l
        SimmMusclePoint: location=(0.006 -0.0589 0.0383) body=tibia_l
        SimmMusclePoint: location=(0.0243 -0.084 0.0252) body=tibia_l
    SimmZajacHill rectus_fem_l: max_isometric_force=779 optimal_fiber_length=0.084 tendon_slack_length=0.346
        pennation_angle=0.08726646 muscle_model=4 groups=(left leg_l hip_l knee_l)
      SimmMusclePointSet:
        SimmMusclePoint: location=(-0.0388 -0.0474 -0.0918) body=pelvis
        SimmMuscleViaPoint: location=(0.0334 -0.403 -0.0019) body=femur_l coordinate=knee_flex_l
            range=(1.459968 2.617994)
        SimmMusclePoint: location=(0.0121 0.0437 0.001) body=patella_l
    SimmZajacHill vas_med_l: max_isometric_force=1294 optimal_fiber_length=0.089 tendon_slack_length=0.126
        pennation_angle=0.08726646 muscle_model=4 groups=(left leg_l knee_l)
      SimmMusclePointSet:
        SimmMusclePoint: location=(0.014 -0.2099 -0.0188) body=femur_l
        SimmMusclePoint: location=(0.0356 -0.2769 -0.0009) body=femur_l
        SimmMuscleViaPoint: location=(0.037 -0.4048 0.0125) body=femur_l coordinate=knee_flex_l
            range=(1.209862 2.617994)
        SimmMuscleViaPoint: location=(0.0274 -0.4255 0.0131) body=femur_l coordinate=knee_flex_l
            range=(1.780061 2.617994)
        SimmMusclePoint: location=(0.0063 0.0445 0.017) body=patella_l
    SimmZajacHill vas_int_l: max_isometric_force=1365 optimal_fiber_length=0.087 tendon_slack_length=0.136
        pennation_angle=0.05235988 muscle_model=4 groups=(left leg_l knee_l)
      SimmMusclePointSet:
        SimmMusclePoint: location=(0.029 -0.1924 -0.031) body=femur_l
        SimmMusclePoint: location=(0.0335 -0.2084 -0.0285) body=femur_l
        SimmMuscleViaPoint: location=(0.0343 -0.403 -0.0055) body=femur_l coordinate=knee_flex_l range=(1.42 2.617994)
        SimmMusclePoint: location=(0.0058 0.048 0.0006) body=patella_l
    SimmZajacHill vas_lat_l: max_isometric_force=1871 optimal_fiber_length=0.084 tendon_slack_length=0.157
        pennation_angle=0.08726646 muscle_model=4 groups=(left leg_l knee_l)
      SimmMusclePointSet:
        SimmMusclePoint: location=(0.0048 -0.1854 -0.0349) body=femur_l
        SimmMusclePoint: location=(0.0269 -0.2591 -0.0409) body=femur_l
        SimmMuscleViaPoint: location=(0.0361 -0.403 -0.0205) body=femur_l coordinate=knee_flex_l
            range=(1.209862 2.617994)
        SimmMuscleViaPoint: location=(0.0253 -0.4243 -0.0184) body=femur_l coordinate=knee_flex_l
            range=(1.919862 2.617994)
        SimmMusclePoint: location=(0.0103 0.0423 -0.0141) body=patella_l
    SimmZajacHill pat_lig_l: max_isometric_force=100 optimal_fiber_length=0.05 tendon_slack_length=0.005
        pennation_angle=0 muscle_model=4 groups=(left leg_l knee_l)
      SimmMusclePointSet:
        SimmMusclePoint: location=(0.039 -0.0822 0) body=tibia_l
        SimmMusclePoint: location=(0.0021 0.0015 -0.0001) body=patella_l
    SimmZajacHill gas_med_l: max_isometric_force=1113 optimal_fiber_length=0.045 tendon_slack_length=0.408
        pennation_angle=0.296706 muscle_model=4 groups=(left leg_l knee_l ankle_l)
      SimmMusclePointSet:
        SimmMusclePoint: location=(-0.0127 -0.3929 0.0235) body=femur_l
        SimmMuscleViaPoint: location=(-0.0239 -0.4022 0.0258) body=femur_l coordinate=knee_flex_l
            range=(-0.3490659 0.7700393)
        SimmMusclePoint: location=(-0.0217 -0.0487 0.0295) body=tibia_l
        SimmMusclePoint: location=(0.00336 0.03204 0.00634) body=foot_l
    SimmZajacHill gas_lat_l: max_isometric_force=488 optimal_fiber_length=0.064 tendon_slack_length=0.385
        pennation_angle=0.1396263 muscle_model=4 groups=(left leg_l knee_l ankle_l)
      SimmMusclePointSet:
        SimmMusclePoint: location=(-0.0155 -0.3946 -0.0272) body=femur_l
        SimmMuscleViaPoint: location=(-0.0254 -0.4018 -0.0274) body=femur_l coordinate=knee_flex_l
            range=(-0.3490659 0.7700393)
        SimmMusclePoint: location=(-0.0242 -0.0481 -0.0235) body=tibia_l
        SimmMusclePoint: location=(0.00336 0.03204 0.00634) body=foot_l
    SimmZajacHill soleus_l: max_isometric_force=2839 optimal_fiber_length=0.03 tendon_slack_length=0.268
        pennation_angle=0.4363323 muscle_model=4 groups=(left leg_l ankle_l)
      SimmMusclePointSet:
        SimmMusclePoint: location=(-0.0024 -0.1533 -0.0071) body=tibia_l
        SimmMusclePoint: location=(0.00336 0.03204 0.00634) body=foot_l
    SimmZajacHill tib_post_l: max_isometric_force=1270 optimal_fiber_length=0.031 tendon_slack_length=0.31
        pennation_angle=0.2094395 muscle_model=4 groups=(left leg_l ankle_l)
      SimmMusclePointSet:
        SimmMusclePoint: location=(-0.0094 -0.1348 -0.0019) body=tibia_l
        SimmMusclePoint: location=(-0.0144 -0.4051 0.0229) body=tibia_l
        SimmMusclePoint: location=(0.0417 0.0334 0.0286) body=foot_l
        SimmMusclePoint: location=(0.0772 0.0159 0.0281) body=foot_l
    SimmZajacHill tib_ant_l: max_isometric_force=603 optimal_fiber_length=0.098 tendon_slack_length=0.223
        pennation_angle=0.08726646 muscle_model=4 groups=(left leg_l ankle_l)
      SimmMusclePointSet:
        SimmMusclePoint: location=(0.0179 -0.1624 -0.0115) body=tibia_l
        SimmMusclePoint: location=(0.0329 -0.3951 0.0177) body=tibia_l
        SimmMusclePoint: location=(0.1166 0.0178 0.0305) body=foot_l
    SimmZajacHill ext_dig_l: max_isometric_force=341 optimal_fiber_length=0.102 tendon_slack_length=0.345
        pennation_angle=0.1396263 muscle_model=4 groups=(left leg_l ankle_l)
      SimmMusclePointSet:
        SimmMusclePoint: location=(0.0032 -0.1381 -0.0276) body=tibia_l
        SimmMusclePoint: location=(0.0289 -0.4007 -0.0072) body=tibia_l
        SimmMusclePoint: location=(0.0922 0.0388 0.0001) body=foot_l
        SimmMusclePoint: location=(0.1616 0.0055 -0.013) body=foot_l
        SimmMusclePoint: location=(0.0003 0.0047 -0.0153) body=toes_l
        SimmMusclePoint: location=(0.0443 -0.0004 -0.025) body=toes_l
    SimmZajacHill ext_hal_l: max_isometric_force=108 optimal_fiber_length=0.111 tendon_slack_length=0.305
        pennation_angle=0.1047198 muscle_model=4 groups=(left leg_l ankle_l)
      SimmMusclePointSet:
        SimmMusclePoint: location=(0.0012 -0.1767 -0.0228) body=tibia_l
        SimmMusclePoint: location=(0.0326 -0.3985 0.0085) body=tibia_l
        SimmMusclePoint: location=(0.097 0.0389 0.0211) body=foot_l
        SimmMusclePoint: location=(0.1293 0.0309 0.0257) body=foot_l
        SimmMusclePoint: location=(0.17778 0.01196 0.0273) body=foot_l
        SimmMusclePoint: location=(0.01217 0.01039 0.02633) body=toes_l
        SimmMusclePoint: location=(0.05628 -0.00131 0.01852) body=toes_l
    SimmZajacHill flex_dig_l: max_isometric_force=310 optimal_fiber_length=0.034 tendon_slack_length=0.4
        pennation_angle=0.122173 muscle_model=4 groups=(left leg_l ankle_l)
      SimmMusclePointSet:
        SimmMusclePoint: location=(-0.0083 -0.2046 0.0018) body=tibia_l
        SimmMusclePoint: location=(-0.0154 -0.4051 0.0196) body=tibia_l
        SimmMusclePoint: location=(0.0436 0.0315 0.028) body=foot_l
        SimmMusclePoint: location=(0.0708 0.0176 0.0263) body=foot_l
        SimmMusclePoint: location=(0.16361 -0.00798 -0.01009) body=foot_l
        SimmMusclePoint: location=(-0.0019 -0.0078 -0.0147) body=toes_l
        SimmMusclePoint: location=(0.0285 -0.0071 -0.0215) body=toes_l
        SimmMusclePoint: location=(0.0441 -0.006 -0.0242) body=toes_l
    SimmZajacHill flex_hal_l: max_isometric_force=322 optimal_fiber_length=0.043 tendon_slack_length=0.38
        pennation_angle=0.1745329 muscle_model=4 groups=(left leg_l ankle_l)
      SimmMusclePointSet:
        SimmMusclePoint: location=(-0.0079 -0.2334 -0.0244) body=tibia_l
        SimmMusclePoint: location=(-0.0186 -0.4079 0.0174) body=tibia_l
        SimmMusclePoint: location=(0.0374 0.0276 0.0241) body=foot_l
        SimmMusclePoint: location=(0.1038 0.0068 0.0256) body=foot_l
        SimmMusclePoint: location=(0.16956 -0.00501 0.02761) body=foot_l
        SimmMusclePoint: location=(0.00839 -0.00726 0.0269) body=toes_l
        SimmMusclePoint: location=(0.05607 -0.00839 0.01817) body=toes_l
    SimmZajacHill per_brev_l: max_isometric_force=348 optimal_fiber_length=0.05 tendon_slack_length=0.161
        pennation_angle=0.08726646 muscle_model=4 groups=(left leg_l ankle_l)
      SimmMusclePointSet:
        SimmMusclePoint: location=(-0.007 -0.2646 -0.0325) body=tibia_l
        SimmMusclePoint: location=(-0.0198 -0.4184 -0.0283) body=tibia_l
        SimmMusclePoint: location=(-0.0144 -0.4295 -0.0289) body=tibia_l
        SimmMusclePoint: location=(0.0471 0.027 -0.0233) body=foot_l
        SimmMusclePoint: location=(0.07569 0.01934 -0.02942) body=foot_l
    SimmZajacHill per_long_l: max_isometric_force=754 optimal_fiber_length=0.049 tendon_slack_length=0.345
        pennation_angle=0.1745329 muscle_model=4 groups=(left leg_l ankle_l)
      SimmMusclePointSet:
        SimmMusclePoint: location=(0.0005 -0.1568 -0.0362) body=tibia_l
        SimmMusclePoint: location=(-0.0207 -0.4205 -0.0286) body=tibia_l
        SimmMusclePoint: location=(-0.0162 -0.4319 -0.0289) body=tibia_l
        SimmMusclePoint: location=(0.0438 0.023 -0.0221) body=foot_l
        SimmMusclePoint: location=(0.0681 0.0106 -0.0284) body=foot_l
        SimmMusclePoint: location=(0.0852 0.0069 -0.0118) body=foot_l
        SimmMusclePoint: location=(0.1203 0.0085 0.0184) body=foot_l
    SimmZajacHill per_tert_l: max_isometric_force=90 optimal_fiber_length=0.079 tendon_slack_length=0.1
        pennation_angle=0.2268928 muscle_model=4 groups=(left leg_l ankle_l)
      SimmMusclePointSet:
        SimmMusclePoint: location=(0.001 -0.2804 -0.0231) body=tibia_l
        SimmMusclePoint: location=(0.0229 -0.4069 -0.0159) body=tibia_l
        SimmMusclePoint: location=(0.0857 0.0228 -0.0299) body=foot_l
  DynamicsEngine:
    SimmKinematicsEngine: gravity=(0 0 -9.80665)
      MarkerSet:
        SimmMarker V.Sacral: body=pelvis location=(-0.17 0 0) weight=2
        SimmMarker Sacral: body=pelvis location=(-0.17 0 0) weight=2
        SimmMarker V.Sacrum: body=pelvis location=(-0.17 0 0) weight=2
        SimmMarker Sacrum: body=pelvis location=(-0.17 0 0) weight=2
        SimmMarker SACR: body=pelvis location=(-0.17 0 0) weight=2
        SimmMarker VSAC: body=pelvis location=(-0.17 0 0) weight=2
        SimmMarker R.ASIS: body=pelvis location=(0.014 0.0115 0.128) weight=2
        SimmMarker RASIS: body=pelvis location=(0.014 0.0115 0.128) weight=2
        SimmMarker RASI: body=pelvis location=(0.014 0.0115 0.128) weight=2
        SimmMarker R.PSIS: body=pelvis location=(-0.145 0.04 0.055) weight=2
        SimmMarker RPSIS: body=pelvis location=(-0.145 0.04 0.055) weight=2
        SimmMarker RPSI: body=pelvis location=(-0.145 0.04 0.055) weight=2
        SimmMarker R.Trochanter: body=pelvis location=(-0.01 -0.02 0.08) weight=2
        SimmMarker L.ASIS: body=pelvis location=(0.014 0.0115 -0.128) weight=2
        SimmMarker LASIS: body=pelvis location=(0.014 0.0115 -0.128) weight=2
        SimmMarker LASI: body=pelvis location=(0.014 0.0115 -0.128) weight=2
        SimmMarker L.PSIS: body=pelvis location=(-0.145 0.04 -0.055) weight=2
        SimmMarker LPSIS: body=pelvis location=(-0.145 0.04 -0.055) weight=2
        SimmMarker LPSI: body=pelvis location=(-0.145 0.04 -0.055) weight=2
        SimmMarker L.Trochanter: body=pelvis location=(-0.01 -0.02 -0.08) weight=2
        SimmMarker Offset: body=torso location=(-0.18 0.22 0) weight=1
        SimmMarker Sternum: body=torso location=(0.035 0.41 0) weight=1
        SimmMarker T10: body=torso location=(0 0 0) weight=1
        SimmMarker CLAV: body=torso location=(0.18 0.22 0) weight=1
        SimmMarker STRN: body=torso location=(0.18 0.22 0) weight=1
        SimmMarker RBAK: body=torso location=(0.18 0.22 0) weight=1
        SimmMarker R.Scapula: body=torso location=(-0.12 -0.1 -0.08) weight=1
        SimmMarker R.Scapula.Top: body=torso location=(0 0 0) weight=1
        SimmMarker R.Scapula.Bottom: body=torso location=(0 0 0) weight=1
        SimmMarker R.Angulus Acromialis: body=torso location=(-0.085 0.435 0.184) weight=1
        SimmMarker R.Trigonum Spinae: body=torso location=(-0.126 0.4 0.119) weight=1
        SimmMarker R.Angulus Inferior: body=torso location=(-0.135 0.27 0.135) weight=1
        SimmMarker C7 Spinous Process: body=torso location=(-0.08 0.455 0) weight=1
        SimmMarker L.Scapula: body=torso location=(-0.12 -0.1 0.08) weight=1
        SimmMarker L.Scapula.Top: body=torso location=(0 0 0) weight=1
        SimmMarker L.Scapula.Bottom: body=torso location=(0 0 0) weight=1
        SimmMarker L.Angulus Acromialis: body=torso location=(-0.085 0.435 -0.184) weight=1
        SimmMarker L.Trigonum Spinae: body=torso location=(-0.126 0.4 -0.119) weight=1
        SimmMarker L.Angulus Inferior: body=torso location=(-0.135 0.27 -0.135) weight=1
        SimmMarker C7: body=neckhead location=(0 0 0) weight=1
        SimmMarker C7 Spinous Process: body=neckhead location=(0 0 0) weight=1
        SimmMarker Rear.Head: body=OT_head location=(0 0 0) weight=1
        SimmMarker Head.Rear: body=OT_head location=(0 0 0) weight=1
        SimmMarker RearHead: body=OT_head location=(0 0 0) weight=1
        SimmMarker HeadRear: body=OT_head location=(0 0 0) weight=1
        SimmMarker Front.Head: body=OT_head location=(0 0.19 0) weight=1
        SimmMarker Head.Front: body=OT_head location=(0 0.19 0) weight=1
        SimmMarker FrontHead: body=OT_head location=(0 0.19 0) weight=1
        SimmMarker HeadFront: body=OT_head location=(0 0.19 0) weight=1
        SimmMarker Top.Head: body=OT_head location=(-0.06 0.095 0) weight=1
        SimmMarker Head.Top: body=OT_head location=(-0.06 0.095 0) weight=1
        SimmMarker TopHead: body=OT_head location=(-0.06 0.095 0) weight=1
        SimmMarker HeadTop: body=OT_head location=(-0.06 0.095 0) weight=1
        SimmMarker R.Ear: body=OT_head location=(0 0 0) weight=1
        SimmMarker L.Ear: body=OT_head location=(0 0 0) weight=1
        SimmMarker RBHD: body=OT_head location=(0 0 0) weight=1
        SimmMarker RFHD: body=OT_head location=(0 0 0) weight=1
        SimmMarker LBHD: body=OT_head location=(0 0 0) weight=1
        SimmMarker LFHD: body=OT_head location=(0 0 0) weight=1
        SimmMarker HEDO: body=OT_head location=(0 0 0) weight=1
        SimmMarker HEDP: body=OT_head location=(0 0 0) weight=1
        SimmMarker HEDA: body=OT_head location=(0 0 0) weight=1
        SimmMarker HEDL: body=OT_head location=(0 0 0) weight=1
        SimmMarker R.Shoulder: body=clavicle_marker_r location=(0 0 0.165) weight=1
        SimmMarker RSHO: body=clavicle_marker_r location=(0 0 0.165) weight=1
        SimmMarker R.Bicep: body=humerus_r location=(0.04 -0.15 0) weight=2
        SimmMarker R.Tricep: body=humerus_r location=(-0.04 -0.15 0) weight=2
        SimmMarker R.Biceps.Lateral: body=humerus_r location=(0.03 -0.15 0.02) weight=2
        SimmMarker R.Elbow: body=elbow_marker_r location=(-0.01 -0.281 0.04) weight=2
        SimmMarker R.Elbow.Lateral: body=elbow_marker_r location=(-0.01 -0.281 0.04) weight=2
        SimmMarker R.Elbow.Lat: body=elbow_marker_r location=(-0.01 -0.281 0.04) weight=2
        SimmMarker RELB: body=elbow_marker_r location=(-0.01 -0.281 0.04) weight=2
        SimmMarker R.Elbow.Medial: body=elbow_marker_r location=(0 -0.281 -0.04) weight=2
        SimmMarker R.Elbow.Med: body=elbow_marker_r location=(0 -0.281 -0.04) weight=2
        SimmMarker R.Forearm: body=ulna_r location=(0 -0.15 0) weight=2
        SimmMarker R.Wrist: body=wrist_marker_r location=(-0.025 -0.245 0.006) weight=2
        SimmMarker R.Wrist.Lateral: body=wrist_marker_r location=(-0.025 -0.245 0.006) weight=2
        SimmMarker R.Wrist.Lat: body=wrist_marker_r location=(-0.025 -0.245 0.006) weight=2
        SimmMarker R.Wrist.Medial: body=wrist_marker_r location=(0.035 -0.245 0) weight=2
        SimmMarker R.Wrist.Med: body=wrist_marker_r location=(0.035 -0.245 0) weight=2
        SimmMarker R.Ulna: body=wrist_marker_r location=(0 -0.245 -0.03) weight=2
        SimmMarker R.Radius: body=wrist_marker_r location=(0 -0.245 0.04) weight=2
        SimmMarker RWRI: body=wrist_marker_r location=(-0.025 -0.245 0.006) weight=2
        SimmMarker RWRA: body=wrist_marker_r location=(-0.025 -0.245 0.006) weight=2
        SimmMarker RWRB: body=wrist_marker_r location=(0.035 -0.245 0) weight=2
        SimmMarker R.Hand: body=hand_r location=(-0.03 -0.05 0) weight=1
        SimmMarker L.Shoulder: body=clavicle_marker_l location=(0 0 -0.165) weight=1
        SimmMarker LSHO: body=clavicle_marker_l location=(0 0 -0.165) weight=1
        SimmMarker L.Bicep: body=humerus_l location=(0.04 -0.15 0) weight=2
        SimmMarker L.Tricep: body=humerus_l location=(-0.04 -0.15 0) weight=2
        SimmMarker L.Biceps.Lateral: body=humerus_l location=(0.03 -0.15 -0.02) weight=2
        SimmMarker L.Elbow: body=elbow_marker_l location=(0.01 -0.281 -0.04) weight=2
        SimmMarker L.Elbow.Lateral: body=elbow_marker_l location=(0.01 -0.281 -0.04) weight=2
        SimmMarker L.Elbow.Lat: body=elbow_marker_l location=(0.01 -0.281 -0.04) weight=2
        SimmMarker LELB: body=elbow_marker_l location=(0.01 -0.281 -0.04) weight=2
        SimmMarker L.Elbow.Medial: body=elbow_marker_l location=(-0.02 -0.281 0.04) weight=2
        SimmMarker L.Elbow.Med: body=elbow_marker_l location=(-0.02 -0.281 0.04) weight=2
        SimmMarker L.Forearm: body=ulna_l location=(0 -0.15 0) weight=2
        SimmMarker L.Wrist: body=wrist_marker_l location=(-0.025 -0.245 -0.006) weight=2
        SimmMarker L.Wrist.Lateral: body=wrist_marker_l location=(-0.025 -0.245 -0.006) weight=2
        SimmMarker L.Wrist.Lat: body=wrist_marker_l location=(-0.025 -0.245 -0.006) weight=2
        SimmMarker L.Wrist.Medial: body=wrist_marker_l location=(0.035 -0.245 0) weight=2
        SimmMarker L.Wrist.Med: body=wrist_marker_l location=(0.035 -0.245 0) weight=2
        SimmMarker L.Ulna: body=wrist_marker_l location=(0 -0.245 0.03) weight=2
        SimmMarker L.Radius: body=wrist_marker_l location=(0 -0.245 -0.04) weight=2
        SimmMarker LWRI: body=wrist_marker_l location=(-0.025 -0.245 -0.006) weight=2
        SimmMarker LWRA: body=wrist_marker_l location=(-0.025 -0.245 -0.006) weight=2
        SimmMarker LWRB: body=wrist_marker_l location=(0.025 -0.245 0) weight=2
        SimmMarker L.Hand: body=hand_l location=(-0.03 -0.05 0) weight=1
        SimmMarker R.Knee: body=femur_r location=(0 -0.404 0.05) weight=1
        SimmMarker R.Knee.Lateral: body=femur_r location=(0 -0.404 0.05) weight=1
        SimmMarker R.Knee.Lat: body=femur_r location=(0 -0.404 0.05) weight=1
        SimmMarker RKNE: body=femur_r location=(0 -0.404 0.05) weight=1
        SimmMarker R.Knee.Medial: body=femur_r location=(0 -0.404 -0.05) weight=1
        SimmMarker R.Knee.Med: body=femur_r location=(0 -0.404 -0.05) weight=1
        SimmMarker R.Thigh: body=femur_r location=(0.0179 -0.224 0.1147) weight=1
        SimmMarker R.Thigh.Upper: body=femur_r location=(0.0179 -0.264 0.0647) weight=1
        SimmMarker R.Thigh.Front: body=femur_r location=(0.08 -0.324 0.0047) weight=1
        SimmMarker R.Thigh.Rear: body=femur_r location=(-0.0479 -0.324 0.0047) weight=1
        SimmMarker RTHI: body=femur_r location=(0.0179 -0.264 0.0647) weight=1
        SimmMarker R.Ankle: body=tibia_r location=(-0.005 -0.41 0.053) weight=2
        SimmMarker R.Ankle.Lateral: body=tibia_r location=(-0.005 -0.41 0.053) weight=2
        SimmMarker R.Ankle.Lat: body=tibia_r location=(-0.005 -0.41 0.053) weight=2
        SimmMarker RANK: body=tibia_r location=(-0.005 -0.41 0.053) weight=2
        SimmMarker R.Ankle.Medial: body=tibia_r location=(0.006 -0.3888 -0.038) weight=2
        SimmMarker R.Ankle.Med: body=tibia_r location=(0.006 -0.3888 -0.038) weight=2
        SimmMarker R.Shank: body=tibia_r location=(0.0104 -0.2322 0.0748) weight=1
        SimmMarker R.Shank.Upper: body=tibia_r location=(0.0125 -0.3196 0.06) weight=1
        SimmMarker R.Shank.Front: body=tibia_r location=(0.0425 -0.3596 0) weight=1
        SimmMarker R.Shank.Rear: body=tibia_r location=(-0.0325 -0.3596 0) weight=1
        SimmMarker RTIB: body=tibia_r location=(0.0125 -0.3196 0.06) weight=1
        SimmMarker R.Toe: body=foot_marker_r location=(0.19 0 0) weight=2
        SimmMarker RTOE: body=foot_marker_r location=(0.19 0 0) weight=2
        SimmMarker R.MedFoot: body=foot_marker_r location=(0.13 0 -0.03) weight=2
        SimmMarker R.LatFoot: body=foot_marker_r location=(0.13 0 0.05) weight=2
        SimmMarker R.Heel: body=foot_marker_r location=(0 0 0) weight=2
        SimmMarker RHEE: body=foot_marker_r location=(0 0 0) weight=2
        SimmMarker L.Knee: body=femur_l location=(0 -0.404 -0.05) weight=1
        SimmMarker L.Knee.Lateral: body=femur_l location=(0 -0.404 -0.05) weight=1
        SimmMarker L.Knee.Lat: body=femur_l location=(0 -0.404 -0.05) weight=1
        SimmMarker LKNE: body=femur_l location=(0 -0.404 -0.05) weight=1
        SimmMarker L.Knee.Medial: body=femur_l location=(0 -0.404 0.05) weight=1
        SimmMarker L.Knee.Med: body=femur_l location=(0 -0.404 0.05) weight=1
        SimmMarker L.Thigh: body=femur_l location=(0.0179 -0.224 -0.1147) weight=1
        SimmMarker L.Thigh.Upper: body=femur_l location=(0.0179 -0.264 -0.0647) weight=1
        SimmMarker L.Thigh.Front: body=femur_l location=(0.08 -0.324 -0.0047) weight=1
        SimmMarker L.Thigh.Rear: body=femur_l location=(-0.0479 -0.324 -0.0047) weight=1
        SimmMarker LTHI: body=femur_l location=(0.0179 -0.264 -0.0647) weight=1
        SimmMarker L.Ankle: body=tibia_l location=(-0.005 -0.41 -0.053) weight=2
        SimmMarker L.Ankle.Lateral: body=tibia_l location=(-0.005 -0.41 -0.053) weight=2
        SimmMarker L.Ankle.Lat: body=tibia_l location=(-0.005 -0.41 -0.053) weight=2
        SimmMarker LANK: body=tibia_l location=(-0.005 -0.41 -0.053) weight=2
        SimmMarker L.Ankle.Medial: body=tibia_l location=(0.006 -0.3888 0.038) weight=2
        SimmMarker L.Ankle.Med: body=tibia_l location=(0.006 -0.3888 0.038) weight=2
        SimmMarker L.Shank: body=tibia_l location=(0.0104 -0.2322 -0.0748) weight=1
        SimmMarker L.Shank.Upper: body=tibia_l location=(0.0125 -0.3196 -0.06) weight=1
        SimmMarker L.Shank.Front: body=tibia_l location=(0.0425 -0.3596 0) weight=1
        SimmMarker L.Shank.Rear: body=tibia_l location=(-0.0325 -0.3596 0) weight=1
        SimmMarker LTIB: body=tibia_l location=(0.0125 -0.3196 -0.06) weight=1
        SimmMarker L.Toe: body=foot_marker_l location=(0.19 0 0) weight=2
        SimmMarker LTOE: body=foot_marker_l location=(0.19 0 0) weight=2
        SimmMarker L.MedFoot: body=foot_marker_l location=(0.13 0 0.03) weight=2
        SimmMarker L.LatFoot: body=foot_marker_l location=(0.13 0 -0.05) weight=2
        SimmMarker L.Heel: body=foot_marker_l location=(0 0 0) weight=2
        SimmMarker LHEE: body=foot_marker_l location=(0 0 0) weight=2
      BodySet:
        SimmBody ground: mass=0 mass_center=(0 0 0) inertia=(0 0 0 0 0 0 0 0 0)
        SimmBody pelvis: mass=8.3775 mass_center=(-0.0893 -0.025796 0) inertia=(0.053993 0 0 0 0.061279 0 0 0 0.067263)
            meshes=(pelvis_rv.vtp pelvis_lv.vtp sacrumv.vtp)
          WrapCylinder pelvis_cyl: radius=0.05 length=0.1 xyz_body_rotation=(-3.072652 -0.2043781 0.02740167)
              translation=(-0.0546 -0.1428 0.0871)
          WrapEllipsoid femur_ell: dimensions=(0.06 0.1 0.07) xyz_body_rotation=(-1.627869 -1.321389 -0.1682497)
              translation=(-0.0583 -0.3555 0.0783)
        SimmBody torso: mass=24.2175 mass_center=(0.0145 0.256438 0) inertia=(0.440821 0 0 0 0.276872 0 0 0 0.596511)
            meshes=(lumbar1sm.vtp lumbar2sm.vtp lumbar3sm.vtp lumbar4sm.vtp lumbar5.vtp ribcage_s.vtp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)
        SimmBody neckhead: mass=5.205 mass_center=(0.0288 0.161501 0) inertia=(0.030471 0 0 0 0.02092 0 0 0 0.028195)
            meshes=(cerv1sm.vtp cerv2sm.vtp cerv3sm.vtp cerv4sm.vtp cerv5sm.vtp cerv6sm.vtp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)
        SimmBody OT_head: mass=0 mass_center=(0 0 0) inertia=(0 0 0 0 0 0 0 0 0)
        SimmBody clavicle_marker_r: mass=0 mass_center=(0 0 0) inertia=(0 0 0 0 0 0 0 0 0)
        SimmBody humerus_r: mass=2.0325 mass_center=(0 -0.164502 0) inertia=(0.011946 0 0 0 0.004121 0 0 0 0.013409)
            meshes=humerus_rv.vtp
        SimmBody elbow_marker_r: mass=0 mass_center=(0 0 0) inertia=(0 0 0 0 0 0 0 0 0)
        SimmBody ulna_r: mass=0.6075 mass_center=(0 -0.120525 0) inertia=(0.002962 0 0 0 0.000618 0 0 0 0.003213)
            meshes=ulna_rv.vtp
        SimmBody radius_r: mass=0.6075 mass_center=(0 -0.120525 0) inertia=(0.002962 0 0 0 0.000618 0 0 0 0.003213)
            meshes=radius_rv.vtp
        SimmBody wrist_marker_r: mass=0 mass_center=(0 0 0) inertia=(0 0 0 0 0 0 0 0 0)
        SimmBody hand_r: mass=0.4575 mass_center=(0 -0.068095 0) inertia=(0.000892 0 0 0 0.000547 0 0 0 0.00134)
            meshes=(pisiform_rvs.vtp lunate_rvs.vtp scaphoid_rvs.vtp triquetrum_rvs.vtp hamate_rvs.vtp capitate_rvs.vtp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)
        SimmBody clavicle_marker_l: mass=0 mass_center=(0 0 0) inertia=(0 0 0 0 0 0 0 0 0)
        SimmBody humerus_l: mass=2.0325 mass_center=(0 -0.164502 0) inertia=(0.011946 0 0 0 0.004121 0 0 0 0.013409)
            meshes=humerus_lv.vtp
        SimmBody elbow_marker_l: mass=0 mass_center=(0 0 0) inertia=(0 0 0 0 0 0 0 0 0)
        SimmBody ulna_l: mass=0.6075 mass_center=(0 -0.120525 0) inertia=(0.002962 0 0 0 0.000618 0 0 0 0.003213)
            meshes=ulna_lv.vtp
        SimmBody radius_l: mass=0.6075 mass_center=(0 -0.120525 0) inertia=(0.002962 0 0 0 0.000618 0 0 0 0.003213)
            meshes=radius_lv.vtp
        SimmBody wrist_marker_l: mass=0 mass_center=(0 0 0) inertia=(0 0 0 0 0 0 0 0 0)
        SimmBody hand_l: mass=0.4575 mass_center=(0 -0.068095 0) inertia=(0.000892 0 0 0 0.000547 0 0 0 0.00134)
            meshes=(pisiform_lvs.vtp lunate_lvs.vtp scaphoid_lvs.vtp triquetrum_lvs.vtp hamate_lvs.vtp capitate_lvs.vtp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)
        SimmBody femur_r: mass=10.5225 mass_center=(0 -0.162162 0) inertia=(0.178608 0 0 0 0.036634 0 0 0 0.178608)
            meshes=femur_r.vtp
        SimmBody tibia_r: mass=3.2475 mass_center=(0 -0.171713 0) inertia=(0.029999 0 0 0 0.005157 0 0 0 0.031231)
            meshes=(tibia_r.vtp fibula_r.vtp)
        SimmBody patella_r: mass=0.0975 mass_center=(0.0018 0.0264 0) inertia=(0.000003 0 0 0 0.000015 0 0 0 0.000015)
            meshes=patella_r.vtp
        SimmBody talus_r: mass=0.045 mass_center=(0.0055 0.0023 0) inertia=(0.000003 0 0 0 0.000001 0 0 0 0.000003)
            meshes=talus_rv.vtp
        SimmBody foot_r: mass=0.885 mass_center=(0.101865 0.0156 0) inertia=(0.000909 0 0 0 0.002314 0 0 0 0.002683)
            meshes=(calcaneous_rv.vtp navicular_rv.vtp cuboid_rv.vtp first_cuneiform_rv.vtp second_cuneiform_rv.vtp third_cuneiform_rv.vtp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)
        SimmBody foot_marker_r: mass=0 mass_center=(0 0 0) inertia=(0 0 0 0 0 0 0 0 0)
        SimmBody toes_r: mass=0.0975 mass_center=(0.0307 -0.0026 0.0105) inertia=(0.0001 0 0 0 0.000255 0 0 0 0.000294)
            meshes=(prox_phalanx1_rvs.vtp prox_phalanx2_rvs.vtp prox_phalanx3_rvs.vtp prox_phalanx4_rvs.vtp prox_phalanx5_rvs.vtp mid_phalanx2_rvs.vtp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)
        SimmBody femur_l: mass=10.5225 mass_center=(0 -0.162162 0) inertia=(0.178608 0 0 0 0.036634 0 0 0 0.178608)
            meshes=femur_l.vtp
        SimmBody tibia_l: mass=3.2475 mass_center=(0 -0.171713 0) inertia=(0.029999 0 0 0 0.005157 0 0 0 0.031231)
            meshes=(tibia_l.vtp fibula_l.vtp)
        SimmBody patella_l: mass=0.0975 mass_center=(0.0018 0.0264 0) inertia=(0.000003 0 0 0 0.000015 0 0 0 0.000015)
            meshes=patella_l.vtp
        SimmBody talus_l: mass=0.045 mass_center=(0.0055 0.0023 0) inertia=(0.000003 0 0 0 0.000001 0 0 0 0.000003)
            meshes=talus_lv.vtp
        SimmBody foot_l: mass=0.885 mass_center=(0.101865 0.0156 0) inertia=(0.000909 0 0 0 0.002314 0 0 0 0.002683)
            meshes=(calcaneous_lv.vtp navicular_lv.vtp cuboid_lv.vtp first_cuneiform_lv.vtp second_cuneiform_lv.vtp third_cuneiform_lv.vtp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)
        SimmBody foot_marker_l: mass=0 mass_center=(0 0 0) inertia=(0 0 0 0 0 0 0 0 0)
        SimmBody toes_l: mass=0.0975 mass_center=(0.0307 -0.0026 -0.0105)
            inertia=(0.0001 0 0 0 0.000255 0 0 0 0.000294)
            meshes=(prox_phalanx1_lvs.vtp prox_phalanx2_lvs.vtp prox_phalanx3_lvs.vtp prox_phalanx4_lvs.vtp prox_phalanx5_lvs.vtp mid_phalanx2_lvs.vtp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)
      SimmCoordinate [values shared by the 40 below unless stated]: default_value=0 tolerance=0 restraint_active=false
          clamped=true
      SimmCoordinate lower_torso_TX: range=(-10 10) stiffness=0.1 clamped=false
      SimmCoordinate lower_torso_TY: range=(-10 10) stiffness=0.1 clamped=false
      SimmCoordinate lower_torso_TZ: range=(-10 10) default_value=0.969 stiffness=0.1 clamped=false
      SimmCoordinate lower_torso_RX: range=(-4.712389 4.712389) default_value=1.570796 stiffness=0.1 clamped=false
      SimmCoordinate lower_torso_RY: range=(-4.712389 4.712389) stiffness=0.1 clamped=false
      SimmCoordinate lower_torso_RZ: range=(-4.712389 4.712389) stiffness=0.1 clamped=false
      SimmCoordinate lumbar_roll: range=(-0.7853982 0.7853982) stiffness=0.1
        min_restraint_function: natCubicSpline: x=(0 0.1745329 0.5235988) y=(0 20 70)
        max_restraint_function: natCubicSpline: x=(0 0.1745329 0.5235988) y=(0 20 70)
      SimmCoordinate lumbar_yaw: range=(-1.047198 1.047198) stiffness=0.1
        min_restraint_function: natCubicSpline: x=(0 0.1745329 0.5235988) y=(0 20 70)
        max_restraint_function: natCubicSpline: x=(0 0.1745329 0.5235988) y=(0 20 70)
      SimmCoordinate lumbar_pitch: range=(-0.7853982 0.7853982) stiffness=0.1
        min_restraint_function: natCubicSpline: x=(0 0.1745329 0.5235988) y=(0 20 70)
        max_restraint_function: natCubicSpline: x=(0 0.1745329 0.5235988) y=(0 20 70)
      SimmCoordinate neck_roll: range=(-0.6981317 0.6981317) stiffness=0.01
        min_restraint_function: natCubicSpline: x=(0 0.1745329 0.5235988) y=(0 20 70)
        max_restraint_function: natCubicSpline: x=(0 0.1745329 0.5235988) y=(0 20 70)
      SimmCoordinate neck_yaw: range=(-1.151917 1.151917) stiffness=0.01
        min_restraint_function: natCubicSpline: x=(0 0.1745329 0.5235988) y=(0 20 70)
        max_restraint_function: natCubicSpline: x=(0 0.1745329 0.5235988) y=(0 20 70)
      SimmCoordinate neck_pitch: range=(-0.8726646 1.256637) stiffness=0.01
        min_restraint_function: natCubicSpline: x=(0 0.1745329 0.5235988) y=(0 20 70)
        max_restraint_function: natCubicSpline: x=(0 0.1745329 0.5235988) y=(0 20 70)
      SimmCoordinate arm_add_r: range=(-2.094395 1.570796) stiffness=0.01
        min_restraint_function: natCubicSpline: x=(0 0.1745329 0.5235988) y=(0 20 70)
        max_restraint_function: natCubicSpline: x=(0 0.1745329 0.5235988) y=(0 20 70)
      SimmCoordinate arm_rot_r: range=(-0.1745329 0.1745329) stiffness=0.01
        min_restraint_function: natCubicSpline: x=(0 0.1745329 0.5235988) y=(0 20 70)
        max_restraint_function: natCubicSpline: x=(0 0.1745329 0.5235988) y=(0 20 70)
      SimmCoordinate arm_flex_r: range=(-0.7853982 1.570796) stiffness=0.01
        min_restraint_function: natCubicSpline: x=(0 0.1745329 0.5235988) y=(0 20 70)
        max_restraint_function: natCubicSpline: x=(0 0.1745329 0.5235988) y=(0 20 70)
      SimmCoordinate elbow_flex_r: range=(0 2.268928) stiffness=0.01
        min_restraint_function: natCubicSpline: x=(0 0.1745329 0.5235988) y=(0 20 70)
        max_restraint_function: natCubicSpline: x=(0 0.1745329 0.5235988) y=(0 20 70)
      SimmCoordinate pro_sup_r: range=(0.8726646 1.22173) default_value=1.047198 stiffness=0.01
        min_restraint_function: natCubicSpline: x=(0 0.1745329 0.5235988) y=(0 20 70)
        max_restraint_function: natCubicSpline: x=(0 0.1745329 0.5235988) y=(0 20 70)
      SimmCoordinate wrist_dev_r: range=(-0.4363323 0.6108652) stiffness=0.01
        min_restraint_function: natCubicSpline: x=(0 0.1745329 0.5235988) y=(0 20 70)
        max_restraint_function: natCubicSpline: x=(0 0.1745329 0.5235988) y=(0 20 70)
      SimmCoordinate wrist_flex_r: range=(-1.22173 1.22173) stiffness=0.01
        min_restraint_function: natCubicSpline: x=(0 0.1745329 0.5235988) y=(0 20 70)
        max_restraint_function: natCubicSpline: x=(0 0.1745329 0.5235988) y=(0 20 70)
      SimmCoordinate arm_add_l: range=(-2.094395 1.570796) stiffness=0.01
        min_restraint_function: natCubicSpline: x=(0 0.1745329 0.5235988) y=(0 20 70)
        max_restraint_function: natCubicSpline: x=(0 0.1745329 0.5235988) y=(0 20 70)
      SimmCoordinate arm_rot_l: range=(-0.1745329 0.1745329) stiffness=0.01
        min_restraint_function: natCubicSpline: x=(0 0.1745329 0.5235988) y=(0 20 70)
        max_restraint_function: natCubicSpline: x=(0 0.1745329 0.5235988) y=(0 20 70)
      SimmCoordinate arm_flex_l: range=(-0.7853982 1.570796) stiffness=0.01
        min_restraint_function: natCubicSpline: x=(0 0.1745329 0.5235988) y=(0 20 70)
        max_restraint_function: natCubicSpline: x=(0 0.1745329 0.5235988) y=(0 20 70)
      SimmCoordinate elbow_flex_l: range=(0 2.268928) stiffness=0.01
        min_restraint_function: natCubicSpline: x=(0 0.1745329 0.5235988) y=(0 20 70)
        max_restraint_function: natCubicSpline: x=(0 0.1745329 0.5235988) y=(0 20 70)
      SimmCoordinate pro_sup_l: range=(0.8726646 1.22173) default_value=1.047198 stiffness=0.01
        min_restraint_function: natCubicSpline: x=(0 0.1745329 0.5235988) y=(0 20 70)
        max_restraint_function: natCubicSpline: x=(0 0.1745329 0.5235988) y=(0 20 70)
      SimmCoordinate wrist_dev_l: range=(-0.4363323 0.6108652) stiffness=0.01
        min_restraint_function: natCubicSpline: x=(0 0.1745329 0.5235988) y=(0 20 70)
        max_restraint_function: natCubicSpline: x=(0 0.1745329 0.5235988) y=(0 20 70)
      SimmCoordinate wrist_flex_l: range=(-1.22173 1.22173) stiffness=0.01
        min_restraint_function: natCubicSpline: x=(0 0.1745329 0.5235988) y=(0 20 70)
        max_restraint_function: natCubicSpline: x=(0 0.1745329 0.5235988) y=(0 20 70)
      SimmCoordinate hip_add_r: range=(-0.8726646 0.3490659) stiffness=0.1
        min_restraint_function: natCubicSpline: x=(0 0.1745329 0.5235988) y=(0 20 70)
        max_restraint_function: natCubicSpline: x=(0 0.1745329 0.5235988) y=(0 20 70)
      SimmCoordinate hip_rot_r: range=(-0.6981317 0.6981317) stiffness=0.1
        min_restraint_function: natCubicSpline: x=(0 0.1745329 0.5235988) y=(0 20 70)
        max_restraint_function: natCubicSpline: x=(0 0.1745329 0.5235988) y=(0 20 70)
      SimmCoordinate hip_flex_r: range=(-0.1919862 1.658063) stiffness=0.1
        min_restraint_function: natCubicSpline: x=(0 0.1745329 0.5235988) y=(0 20 70)
        max_restraint_function: natCubicSpline: x=(0 0.1745329 0.5235988) y=(0 20 70)
      SimmCoordinate knee_flex_r: range=(-0.1745329 2.097395) stiffness=0.2
        min_restraint_function: natCubicSpline: x=(0 0.1745329 0.5235988) y=(0 20 70)
        max_restraint_function: natCubicSpline: x=(0 0.1745329 0.5235988) y=(0 20 70)
      SimmCoordinate ankle_flex_r: range=(-0.5235988 0.5235988) stiffness=2
        min_restraint_function: natCubicSpline: x=(0 0.1745329 0.5235988) y=(0 20 70)
        max_restraint_function: natCubicSpline: x=(0 0.1745329 0.5235988) y=(0 20 70)
      SimmCoordinate subt_angle_r: range=(-0.3490659 0.3490659) stiffness=2
        min_restraint_function: natCubicSpline: x=(0 0.1745329 0.5235988) y=(0 20 70)
        max_restraint_function: natCubicSpline: x=(0 0.1745329 0.5235988) y=(0 20 70)
      SimmCoordinate toe_angle_r: range=(-0.5235988 0.5235988) stiffness=0.1
        min_restraint_function: natCubicSpline: x=(0 0.1745329 0.5235988) y=(0 20 70)
        max_restraint_function: natCubicSpline: x=(0 0.1745329 0.5235988) y=(0 20 70)
      SimmCoordinate hip_add_l: range=(-0.8726646 0.3490659) stiffness=0.1
        min_restraint_function: natCubicSpline: x=(0 0.1745329 0.5235988) y=(0 20 70)
        max_restraint_function: natCubicSpline: x=(0 0.1745329 0.5235988) y=(0 20 70)
      SimmCoordinate hip_rot_l: range=(-0.6981317 0.6981317) stiffness=0.1
        min_restraint_function: natCubicSpline: x=(0 0.1745329 0.5235988) y=(0 20 70)
        max_restraint_function: natCubicSpline: x=(0 0.1745329 0.5235988) y=(0 20 70)
      SimmCoordinate hip_flex_l: range=(-0.1919862 1.658063) stiffness=0.1
        min_restraint_function: natCubicSpline: x=(0 0.1745329 0.5235988) y=(0 20 70)
        max_restraint_function: natCubicSpline: x=(0 0.1745329 0.5235988) y=(0 20 70)
      SimmCoordinate knee_flex_l: range=(-0.1745329 2.094395) stiffness=0.2
        min_restraint_function: natCubicSpline: x=(0 0.1745329 0.5235988) y=(0 20 70)
        max_restraint_function: natCubicSpline: x=(0 0.1745329 0.5235988) y=(0 20 70)
      SimmCoordinate ankle_flex_l: range=(-0.5235988 0.5235988) stiffness=2
        min_restraint_function: natCubicSpline: x=(0 0.1745329 0.5235988) y=(0 20 70)
        max_restraint_function: natCubicSpline: x=(0 0.1745329 0.5235988) y=(0 20 70)
      SimmCoordinate subt_angle_l: range=(-0.3490659 0.3490659) stiffness=2
        min_restraint_function: natCubicSpline: x=(0 0.1745329 0.5235988) y=(0 20 70)
        max_restraint_function: natCubicSpline: x=(0 0.1745329 0.5235988) y=(0 20 70)
      SimmCoordinate toe_angle_l: range=(-0.5235988 0.5235988) stiffness=0.1
        min_restraint_function: natCubicSpline: x=(0 0.1745329 0.5235988) y=(0 20 70)
        max_restraint_function: natCubicSpline: x=(0 0.1745329 0.5235988) y=(0 20 70)
      JointSet:
        SimmJoint gnd_pelvis: bodies=(ground pelvis)
          DofSet:
            SimmTranslationDof tx: coordinate=lower_torso_TX
              Value:
                natCubicSpline: x=(-360 360) y=(-360 360)
            SimmTranslationDof ty: coordinate=lower_torso_TY
              Value:
                natCubicSpline: x=(-360 360) y=(-360 360)
            SimmTranslationDof tz: coordinate=lower_torso_TZ
              Value:
                natCubicSpline: x=(-360 360) y=(-360 360)
            SimmRotationDof r1: axis=(1 0 0) coordinate=lower_torso_RX
              Value:
                natCubicSpline: x=(-6.283185 6.283185) y=(-6.283185 6.283185)
            SimmRotationDof r2: axis=(0 1 0) coordinate=lower_torso_RY
              Value:
                natCubicSpline: x=(-6.283185 6.283185) y=(-6.283185 6.283185)
            SimmRotationDof r3: axis=(0 0 1) coordinate=lower_torso_RZ
              Value:
                natCubicSpline: x=(-6.283185 6.283185) y=(-6.283185 6.283185)
        SimmJoint pelvis_torso: bodies=(pelvis torso)
          DofSet:
            SimmTranslationDof tx:
              Value: Constant(value=-0.0872)
            SimmTranslationDof ty:
              Value: Constant(value=0.0331)
            SimmTranslationDof tz:
              Value: Constant(value=0)
            SimmRotationDof r1: axis=(0 0 1) coordinate=lumbar_pitch
              Value:
                natCubicSpline: x=(-6.283185 6.283185) y=(-6.283185 6.283185)
            SimmRotationDof r2: axis=(1 0 0) coordinate=lumbar_roll
              Value:
                natCubicSpline: x=(-6.283185 6.283185) y=(-6.283185 6.283185)
            SimmRotationDof r3: axis=(0 1 0) coordinate=lumbar_yaw
              Value:
                natCubicSpline: x=(-6.283185 6.283185) y=(-6.283185 6.283185)
        SimmJoint torso_neckhead: bodies=(torso neckhead)
          DofSet:
            SimmTranslationDof tx:
              Value: Constant(value=-0.0253)
            SimmTranslationDof ty:
              Value: Constant(value=0.44895)
            SimmTranslationDof tz:
              Value: Constant(value=0)
            SimmRotationDof r1: axis=(0 0 1) coordinate=neck_pitch
              Value:
                natCubicSpline: x=(-6.283185 6.283185) y=(-6.283185 6.283185)
            SimmRotationDof r2: axis=(1 0 0) coordinate=neck_roll
              Value:
                natCubicSpline: x=(-6.283185 6.283185) y=(-6.283185 6.283185)
            SimmRotationDof r3: axis=(0 1 0) coordinate=neck_yaw
              Value:
                natCubicSpline: x=(-6.283185 6.283185) y=(-6.283185 6.283185)
        SimmJoint neckhead_OT_head: bodies=(neckhead OT_head)
          DofSet:
            SimmTranslationDof tx:
              Value: Constant(value=-0.07166)
            SimmTranslationDof ty:
              Value: Constant(value=0.2359)
            SimmTranslationDof tz:
              Value: Constant(value=0)
            SimmRotationDof r1: axis=(0 0 1)
              Value: Constant(value=-1.570796)
            SimmRotationDof r2: axis=(1 0 0)
              Value: Constant(value=0)
            SimmRotationDof r3: axis=(0 1 0)
              Value: Constant(value=0)
        SimmJoint clavicularmarker_r: bodies=(torso clavicle_marker_r)
          DofSet:
            SimmRotationDof r1: axis=(1 0 0)
              Value: Constant(value=0)
            SimmRotationDof r2: axis=(0 0 1)
              Value: Constant(value=0)
            SimmRotationDof r3: axis=(0 1 0)
              Value: Constant(value=0)
            SimmTranslationDof tx:
              Value: Constant(value=-0.0488)
            SimmTranslationDof ty:
              Value: Constant(value=0.47065)
            SimmTranslationDof tz:
              Value: Constant(value=0)
        SimmJoint acromial_r: bodies=(torso humerus_r)
          DofSet:
            SimmTranslationDof tx:
              Value: Constant(value=-0.0281)
            SimmTranslationDof ty:
              Value: Constant(value=0.41645)
            SimmTranslationDof tz:
              Value: Constant(value=0.199)
            SimmRotationDof r1: axis=(1 0 0) coordinate=arm_add_r
              Value:
                natCubicSpline: x=(-6.283185 6.283185) y=(-6.283185 6.283185)
            SimmRotationDof r2: axis=(0 0 1) coordinate=arm_flex_r
              Value:
                natCubicSpline: x=(-6.283185 6.283185) y=(-6.283185 6.283185)
            SimmRotationDof r3: axis=(0 1 0) coordinate=arm_rot_r
              Value:
                natCubicSpline: x=(-6.283185 6.283185) y=(-6.283185 6.283185)
        SimmJoint elbowmarker_r: bodies=(humerus_r elbow_marker_r)
          DofSet:
            SimmTranslationDof tx:
              Value: Constant(value=0)
            SimmTranslationDof ty:
              Value: Constant(value=0)
            SimmTranslationDof tz:
              Value: Constant(value=0)
            SimmRotationDof r1: axis=(0.226047 0.022269 0.9738618)
              Value: Constant(value=0.05235988)
            SimmRotationDof r2: axis=(0 1 0)
              Value: Constant(value=0.2617994)
            SimmRotationDof r3: axis=(1 0 0)
              Value: Constant(value=0)
        SimmJoint elbow_r: bodies=(humerus_r ulna_r)
          DofSet:
            SimmTranslationDof tx:
              Value: Constant(value=0.013144)
            SimmTranslationDof ty:
              Value: Constant(value=-0.286273)
            SimmTranslationDof tz:
              Value: Constant(value=-0.009595)
            SimmRotationDof r1: axis=(0.226047 0.022269 0.9738618) coordinate=elbow_flex_r
              Value:
                natCubicSpline: x=(-6.283185 6.283185) y=(-6.283185 6.283185)
            SimmRotationDof r2: axis=(0 1 0)
              Value: Constant(value=0)
            SimmRotationDof r3: axis=(1 0 0)
              Value: Constant(value=0)
        SimmJoint radioulnar_r: bodies=(ulna_r radius_r)
          DofSet:
            SimmTranslationDof tx:
              Value: Constant(value=-0.006727)
            SimmTranslationDof ty:
              Value: Constant(value=-0.013007)
            SimmTranslationDof tz:
              Value: Constant(value=0.026083)
            SimmRotationDof r1: axis=(1 0 0)
              Value: Constant(value=0)
            SimmRotationDof r2: axis=(0.05639803 0.9984065 0.001952001) coordinate=pro_sup_r
              Value:
                natCubicSpline: x=(-6.283185 6.283185) y=(-6.283185 6.283185)
            SimmRotationDof r3: axis=(0 0 1)
              Value: Constant(value=0)
        SimmJoint wristmarker_r: bodies=(radius_r wrist_marker_r)
          DofSet:
            SimmTranslationDof tx:
              Value: Constant(value=0.006727)
            SimmTranslationDof ty:
              Value: Constant(value=0.013007)
            SimmTranslationDof tz:
              Value: Constant(value=-0.026083)
            SimmRotationDof r1: axis=(1 0 0)
              Value: Constant(value=-0.1396263)
            SimmRotationDof r2: axis=(0 1 0)
              Value: Constant(value=0.1745329)
            SimmRotationDof r3: axis=(0 0 1)
              Value: Constant(value=-0.06981317)
        SimmJoint radius_hand_r: bodies=(radius_r hand_r)
          DofSet:
            SimmTranslationDof tx:
              Value: Constant(value=-0.008797)
            SimmTranslationDof ty:
              Value: Constant(value=-0.235841)
            SimmTranslationDof tz:
              Value: Constant(value=0.01361)
            SimmRotationDof r1: axis=(0 0 1) coordinate=wrist_flex_r
              Value:
                natCubicSpline: x=(-6.283185 6.283185) y=(-6.283185 6.283185)
            SimmRotationDof r2: axis=(0 1 0)
              Value: Constant(value=0)
            SimmRotationDof r3: axis=(1 0 0) coordinate=wrist_dev_r
              Value:
                natCubicSpline: x=(-6.283185 6.283185) y=(-6.283185 6.283185)
        SimmJoint clavicularmarker_l: bodies=(torso clavicle_marker_l)
          DofSet:
            SimmRotationDof r1: axis=(1 0 0)
              Value: Constant(value=0)
            SimmRotationDof r2: axis=(0 0 1)
              Value: Constant(value=0)
            SimmRotationDof r3: axis=(0 1 0)
              Value: Constant(value=0)
            SimmTranslationDof tx:
              Value: Constant(value=-0.0488)
            SimmTranslationDof ty:
              Value: Constant(value=0.47065)
            SimmTranslationDof tz:
              Value: Constant(value=0)
        SimmJoint acromial_l: bodies=(torso humerus_l)
          DofSet:
            SimmTranslationDof tx:
              Value: Constant(value=-0.0281)
            SimmTranslationDof ty:
              Value: Constant(value=0.41645)
            SimmTranslationDof tz:
              Value: Constant(value=-0.199)
            SimmRotationDof r1: axis=(-1 0 0) coordinate=arm_add_l
              Value:
                natCubicSpline: x=(-6.283185 6.283185) y=(-6.283185 6.283185)
            SimmRotationDof r2: axis=(0 0 1) coordinate=arm_flex_l
              Value:
                natCubicSpline: x=(-6.283185 6.283185) y=(-6.283185 6.283185)
            SimmRotationDof r3: axis=(0 -1 0) coordinate=arm_rot_l
              Value:
                natCubicSpline: x=(-6.283185 6.283185) y=(-6.283185 6.283185)
        SimmJoint elbowmarker_l: bodies=(humerus_l elbow_marker_l)
          DofSet:
            SimmTranslationDof tx:
              Value: Constant(value=0)
            SimmTranslationDof ty:
              Value: Constant(value=0)
            SimmTranslationDof tz:
              Value: Constant(value=0)
            SimmRotationDof r1: axis=(-0.226047 -0.022269 0.9738618)
              Value: Constant(value=0.05235988)
            SimmRotationDof r2: axis=(0 -1 0)
              Value: Constant(value=-0.2617994)
            SimmRotationDof r3: axis=(-1 0 0)
              Value: Constant(value=0)
        SimmJoint elbow_l: bodies=(humerus_l ulna_l)
          DofSet:
            SimmTranslationDof tx:
              Value: Constant(value=0.013144)
            SimmTranslationDof ty:
              Value: Constant(value=-0.286273)
            SimmTranslationDof tz:
              Value: Constant(value=0.009595)
            SimmRotationDof r1: axis=(-0.226047 -0.022269 0.9738618) coordinate=elbow_flex_l
              Value:
                natCubicSpline: x=(-6.283185 6.283185) y=(-6.283185 6.283185)
            SimmRotationDof r2: axis=(0 -1 0)
              Value: Constant(value=0)
            SimmRotationDof r3: axis=(-1 0 0)
              Value: Constant(value=0)
        SimmJoint radioulnar_l: bodies=(ulna_l radius_l)
          DofSet:
            SimmTranslationDof tx:
              Value: Constant(value=-0.006727)
            SimmTranslationDof ty:
              Value: Constant(value=-0.013007)
            SimmTranslationDof tz:
              Value: Constant(value=-0.026083)
            SimmRotationDof r1: axis=(-1 0 0)
              Value: Constant(value=0)
            SimmRotationDof r2: axis=(-0.05639803 -0.9984065 0.001952001) coordinate=pro_sup_l
              Value:
                natCubicSpline: x=(-6.283185 6.283185) y=(-6.283185 6.283185)
            SimmRotationDof r3: axis=(0 0 1)
              Value: Constant(value=0)
        SimmJoint wristmarker_l: bodies=(radius_l wrist_marker_l)
          DofSet:
            SimmTranslationDof tx:
              Value: Constant(value=0.006727)
            SimmTranslationDof ty:
              Value: Constant(value=0.013007)
            SimmTranslationDof tz:
              Value: Constant(value=0.026083)
            SimmRotationDof r1: axis=(1 0 0)
              Value: Constant(value=0.1396263)
            SimmRotationDof r2: axis=(0 1 0)
              Value: Constant(value=-0.1745329)
            SimmRotationDof r3: axis=(0 0 1)
              Value: Constant(value=-0.06981317)
        SimmJoint radius_hand_l: bodies=(radius_l hand_l)
          DofSet:
            SimmTranslationDof tx:
              Value: Constant(value=-0.008797)
            SimmTranslationDof ty:
              Value: Constant(value=-0.235841)
            SimmTranslationDof tz:
              Value: Constant(value=-0.01361)
            SimmRotationDof r1: axis=(0 0 1) coordinate=wrist_flex_l
              Value:
                natCubicSpline: x=(-6.283185 6.283185) y=(-6.283185 6.283185)
            SimmRotationDof r2: axis=(0 -1 0)
              Value: Constant(value=0)
            SimmRotationDof r3: axis=(-1 0 0) coordinate=wrist_dev_l
              Value:
                natCubicSpline: x=(-6.283185 6.283185) y=(-6.283185 6.283185)
        SimmJoint hip_r: bodies=(pelvis femur_r)
          DofSet:
            SimmTranslationDof tx:
              Value: Constant(value=-0.08)
            SimmTranslationDof ty:
              Value: Constant(value=-0.0824)
            SimmTranslationDof tz:
              Value: Constant(value=0.0785)
            SimmRotationDof r1: axis=(0 0 1) coordinate=hip_flex_r
              Value:
                natCubicSpline: x=(-6.283185 6.283185) y=(-6.283185 6.283185)
            SimmRotationDof r2: axis=(1 0 0) coordinate=hip_add_r
              Value:
                natCubicSpline: x=(-6.283185 6.283185) y=(-6.283185 6.283185)
            SimmRotationDof r3: axis=(0 1 0) coordinate=hip_rot_r
              Value:
                natCubicSpline: x=(-6.283185 6.283185) y=(-6.283185 6.283185)
        SimmJoint knee_flexion_r: bodies=(femur_r tibia_r)
          DofSet:
            SimmTranslationDof tx: coordinate=knee_flex_r
              Value:
                natCubicSpline: x=(0 0.1745329 0.3490659 0.6981317 1.047198 1.396263 1.745329 2.094395)
                    y=(-0.00525 -0.0031 -0.001 0.00212 0.0041 0.00411 0.00179 -0.0032)
            SimmTranslationDof ty: coordinate=knee_flex_r
              Value:
                natCubicSpline: x=(0 0.1745329 0.3490659 0.5235988 1.22173 2.094395)
                    y=(-0.396 -0.3966 -0.3976 -0.399 -0.4082 -0.4226)
            SimmTranslationDof tz:
              Value: Constant(value=0)
            SimmRotationDof r1: axis=(0 0 -1) coordinate=knee_flex_r
              Value:
                natCubicSpline: x=(-6.283185 6.283185) y=(-6.283185 6.283185)
            SimmRotationDof r2: axis=(1 0 0)
              Value: Constant(value=0)
            SimmRotationDof r3: axis=(0 1 0)
              Value: Constant(value=0)
        SimmJoint tib_pat_r: bodies=(tibia_r patella_r)
          DofSet:
            SimmTranslationDof tx: coordinate=knee_flex_r
              Value:
                natCubicSpline: x=(0 0.1745329 0.3490659 0.6981317 1.047198 1.396263 2.094395)
                    y=(0.0496 0.0484 0.0469 0.043 0.0381 0.0324 0.0173)
            SimmTranslationDof ty: coordinate=knee_flex_r
              Value:
                natCubicSpline: x=(0.004991642 0.1745329 0.3490659 0.6981317 1.047198 1.396263 1.570796 2.094395)
                    y=(-0.0227 -0.0223 -0.0219 -0.0211 -0.0204 -0.02 -0.0202 -0.0219)
            SimmTranslationDof tz:
              Value: Constant(value=0.0024)
            SimmRotationDof r1: axis=(0 0 1) coordinate=knee_flex_r
              Value:
                natCubicSpline: x=(-0.1745329 -0.002617994 0.355 0.9848893 1.999973 2.094395)
                    y=(-0.1612684 -0.04258603 0.1062906 0.2419026 0.3080506 0.3080506)
            SimmRotationDof r2: axis=(1 0 0)
              Value: Constant(value=0)
            SimmRotationDof r3: axis=(0 1 0)
              Value: Constant(value=0)
        SimmJoint ankle_r: bodies=(tibia_r talus_r)
          DofSet:
            SimmTranslationDof tx:
              Value: Constant(value=0)
            SimmTranslationDof ty:
              Value: Constant(value=-0.426)
            SimmTranslationDof tz:
              Value: Constant(value=0)
            SimmRotationDof r1: axis=(-0.104529 -0.1736491 0.9792444) coordinate=ankle_flex_r
              Value:
                natCubicSpline: x=(-6.283185 6.283185) y=(-6.283185 6.283185)
            SimmRotationDof r2: axis=(1 0 0)
              Value: Constant(value=0)
            SimmRotationDof r3: axis=(0 1 0)
              Value: Constant(value=0)
        SimmJoint subtalar_r: bodies=(talus_r foot_r)
          DofSet:
            SimmTranslationDof tx:
              Value: Constant(value=-0.04877)
            SimmTranslationDof ty:
              Value: Constant(value=-0.04195)
            SimmTranslationDof tz:
              Value: Constant(value=0.00792)
            SimmRotationDof r1: axis=(0.78718 0.604747 -0.120949) coordinate=subt_angle_r
              Value:
                natCubicSpline: x=(-6.283185 6.283185) y=(-6.283185 6.283185)
            SimmRotationDof r2: axis=(0 1 0)
              Value: Constant(value=0)
            SimmRotationDof r3: axis=(0 0 1)
              Value: Constant(value=0)
        SimmJoint foot_mark_r: bodies=(foot_r foot_marker_r)
          DofSet:
            SimmTranslationDof tx:
              Value: Constant(value=-0.02)
            SimmTranslationDof ty:
              Value: Constant(value=0.018)
            SimmTranslationDof tz:
              Value: Constant(value=-0.01)
            SimmRotationDof r1: axis=(1 0 0)
              Value: Constant(value=0)
            SimmRotationDof r2: axis=(0 1 0)
              Value: Constant(value=0)
            SimmRotationDof r3: axis=(0 0 1)
              Value: Constant(value=0)
        SimmJoint toes_r: bodies=(foot_r toes_r)
          DofSet:
            SimmTranslationDof tx:
              Value: Constant(value=0.1768)
            SimmTranslationDof ty:
              Value: Constant(value=-0.002)
            SimmTranslationDof tz:
              Value: Constant(value=0.00108)
            SimmRotationDof r1: axis=(0.541717 0 -0.840561) coordinate=toe_angle_r
              Value:
                natCubicSpline: x=(-6.283185 6.283185) y=(-6.283185 6.283185)
            SimmRotationDof r2: axis=(0 1 0)
              Value: Constant(value=0)
            SimmRotationDof r3: axis=(0 0 1)
              Value: Constant(value=0)
        SimmJoint hip_l: bodies=(pelvis femur_l)
          DofSet:
            SimmTranslationDof tx:
              Value: Constant(value=-0.08)
            SimmTranslationDof ty:
              Value: Constant(value=-0.0824)
            SimmTranslationDof tz:
              Value: Constant(value=-0.0785)
            SimmRotationDof r1: axis=(0 0 1) coordinate=hip_flex_l
              Value:
                natCubicSpline: x=(-6.283185 6.283185) y=(-6.283185 6.283185)
            SimmRotationDof r2: axis=(-1 0 0) coordinate=hip_add_l
              Value:
                natCubicSpline: x=(-6.283185 6.283185) y=(-6.283185 6.283185)
            SimmRotationDof r3: axis=(0 -1 0) coordinate=hip_rot_l
              Value:
                natCubicSpline: x=(-6.283185 6.283185) y=(-6.283185 6.283185)
        SimmJoint knee_flexion_l: bodies=(femur_l tibia_l)
          DofSet:
            SimmTranslationDof tx: coordinate=knee_flex_l
              Value:
                natCubicSpline: x=(0 0.1745329 0.3490659 0.6981317 1.047198 1.396263 1.745329 2.094395)
                    y=(-0.00525 -0.0031 -0.001 0.00212 0.0041 0.00411 0.00179 -0.0032)
            SimmTranslationDof ty: coordinate=knee_flex_l
              Value:
                natCubicSpline: x=(0 0.1745329 0.3490659 0.5235988 1.22173 2.094395)
                    y=(-0.396 -0.3966 -0.3976 -0.399 -0.4082 -0.4226)
            SimmTranslationDof tz:
              Value: Constant(value=0)
            SimmRotationDof r1: axis=(0 0 -1) coordinate=knee_flex_l
              Value:
                natCubicSpline: x=(-6.283185 6.283185) y=(-6.283185 6.283185)
            SimmRotationDof r2: axis=(1 0 0)
              Value: Constant(value=0)
            SimmRotationDof r3: axis=(0 1 0)
              Value: Constant(value=0)
        SimmJoint tib_pat_l: bodies=(tibia_l patella_l)
          DofSet:
            SimmTranslationDof tx: coordinate=knee_flex_l
              Value:
                natCubicSpline: x=(0 0.1745329 0.3490659 0.6981317 1.047198 1.396263 2.094395)
                    y=(0.0496 0.0484 0.0469 0.043 0.0381 0.0324 0.0173)
            SimmTranslationDof ty: coordinate=knee_flex_l
              Value:
                natCubicSpline: x=(0.004991642 0.1745329 0.3490659 0.6981317 1.047198 1.396263 1.570796 2.094395)
                    y=(-0.0227 -0.0223 -0.0219 -0.0211 -0.0204 -0.02 -0.0202 -0.0219)
            SimmTranslationDof tz:
              Value: Constant(value=-0.0024)
            SimmRotationDof r1: axis=(0 0 1) coordinate=knee_flex_l
              Value:
                natCubicSpline: x=(-0.1745329 -0.002617994 0.355 0.9848893 1.999973 2.094395)
                    y=(-0.1612684 -0.04258603 0.1062906 0.2419026 0.3080506 0.3080506)
            SimmRotationDof r2: axis=(-1 0 0)
              Value: Constant(value=0)
            SimmRotationDof r3: axis=(0 -1 0)
              Value: Constant(value=0)
        SimmJoint ankle_l: bodies=(tibia_l talus_l)
          DofSet:
            SimmTranslationDof tx:
              Value: Constant(value=0)
            SimmTranslationDof ty:
              Value: Constant(value=-0.426)
            SimmTranslationDof tz:
              Value: Constant(value=0)
            SimmRotationDof r1: axis=(0.104529 0.1736491 0.9792444) coordinate=ankle_flex_l
              Value:
                natCubicSpline: x=(-6.283185 6.283185) y=(-6.283185 6.283185)
            SimmRotationDof r2: axis=(-1 0 0)
              Value: Constant(value=0)
            SimmRotationDof r3: axis=(0 -1 0)
              Value: Constant(value=0)
        SimmJoint subtalar_l: bodies=(talus_l foot_l)
          DofSet:
            SimmTranslationDof tx:
              Value: Constant(value=-0.04877)
            SimmTranslationDof ty:
              Value: Constant(value=-0.04195)
            SimmTranslationDof tz:
              Value: Constant(value=-0.00792)
            SimmRotationDof r1: axis=(-0.78718 -0.604747 -0.120949) coordinate=subt_angle_l
              Value:
                natCubicSpline: x=(-6.283185 6.283185) y=(-6.283185 6.283185)
            SimmRotationDof r2: axis=(0 -1 0)
              Value: Constant(value=0)
            SimmRotationDof r3: axis=(0 0 1)
              Value: Constant(value=0)
        SimmJoint foot_mark_l: bodies=(foot_l foot_marker_l)
          DofSet:
            SimmTranslationDof tx:
              Value: Constant(value=-0.02)
            SimmTranslationDof ty:
              Value: Constant(value=0.018)
            SimmTranslationDof tz:
              Value: Constant(value=0.01)
            SimmRotationDof r1: axis=(1 0 0)
              Value: Constant(value=0)
            SimmRotationDof r2: axis=(0 1 0)
              Value: Constant(value=0)
            SimmRotationDof r3: axis=(0 0 1)
              Value: Constant(value=0)
        SimmJoint toes_l: bodies=(foot_l toes_l)
          DofSet:
            SimmTranslationDof tx:
              Value: Constant(value=0.1768)
            SimmTranslationDof ty:
              Value: Constant(value=-0.002)
            SimmTranslationDof tz:
              Value: Constant(value=-0.00108)
            SimmRotationDof r1: axis=(-0.541717 0 -0.840561) coordinate=toe_angle_l
              Value:
                natCubicSpline: x=(-6.283185 6.283185) y=(-6.283185 6.283185)
            SimmRotationDof r2: axis=(0 1 0)
              Value: Constant(value=0)
            SimmRotationDof r3: axis=(0 0 1)
              Value: Constant(value=0)
